# [reference: basics.xmcd]
# [reference: pipe.xmcd]
# [reference: elbow.xmcd]
# [reference: Channel.xmcd]
# [reference: tank.xmcd]
# [reference: Manifold.xmcd]
# [reference: Sludge.xmcd]
# [reference: inputs.xmcd]
# [reference: lamina.xmcd]
# [reference: SedTankslopes.xmcd]
Sedtankscript1 :=
    layer1 ← layer_new("tank", grey)
    tank1 ← Tank(tank_origin, tank_dim, tank_thick)
    cylinder5 ← cylinderA(sedtankpipe14_origin, outerradius(2*manifold_inr), -tank_thick)
    rotate2 ← rotate_3d([sedtankpipe14_origin[0] + manifold_inr; sedtankpipe14_origin[1]; sedtankpipe14_origin[2]], sedtankpipe14_origin, "y", 90)
    subtract2 ← subtractD(tank_origin, [sedtankpipe14_origin[0]; sedtankpipe14_origin[1] + manifold_inr; sedtankpipe1_origin[2]])
    holes1 ← concat(cylinder5, rotate2)
    layerset ← layer_set("0")
    layerfreeze1 ← layer_freeze("tank")
    layerslopes ← layer_new("slopes", ltgrey)
    slopes ← sedslope(tank_origin, tank_dim, ϕ)
    box1 ← box(sedtankbox1_origin, [
        sedtankbox1_origin[0] + sedtankbox1_dim[0];
        sedtankbox1_origin[1] + sedtankbox1_dim[1];
        sedtankbox1_origin[2] + sedtankbox1_dim[2]
    ])
    tankthaw ← layer_thaw("tank")
    subtractbox ← subtractJ(tank_origin, [tank_origin[0]; tank_origin[1] + tank_dim[1]; tank_origin[2]], [tank_origin[0]; tank_origin[1] - tank_thick; tank_origin[2]], sedtankbox1_origin)
    layerfreezeslope ← layer_freeze("slopes")
    layer2 ← layer_new("channel", ltgrey)
    channel1 ← ChannelDrawing(channel_origin, channel_dim, channel_thick)
    rotate1 ← rotate(channel_origin, 90)
    cylinder1 ← cylinderA(sedtankpipe1_origin, outerradius(2*sedpipe_inr), -channel_thick)
    cylinder2 ← cylinderA(sedtankpipe2_origin, outerradius(2*sedpipe_inr), -channel_thick)
    cylinder3 ← cylinderC(sedtankpipe3_origin, outerradius(2*sedpipe_inr), -channel_thick)
    cylinder4 ← cylinderA(sedtankpipe4_origin, outerradius(2*sedpipe_inr), -channel_thick)
    subtract1 ← subtractH(channel_origin, [
        sedtankpipe1_origin[0] + outerradius(sedpipe_inr);
        sedtankpipe1_origin[1] + outerradius(sedpipe_inr);
        sedtankpipe1_origin[2]
    ], [
        sedtankpipe4_origin[0] - outerradius(sedpipe_inr);
        sedtankpipe4_origin[1] - outerradius(sedpipe_inr);
        sedtankpipe4_origin[2]
    ])
    holes2 ← concat(cylinder1, cylinder2, cylinder3)
    holes3 ← concat(cylinder4, subtract1)
    layerfreeze2 ← layer_freeze("channel")
    one ← stack(layer1, tank1, holes1, subtract2, layerset, layerfreeze1, layerslopes, slopes, box1, tankthaw, viewtop1, subtractbox, layerset, layerfreezeslope, layer2, channel1, rotate1, viewtop1, holes2, holes3, layerset, layerfreeze2)
    return one
Sedtankscript2 :=
    layerset ← layer_set("0")
    layer3 ← layer_new("pipe", blue)
    pipe1 ← Pipe(sedtankpipe1_origin, sedpipe_inr, -sedtankpipe1_length)
    pipe2 ← Pipe(sedtankpipe2_origin, sedpipe_inr, -sedtankpipe1_length)
    pipe3 ← Pipe(sedtankpipe3_origin, sedpipe_inr, -sedtankpipe1_length)
    pipe4 ← Pipe(sedtankpipe4_origin, sedpipe_inr, -sedtankpipe1_length)
    pipe5 ← Pipe(sedtankpipe5_origin, sedpipe_inr, sedtankpipe5_length)
    rotate2 ← rotate_3d([sedtankpipe5_origin[0] + sedpipe_inr; sedtankpipe5_origin[1]; sedtankpipe5_origin[2]], sedtankpipe5_origin, "y", 90)
    rotate2a ← rotate_3d([sedtankpipe5_origin[0]; sedtankpipe5_origin[1] + sedpipe_inr; sedtankpipe5_origin[2] + sedpipe_inr], sedtankpipe1_origin, "z", -((rad/deg)*sedtankpipe5_angle))
    pipe6 ← Pipe(sedtankpipe6_origin, sedpipe_inr, sedtankpipe6_length)
    rotate3 ← rotate_3d([sedtankpipe6_origin[0] + sedpipe_inr; sedtankpipe6_origin[1]; sedtankpipe6_origin[2]], sedtankpipe6_origin, "y", 90)
    rotate3a ← rotate_3d([sedtankpipe6_origin[0]; sedtankpipe6_origin[1] + sedpipe_inr; sedtankpipe6_origin[2] + sedpipe_inr], sedtankpipe2_origin, "z", -((rad/deg)*sedtankpipe6_angle))
    pipe7 ← Pipe(sedtankpipe7_origin, sedpipe_inr, sedtankpipe7_length)
    rotate4 ← rotate_3d([sedtankpipe7_origin[0] + sedpipe_inr; sedtankpipe7_origin[1]; sedtankpipe7_origin[2]], sedtankpipe7_origin, "y", 90)
    rotate4a ← rotate_3d([sedtankpipe7_origin[0]; sedtankpipe7_origin[1] + sedpipe_inr; sedtankpipe7_origin[2] + sedpipe_inr], sedtankpipe3_origin, "z", (rad/deg)*sedtankpipe7_angle)
    pipe8 ← Pipe(sedtankpipe8_origin, sedpipe_inr, sedtankpipe8_length)
    rotate5 ← rotate_3d([sedtankpipe8_origin[0] + sedpipe_inr; sedtankpipe8_origin[1]; sedtankpipe8_origin[2]], sedtankpipe8_origin, "y", 90)
    rotate5a ← rotate_3d([sedtankpipe8_origin[0]; sedtankpipe8_origin[1] + sedpipe_inr; sedtankpipe8_origin[2] + sedpipe_inr], sedtankpipe4_origin, "z", (rad/deg)*sedtankpipe8_angle)
    pipe9 ← Pipe(sedtankpipe9_origin, sedpipe_inr, sedtankpipe9_length)
    pipe10 ← Pipe(sedtankpipe10_origin, sedpipe_inr, sedtankpipe9_length)
    pipe11 ← Pipe(sedtankpipe11_origin, sedpipe_inr, sedtankpipe9_length)
    pipe12 ← Pipe(sedtankpipe12_origin, sedpipe_inr, sedtankpipe9_length)
    pipe13 ← Pipe(sedtankpipe13_origin, manifold_inr, -sedtankpipe13_length)
    pipe14 ← Pipe(sedtankpipe14_origin, manifold_inr, sedtankpipe14_length)
    rotate6 ← rotate_3d([sedtankpipe14_origin[0] + sedpipe_inr; sedtankpipe14_origin[1]; sedtankpipe14_origin[2]], sedtankpipe14_origin, "y", 90)
    layerfreeze3 ← layer_freeze("pipe")
    one ← stack(layer3, pipe1, pipe2, pipe3, pipe4, pipe5, rotate2, rotate2a, pipe6, rotate3, rotate3a, pipe7, rotate4, rotate4a, pipe8, rotate5, rotate5a, pipe9, pipe10, pipe11, pipe12, pipe13, pipe14, rotate6, layerset, layerfreeze3)
    return one
# pipe2_origin | pipe3_origin | pipe11_origin | pipe14_origin | pipe6_1ength | pipe7_length | pipe8_length | pipe13_length | pipe14_length
# pipe4_origin | pipe5_origin | pipe6_origin | pipe7_origin | pipe8_origin | pipe9_origin | pipe10_origin | pipe13_origin | pipe1_length | pipe5_1ength
pipe12_origin
Sedtankscript3(elbow1_origin, elbow2_origin, elbow3_origin, elbow4_origin, elbow5_origin, elbow6_origin, elbow7_origin, elbow8_origin, elbow9_origin, elbow10_origin, pipe9_length, rad_curve, pipe_inr, pipe_outr, manifold_outr, waste_outr, manifold_inr, manifoldrad_curve) :=
    layer4 ← layer_new("elbow", green)
    elbow1 ← elbow(elbow1_origin, pipe_inr)
    rotate6 ← rotate_3d([elbow1_origin[0]; elbow1_origin[1] + rad_curve; elbow1_origin[2] + pipe_inr], [elbow1_origin[0]; elbow1_origin[1] + rad_curve; elbow1_origin[2]], "x", -90)
    rotate7 ← rotate_3d([elbow1_origin[0]; elbow1_origin[1] + rad_curve; elbow1_origin[2] + pipe_inr], [elbow1_origin[0]; elbow1_origin[1] + rad_curve; elbow1_origin[2]], "y", 90)
    elbow2 ← elbow(elbow2_origin, pipe_inr)
    rotate8 ← rotate_3d([elbow2_origin[0]; elbow2_origin[1] + rad_curve; elbow2_origin[2] + pipe_inr], [elbow2_origin[0]; elbow2_origin[1] + rad_curve; elbow2_origin[2]], "x", -90)
    rotate9 ← rotate_3d([elbow2_origin[0]; elbow2_origin[1] + rad_curve; elbow2_origin[2] + pipe_inr], [elbow2_origin[0]; elbow2_origin[1] + rad_curve; elbow2_origin[2]], "y", 90)
    elbow3 ← elbow(elbow3_origin, pipe_inr)
    rotate10 ← rotate_3d([elbow3_origin[0]; elbow3_origin[1] + rad_curve; elbow3_origin[2] + pipe_inr], [elbow3_origin[0]; elbow3_origin[1] + rad_curve; elbow3_origin[2]], "x", -90)
    rotate11 ← rotate_3d([elbow3_origin[0]; elbow3_origin[1] + rad_curve; elbow3_origin[2] + pipe_inr], [elbow3_origin[0]; elbow3_origin[1] + rad_curve; elbow3_origin[2]], "y", 90)
    elbow4 ← elbow(elbow4_origin, pipe_inr)
    rotate12 ← rotate_3d([elbow4_origin[0]; elbow4_origin[1] + rad_curve; elbow4_origin[2] + pipe_inr], [elbow4_origin[0]; elbow4_origin[1] + rad_curve; elbow4_origin[2]], "x", -90)
    rotate13 ← rotate_3d([elbow4_origin[0]; elbow4_origin[1] + rad_curve; elbow4_origin[2] + pipe_inr], [elbow4_origin[0]; elbow4_origin[1] + rad_curve; elbow4_origin[2]], "y", 90)
    elbow5 ← elbow(elbow5_origin, pipe_inr)
    rotate14 ← rotate_3d([elbow5_origin[0]; elbow5_origin[1] + rad_curve; elbow5_origin[2] + pipe_inr], [elbow5_origin[0]; elbow5_origin[1] + rad_curve; elbow5_origin[2]], "x", 90)
    elbow6 ← elbow(elbow6_origin, pipe_inr)
    rotate15 ← rotate_3d([elbow6_origin[0]; elbow6_origin[1] + rad_curve; elbow6_origin[2] + pipe_inr], [elbow6_origin[0]; elbow6_origin[1] + rad_curve; elbow6_origin[2]], "x", 90)
    elbow7 ← elbow(elbow7_origin, pipe_inr)
    rotate16 ← rotate_3d([elbow7_origin[0]; elbow7_origin[1] + rad_curve; elbow7_origin[2] + pipe_inr], [elbow7_origin[0]; elbow7_origin[1] + rad_curve; elbow7_origin[2]], "x", 90)
    elbow8 ← elbow(elbow8_origin, pipe_inr)
    rotate17 ← rotate_3d([elbow8_origin[0]; elbow8_origin[1] + rad_curve; elbow8_origin[2] + pipe_inr], [elbow8_origin[0]; elbow8_origin[1] + rad_curve; elbow8_origin[2]], "x", 90)
    elbow9 ← elbow(elbow9_origin, manifold_inr)
    rotate18 ← rotate_3d([elbow9_origin[0]; elbow9_origin[1] + manifoldrad_curve; elbow9_origin[2] + manifold_inr], [elbow9_origin[0]; elbow9_origin[1] + manifoldrad_curve; elbow9_origin[2]], "z", 90)
    rotate19 ← rotate_3d([elbow9_origin[0]; elbow9_origin[1] + rad_curve; elbow9_origin[2] + pipe_inr], [elbow9_origin[0]; elbow9_origin[1] + rad_curve; elbow9_origin[2]], "x", 90)
    elbow10 ← elbow(elbow10_origin, manifold_inr)
    rotate20 ← rotate_3d([elbow10_origin[0]; elbow10_origin[1] + rad_curve; elbow10_origin[2] + pipe_inr], [elbow10_origin[0]; elbow10_origin[1] + rad_curve; elbow10_origin[2]], "x", -90)
    layerset ← layer_set("0")
    layerfreeze4 ← layer_freeze("elbow")
    one ← stack(layer4, elbow1, rotate6, rotate7, elbow2, rotate8, rotate9, elbow3, rotate10, rotate11)
    two ← stack(elbow4, rotate12, rotate13, elbow5, rotate14, elbow6, rotate15)
    three ← stack(elbow7, rotate16, elbow8, rotate17, elbow9, rotate18, rotate19, elbow10, rotate20, layerset, layerfreeze4)
    return stack(one, two, three)
Sedtank3 := Sedtankscript3([
    tank_origin[0] - tank_dim[0] + channel_dim[1]/2;
    tank_origin[1] + tank_dim[1]/2 + outerradius(2*manifold_inr) + 3*(tank_dim[1]/2 - outerradius(2*waste_inr))/4 - rad_curve;
    tank_origin[2] + pipe9_length + offfloor_length + 2*rad_curve
], [
    tank_origin[0] - tank_dim[0] + channel_dim[1]/2;
    tank_origin[1] + tank_dim[1]/2 + outerradius(2*manifold_inr) + 1*(tank_dim[1]/2 - waste_outr)/4 - rad_curve;
    tank_origin[2] + pipe9_length + offfloor_length + 2*rad_curve
], [
    tank_origin[0] - tank_dim[0] + channel_dim[1]/2;
    tank_origin[1] + tank_dim[1]/2 - outerradius(2*manifold_inr) - 1*(tank_dim[1]/2 - outerradius(2*waste_inr))/4 - rad_curve;
    tank_origin[2] + pipe9_length + offfloor_length + 2*rad_curve
], [
    tank_origin[0] - tank_dim[0] + channel_dim[1]/2;
    tank_origin[1] + tank_dim[1]/2 - outerradius(2*manifold_inr) - 3*(tank_dim[1]/2 - waste_outr)/4 - rad_curve;
    tank_origin[2] + pipe9_length + offfloor_length + 2*rad_curve
], [
    tank_origin[0] - 4*tank_dim[0]/5;
    tank_origin[1] + tank_dim[1]/2 + manifold_outr + 3*(tank_dim[1]/2 - outerradius(2*waste_inr))/4 - rad_curve;
    tank_origin[2] + offfloor_length + pipe9_length + rad_curve
], [
    tank_origin[0] - 3*tank_dim[0]/5;
    tank_origin[1] + tank_dim[1]/2 + outerradius(2*manifold_inr) + 1*(tank_dim[1]/2 - outerradius(2*waste_inr))/4 - rad_curve;
    tank_origin[2] + offfloor_length + pipe9_length + rad_curve
], [
    tank_origin[0] - 2*tank_dim[0]/5;
    tank_origin[1] + tank_dim[1]/2 - outerradius(2*manifold_inr) - 1*(tank_dim[1]/2 - outerradius(2*waste_inr))/4 - rad_curve;
    tank_origin[2] + offfloor_length + pipe9_length + rad_curve
], [
    tank_origin[0] - 1*tank_dim[0]/5;
    tank_origin[1] + tank_dim[1]/2 - outerradius(2*manifold_inr) - 3*(tank_dim[1]/2 - outerradius(2*waste_inr))/4 - rad_curve;
    tank_origin[2] + offfloor_length + pipe9_length + rad_curve
], [
    tank_origin[0] - tank_dim[0] + channel_dim[1] + channel_thick + 2*rad_curve;
    tank_origin[1] + tank_dim[1]/2 - rad_curve;
    tank_origin[2] + tank_dim[2] - waterlevel - manifold_depth - rad_curve
], [
    tank_origin[0] - tank_dim[0] + channel_dim[1] + channel_thick + rad_curve;
    tank_origin[1] + tank_dim[1]/2 - rad_curve;
    tank_origin[2] + tank_dim[2] - channel_dim[2] - channel_thick - 2*rad_curve
], pipe9_length, rad_curve, pipe_inr, pipe_outr, outerradius(2*manifold_inr), outerradius(2*waste_inr), ElbowRadius(2*manifold_inr))  # error: This variable is undefined.
elbow1_origin
# elbow3_origin | elbow4_origin | elbow5_origin | elbow7_origin | elbow9_origin | elbow10_origin
# elbow6_origin | elbow8_origin
Sedtankscript4(blue2, blue3, purple, tank_origin, tank_dim, tank_thick, channel_origin, channel_dim, channel_thick, manifold_origin, waste_origin, manifold_inr, manifold_outr, manifoldorifice_rad, manifoldorifice_dist, waste_inr, waste_outr, wasteorifice_rad, wasteorifice_dist, L, lamina_origin, lamina_amp, lamina_width, lamina_length, lamina_thick, lamina_periods, lamina_slope, lamina_num, lamina_col, lamina_x, lamina_y) :=
    layer5 ← layer_new("manifold", blue2)
    manifold1 ← Manifold(manifold_origin, manifold_inr, manifoldorifice_rad, L, manifoldorifice_dist)
    rotate18 ← rotate_3d([manifold_origin[0] + manifold_inr; manifold_origin[1]; manifold_origin[2]], manifold_origin, "y", 90)
    rotate19 ← rotate_3d([manifold_origin[0]; manifold_origin[1] + manifold_inr; manifold_origin[2]], manifold_origin, "x", -60)
    layerset ← layer_set("0")
    layerfreeze5 ← layer_freeze("manifold")
    layer6 ← layer_new("sludgepipe", blue3)
    sludgepipe1 ← Sludgepipe(waste_origin, waste_inr, tank_dim[0], wasteorifice_rad, wasteorifice_dist)
    rotate20 ← rotate_3d([waste_origin[0] + waste_inr; waste_origin[1]; waste_origin[2]], waste_origin, "y", 90)
    rotate21 ← rotate_3d([waste_origin[0]; waste_origin[1] + waste_inr; waste_origin[2]], waste_origin, "x", 90)
    layerfreeze6 ← layer_freeze("sludgepipe")
    layer7 ← layer_new("lamina", purple)
    lamina1 ← lamina(lamina_origin, lamina_amp, lamina_width, lamina_length, lamina_thick, lamina_periods, lamina_slope, lamina_num, lamina_col, lamina_x, lamina_y)
    layerfreeze7 ← layer_freeze("lamina")
    one ← stack(layer5, manifold1, rotate18, rotate19, layerset, layerfreeze5)
    two ← stack(layer6, sludgepipe1, rotate20, rotate21, layerset, layerfreeze6, layer7, lamina1, layerset, layerfreeze7)
    return stack(one, two)
Sedtank4A(blue2, blue3, purple, tank_origin, tank_dim, tank_thick, channel_dim, channel_thick, manifold_depth, manifold_inr, manifold_outr, waste_inr, waste_outr, lamina_origin, lamina_amp, lamina_width, lamina_length, lamina_thick, lamina_periods, lamina_slope, lamina_num, lamina_col, lamina_x, lamina_y) := Sedtankscript4(blue2, blue3, purple, tank_origin, tank_dim, tank_thick, [
    tank_origin[0] - tank_dim[0] + channel_dim[1];
    tank_origin[1] - tank_thick;
    tank_origin[2] + tank_dim[2] - channel_dim[2]
], channel_dim, channel_thick, [
    tank_origin[0] - tank_dim[0] + channel_dim[1] + channel_thick + 3*ElbowRadius(2*manifold_inr);
    tank_origin[1] + tank_dim[1]/2;
    tank_origin[2] + tank_dim[2] - waterlevel - manifold_depth
], [tank_origin[0] - tank_dim[0]; tank_origin[1] + tank_dim[1]/2; tank_origin[2] - waste_inr], manifold_inr, manifold_outr, manifoldorifice_rad, manifoldorifice_dist, waste_inr, waste_outr, wasteorifice_rad, wasteorifice_dist, tank_dim[0] - channel_dim[1] - channel_thick - 3*ElbowRadius(2*manifold_inr), lamina_origin, lamina_amp, lamina_width, lamina_length, lamina_thick, lamina_periods, lamina_slope, lamina_num, lamina_col, lamina_x, lamina_y)
# manifold_origin | waste_origin
Sedtank4(blue2, blue3, purple, tank_origin, tank_dim, tank_thick, channel_dim, channel_thick, manifold_depth, manifold_inr, waste_inr, manifoldorifice_rad, manifoldorifice_dist, wasteorifice_rad, wasteorifice_dist) := Sedtank4A(blue2, blue3, purple, tank_origin, tank_dim, tank_thick, channel_dim, channel_thick, manifold_depth, manifold_inr, outerradius(2*manifold_inr), waste_inr, outerradius(2*waste_inr), lamina_origin, lamina_amp, lamina_width, lamina_length, lamina_thick, lamina_periods, lamina_slope, lamina_num, lamina_col, lamina_x, lamina_y)
Sedtankscript5(tank_origin, box_origin, box_dim, num_tanks, array_dist) :=
    layerthaw1 ← layer_thaw("slopes")
    layerthaw2 ← layer_thaw("channel")
    layerthaw3 ← layer_thaw("pipe")
    layerthaw4 ← layer_thaw("elbow")
    layerthaw5 ← layer_thaw("manifold")
    layerthaw6 ← layer_thaw("sludgepipe")
    layerthaw7 ← layer_thaw("lamina")
    viewtop ← viewtop1
    arraytank1 ← concat("-array", sp, "ALL", sp, sp, "r", sp, stringit_nounits(num_tanks), sp, "1", sp, stringit(array_dist))
    layerfreeze7 ← layer_freeze("pipe")
    layerfreeze8 ← layer_freeze("elbow")
    layerfreeze9 ← layer_freeze("sludgepipe")
    layerfreeze10 ← layer_freeze("manifold")
    layerfreeze12 ← layer_freeze("lamina")
    union1 ← concat("_union", sp, "ALL", sp)
    box1 ← box(box_origin, [box_origin[0] + box_dim[0]; box_origin[1] + box_dim[1]; box_origin[2] + box_dim[2]])
    subtract1 ← subtractD(tank_origin, box_origin)
    layerfreeze11 ← layer_freeze("channel")
    one ← stack(layerthaw1, layerthaw2, layerthaw3, layerthaw4, layerthaw5, layerthaw6, layerthaw7)
    two ← stack(viewtop, arraytank1, layerfreeze7, layerfreeze8, layerfreeze9, layerfreeze10, layerfreeze12, union1, viewtop, box1, subtract1, layerfreeze11)
    return stack(one, two)
Sedtank5(tank_origin, channel_dim, num_tanks, tank_dim, tank_thick) := Sedtankscript5(tank_origin, [tank_origin[0] - tank_dim[0]; tank_origin[1]; tank_origin[2] + tank_dim[2] - channel_dim[2]], [channel_dim[1]; 3*channel_dim[0] - 3*tank_thick; channel_dim[2]], num_tanks, tank_dim[1] + tank_thick)
# box_origin | box_dim
Sedtank := stack(Sedtankscript1, Sedtankscript2)
Drawing_Sedtank := Sedtank
# [component: inputs Drawing_Sedtank]
