# [reference: PipeDatabase.xmcd]
grey := [132; 132; 132]
ltgrey := [214; 214; 214]
dkgrey := [91; 91; 91]
blue := [0; 255; 255]
blue2 := [0; 191; 255]
blue3 := [0; 127; 255]
green := [0; 255; 0]
purple := [127; 0; 255]
ltpurple := [125; 0; 160]
tank_origin := [0; 0; 0]*m
tank_dim := [6; 1; 2.5]*m
tank_thick := .75 ft
channel_thick := .25 ft
acad_version := 2007
channel_dim := [tank_dim[1] + (2*tank_thick); .75 ft; 1 ft]
waterlevel := .5 ft
manifold_depth := .5 ft
num_tanks := 3
sedpipe_inr := 2/12*ft
gritpipe_inr := 2/12*ft
lvlpipe_inr := 2/12*ft
manifold_inr := 2/12*ft
waste_inr := 3 in
effluent_inr := 6 in
wasteorifice_rad := .5/12*ft
wasteorifice_dist := 4/12*ft
manifoldorifice_rad := .5/12*ft
manifoldorifice_dist := 4/12*ft
pipe9_length := .25 ft
offfloor_length := 1 ft
floc_dim := [tank_dim[0]; 4 m; tank_dim[2]]
wall_dim := [3/4*floc_dim[0]; tank_thick; floc_dim[2]]
floc_inleth := 6/12*ft
sedeff_origin := [
    tank_origin[0] - tank_dim[0] - tank_thick;
    tank_origin[1] + 2.5*tank_dim[1] + 2*tank_thick;
    tank_origin[2] + tank_dim[2] - channel_dim[2] - channel_thick - (2*ElbowRadius(2*effluent_inr))
]
lvltank_dim := [5; 3; 3]*ft
lvltank_thick := .5 ft
lvltank_waterlvl := 1.5 ft
wall_disp := 3/12*ft + outerradius(2*effluent_inr)
walkway_width := 5 ft
platform_thick := 2 ft
Δz_effluent := 2*ElbowRadius(2*manifold_inr)
column_dim := [2 ft; 2 ft; tank_dim[2] + tank_thick - channel_dim[2] - channel_thick]
grit_origin := [
    tank_origin[0] - tank_dim[0] - tank_thick;
    tank_origin[1] + (num_tanks*tank_dim[1]) + (num_tanks*tank_thick) + 3*floc_dim[1]/4;
    tank_origin[2] + floc_inleth
]
grit_dim := [4; 4; 3]*ft
grit_thick := .5 ft
grit_holes := 7
gritriser_h := 30/12*ft
Δy_grit := floc_dim[1]/4 + tank_thick + walkway_width - grit_dim[1] - 2*grit_thick
r_drum := 1.5 ft
drum_disp := 8/12*ft
h_drum := 3 ft
grit_rad := .25 in
Δz_grit := tank_dim[2] - channel_dim[2] - channel_thick - floc_inleth
stockplat_thick := 1 ft
stockplatcol_dim := [6/12; 6/12; 3]*ft
stockplat_dim2 := [4*r_drum + 3*drum_disp; 2*r_drum + 2*drum_disp; stockplat_thick]
stockplat_dim1 := [
    4*r_drum + 3*drum_disp + lvltank_dim[0] + 2*lvltank_thick - grit_dim[0] - 2*grit_thick;
    2*r_drum + 2*drum_disp;
    stockplat_thick
]
stockplat1_origin := [
    tank_origin[0] - tank_dim[0] - tank_thick - walkway_width - grit_dim[0] - 2*grit_thick;
    tank_origin[1] + num_tanks*tank_dim[1] + (num_tanks + 1)*tank_thick + floc_dim[1] + walkway_width;
    tank_origin[2] + tank_dim[2] - channel_dim[2] - channel_thick + platform_thick + stockplatcol_dim[2]
]
stockplat2_origin := [
    tank_origin[0] - tank_dim[0] - tank_thick - walkway_width - lvltank_dim[0] - 2*lvltank_thick;
    tank_origin[1] + num_tanks*tank_dim[1] + (num_tanks + 1)*tank_thick + floc_dim[1] - grit_dim[1] - 2*grit_thick;
    tank_origin[2] + tank_dim[2] - channel_dim[2] - channel_thick + platform_thick + stockplatcol_dim[2]
]
factor_safety := .5 ft
offfloorlamina_dist := factor_safety + outerradius(2*sedpipe_inr) + pipe9_length + offfloor_length
lamina_origin := [
    (tank_origin[0] - tank_dim[0] + channel_dim[1] + channel_thick);
    tank_origin[1];
    (tank_origin[2] + offfloorlamina_dist)
]
lamina_amp := .5 in
lamina_thick := 4 mm
lamina_width := tank_dim[1]
lamina_length := 45 in
lamina_periods := 8.5
lamina_slope := 60 deg
lamina_num := 53
lamina_col := 1  # this is a constant!
lamina_x := 4 in
lamina_y := 7 cm
z_rotation := 0
rotate_angle := 90
ϕ := 45 deg  # sedtank slope angle
baffletank1_origin := [
    tank_origin[0] - tank_dim[0];
    tank_origin[1] + 3*(tank_dim[1] + tank_thick) + (floc_dim[1] + wall_dim[1])/2;
    tank_origin[2]
]
baffletank2_origin := [tank_origin[0] - tank_dim[0]; tank_origin[1] + 3*(tank_dim[1] + tank_thick); tank_origin[2]]
baffletank2_location := [
    1 ft, 3 ft, 1.25 m;
    3 ft, 0, 1.25 m;
    5 ft, 3.5 ft, 1.25 m;
    7 ft, 0, 1.25 m;
    9 ft, 4 ft, 1.25 m;
    11 ft, 0, 1.25 m
]
baffletank1_location := [
    1 ft, 0, 1.25 m;
    2 ft, 1 ft, 1.25 m;
    3 ft, 0, 1.25 m;
    4 ft, 1 ft, 1.25 m;
    5 ft, 0, 1.25 m;
    6 ft, 2 ft, 1.25 m;
    7 ft, 0, 1.25 m;
    8 ft, 2 ft, 1.25 m;
    9 ft, 0, 1.25 m;
    10 ft, 2.5 ft, 1.25 m;
    11 ft, 0, 1.25 m;
    12 ft, 2.5 ft, 1.25 m;
    13 ft, 0, 1.25 m
]
baffletank2_num := rows(baffletank2_location)
baffletank1_num := rows(baffletank1_location)
baffle_amp := .5 in
baffle_thick := 4 mm
baffle_slope := 90 deg
baffle_width := (floc_dim[1] - wall_dim[1])/2
baffle_col := 1
baffle_periods := 8.5
baffle_y := 7 cm
baffle_num := 1  # this is a constant!
baffle_x := 4 in
