# [reference: DesignAssumptions-1m deep.xmcd]
# [reference: UserInputs- 1m deep.xmcd]
# Automated Design: AutoCAD: Plant Drawing Inputs
sedlayout := 4
ND_SedPipeEntrance
L_Sed := 3.02137 m
T_PlantWall = 0.15 m
L_SedInletOrifice := 8 in
EN_PipeSpec = 4
W_Sed = 1.0668 m
T_Mp = 0.3 m
H_SedInletOrifice := 12 in
ND_SedSludge := 3 in
H_Sed := 1.2 m
HW_Sed = 1.2 m
T_SedInletSlope := 2 in
AN_SedBottom := 45 deg
H_SedAbove = 0.12 m
N_SedInletSlope := 10
AN_SedSludgeBottom := 20 deg
ND_SedLaunder := 3 in
W_Channel := .245 m
W_EChannel := .245 m
H_Channel := .3 m
H_EChannel := .3 m
T_ChannelWall
T_EChannelWall := .15 m
N_SedTanks = 3
H_SedBelow := .54 m
D_SedSludgeOrifice := 5 mm
D_SedLaunderOrifice := 9 mm
N_SedSludgeOrifices := 45
N_SedLaunderOrifices := 70
B_SedSludgeOrifices = 0.1 m
B_SedLaunderOrifices = 0.1 m
L_SedPlate := .35 m
AN_SedPlate = 60 deg
N_SedPlates := 42
Amp_SedPlate = 0.0127 m
B_SedPlate := .05 m
T_SedPlate := 3 mm
Per_SedPlate := 8.5
N_SedPlateCol := 1
lamina_y := 7 cm
L_ChannelInlet := W_Sed
W_ChannelInlet := W_Channel
