# [reference: basics.xmcd]
# [reference: tank.xmcd]
# [reference: lamina - Copy.xmcd]
tank_origin := [0; 0; 0]
T_PlantWall := .15 m
L_Sed := 4.529 m
X_FlocBaffles := [
    0.229, 4.135;
    0.377, 3.736;
    0.525, 3.337;
    0.673, 2.938;
    0.822, 2.539;
    0.97, 2.14;
    1.118, 1.741;
    1.266, 1.342;
    1.415, 0.943;
    1.616, 0.544;
    1.817, 0;
    2.019, 0;
    2.22, 0;
    2.421, 0;
    2.623, 0;
    2.824, 0;
    3.025, 0;
    3.425, 0;
    3.824, 0
]*m
Z_FlocBaffles := [
    0, 0;
    0.192, 0.569;
    0, 0;
    0.192, 0.569;
    0, 0;
    0.192, 0.569;
    0, 0;
    0.192, 0.569;
    0, 0;
    0.272, 0.569;
    0, 0;
    0.272, 0;
    0, 0;
    0.272, 0;
    0, 0;
    0.272, 0;
    0, 0;
    0.569, 0;
    0, 0
]*m
L_FlocBaffles := [
    .837, .461;
    1 - .06, .624 - .05;
    .837, .461;
    1 - .06, .624 - .05;
    .837, .461;
    1 - .06, .624 - .05;
    .837, .461;
    1 - .06, .624 - .05;
    .837, .461;
    .92 - .06, .624 - .05;
    .757, 0;
    .92 - .06, 0;
    .757, 0;
    .92 - .06, 0;
    .757, 0;
    .92 - .06, 0;
    .757, 0;
    .624 - .06, 0;
    .461, 0
]*m
ND_SedPipeEntrance := 6 in
W_Sed := 1 m
EN_PipeSpec := 4
T_Mp := .3 m
H_Sed := 1.129 m
ND_SedSludge := 3 in
HW_Sed := 1 m
AN_SedBottom := 45 deg
H_SedAbove := .12 m
ND_SedLaunder := 6 in
W_Channel := .245 m
W_EChannel := .245 m
H_Channel := .3 m
H_EChannel := .3 m
T_EChannelWall := .15 m
T_ChannelWall := .15 m
N_SedTanks := 3
H_SedBelow := .5 m
D_SedSludgeOrifice := 5 mm
D_SedLaunderOrifice := 9 mm
N_SedSludgeOrifices := 45
N_SedLaunderOrifices := 70
B_SedSludgeOrifices := .1 m
B_SedLaunderOrifices := .1 m
L_SedPlate := .329 m
AN_SedPlate := 60 deg
N_SedPlates := 75
Amp_SedPlate := .5 in
B_SedPlate := .05 m
T_SedPlate := 3 mm
Per_SedPlate := 8.5
N_FlocChannels := 2
N_SedPlateCol := 1
lamina_y := 7 cm
W_FlocChannel := .5 m
L_Floc := 9.059 m
H_Floc := H_Sed
W_FlocPort := .379 m
H_FlocPort := .75 m
baffle_amp := .5 in
baffle_thick := 4 mm
baffle_slope := 90 deg
baffle_width := W_FlocChannel
baffle_col := 1  # this is a constant!
baffle_periods := 8.5
baffle_y := 7 cm
baffle_num := 1
baffle_x := 4 in
# Automated Design: AutoCAD: Flocculation Tank
# Dimensions
totalfloc_dim := [L_Floc/N_FlocChannels; (N_FlocChannels*W_FlocChannel) + ((N_FlocChannels - 1)*T_PlantWall); H_Floc]
wall_dim := [totalfloc_dim[0] + (2*T_PlantWall); T_PlantWall; totalfloc_dim[2]]
# Origin Points
floc_origin := [tank_origin[0]; tank_origin[1] + N_SedTanks*(W_Sed + T_PlantWall); tank_origin[2]]
wall_origin := [
    tank_origin[0] - totalfloc_dim[0] - T_PlantWall;
    tank_origin[1] + N_SedTanks*(W_Sed + T_PlantWall) + W_FlocChannel;
    tank_origin[2]
]
flochole_origin := [
    tank_origin[0] - W_FlocPort;
    tank_origin[1] + N_SedTanks*(W_Sed + T_PlantWall) + W_FlocChannel;
    tank_origin[2]
]
Y_FlocBaffles :=
    for j ∈ 0 .. (N_FlocChannels - 1)
        Y_FlocBaffles[0, j] ← tank_origin[1] + (N_SedTanks*(W_Sed + T_PlantWall)) + ((N_FlocChannels - j - 1)*(W_FlocChannel + T_PlantWall))
    return Y_FlocBaffles
# Flocculation Tank Script
Floctankscript1 :=
    layer1 ← layer_new("floctank", dkgrey)
    tank1 ← Tank(floc_origin, totalfloc_dim, T_PlantWall)
    box1 ← box(wall_origin, [wall_origin[0] + wall_dim[0]; wall_origin[1] + wall_dim[1]; wall_origin[2] + wall_dim[2]])
    box2 ← box(flochole_origin, [flochole_origin[0] + W_FlocPort; flochole_origin[1] + T_PlantWall; flochole_origin[2] + H_FlocPort])
    subtract0 ← subtractD([flochole_origin[0] + W_FlocPort + T_PlantWall; flochole_origin[1]; flochole_origin[2]], flochole_origin)
    union1 ← unionC([
        floc_origin[0] - totalfloc_dim[0] - T_PlantWall - zc;
        floc_origin[1] - T_PlantWall - zc;
        floc_origin[2]
    ], [
        floc_origin[0] + T_PlantWall + zc;
        floc_origin[1] + totalfloc_dim[1] + T_PlantWall + zc;
        floc_origin[2]
    ])
    box3 ← box([
        floc_origin[0] - totalfloc_dim[0];
        floc_origin[1] - T_PlantWall;
        floc_origin[2] + totalfloc_dim[2] - H_Channel
    ], [floc_origin[0] - totalfloc_dim[0] + W_Channel; floc_origin[1]; (floc_origin[2] + totalfloc_dim[2])])
    subtract1 ← subtractD(floc_origin, [
        floc_origin[0] - totalfloc_dim[0];
        floc_origin[1] - T_PlantWall;
        floc_origin[2] + totalfloc_dim[2] - H_Channel
    ])
    bigunion ← union_allA
    layerset ← layer_set("0")
    layerfreeze1 ← layer_freeze("floctank ")
    one ← stack(layer1, tank1, box1, box2, subtract0, union1, box3, subtract1, bigunion, layerset, layerfreeze1)
    return one
x(j) :=
    a ← 0
    for t ∈ 0 .. (rows(X_FlocBaffles) - 1)
        a ← a + 1 if X_FlocBaffles[t, j] ≠ 0
    return a
Floctankscript2 :=
    local ← layer_new("baffle", ltpurple)
    for j ∈ 0 .. (N_FlocChannels - 1)
        for i ∈ 0 .. (x(j) - 1)
            baffle_origin[i] ← [tank_origin[0] - L_Sed; 0; tank_origin[2]] + [X_FlocBaffles[i, j]; Y_FlocBaffles[0, j]; Z_FlocBaffles[i, j]]
            baffle_length[i] ← L_FlocBaffles[i, j]
            local ← stack(local, lamina(baffle_origin[i], baffle_amp, baffle_width, baffle_length[i], baffle_thick, baffle_periods, baffle_slope, baffle_num, baffle_col, baffle_x, baffle_y))
            local
        local
    return local
Floctankscript3 :=
    layerset ← layer_set("0")
    layerfreeze1 ← layer_freeze("baffle")
    one ← stack(layerset, layerfreeze1)
    return one
FlocTank := stack(Floctankscript1, Floctankscript2, Floctankscript3)
# [component: inputs FlocTank]
