# [reference: basics - Copy.xmcd]
Inletslopescript(origin, dim, orifice_origin, orifice_dim, mirror_point1, mirror_point2, nrow, ncol, dist, bigslope, win1, win2) :=
    viewtop ← viewtop1
    zoomwin ← zoom_win(win1, win2)
    box1 ← box(origin, dim)
    box2 ← box(orifice_origin, orifice_dim)
    subtract1 ← subtractD(origin, orifice_origin)
    array ← arrayB(origin, nrow, ncol, dist)
    union ← union_allA
    rotate ← rotate_3d(origin, origin, "x", 45)
    mirror ← mirror(origin, mirror_point1, mirror_point2)
    one ← stack(viewtop, zoomwin, box1, box2, subtract1, array, union, rotate, mirror)
    return one
Inletslopescripta(origin, dim, Length, l_orifice, h_orifice, n, bigslope) := Inletslopescript(origin, dim, [origin[0] + dim[0]/2 - l_orifice/2; origin[1]; origin[2] - dim[2]/2], [origin[0] + dim[0]/2 + l_orifice/2; origin[1] + dim[1]; origin[2] + h_orifice], [origin[0]; origin[1]], [origin[0] + zc; origin[1]], 1, n, Length/n, bigslope, [origin[0] - zc; origin[1] - zc; origin[2] - zc], [origin[0] + dim[0] + zc; origin[1] + dim[1] + zc; origin[2] + dim[2] + zc])
Inletslope(origin, Length, Width, l_orifice, h_orifice, thick, n, bigslope) := Inletslopescripta(origin, [Length/n; thick; (Width/2)*sin(bigslope)], Length, l_orifice, h_orifice, n, bigslope)
l_orifice := 4 in
origin := [0; 0; 0]*m
h_orifice := 6 in
L_Sed := 2 m
thick := 3 in
n := 10
W_Sed := 1 m
bigslope := 45 deg
bigslope = 45 deg
Drawing_Inletslope := Inletslope(origin, L_Sed, W_Sed, l_orifice, h_orifice, thick, n, bigslope)
# [component: inputs Drawing_Inletslope]
