# Automated Design: AutoCAD: Plant Drawing Inputs
# References
# [reference: MasterProgramWWW.xmcd]
# [reference: PipeDatabase.xmcd]
# [reference: DesignAssumptions.xmcd]
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# Colors
grey := [132; 132; 132]
ltgrey := [214; 214; 214]
dkgrey := [91; 91; 91]
blue := [0; 255; 255]
blue2 := [0; 191; 255]
blue3 := [0; 127; 255]
green := [0; 255; 0]
purple := [127; 0; 255]
ltpurple := [125; 0; 160]
zc := .1 m
zc_point := [0; .1; 0]*m
# Sedimentation Tank
tank_origin := [0; 0; 0]*m
tank_dim := sedtank_dim*m
channel_dim := [tank_dim[1] + 2*tank_thick; Channel_dim[1]; Channel_dim[2]]
waterlevel := tank_dim[2] - water_depth*m
manifold_depth := spaceabove/2*m
num_tanks := n_sedtanks
sedpipe_inr := (NominalPipeSize(D_launder*in)/2)
sedtankpipe9_length := Pipe9_length*m
offfloor_length := offfloor_length*m
manifold_inr := (NominalPipeSize(D_launder*in)/2)
manifoldorifice_rad := D_laundOrf/2*in
manifoldorifice_dist := laundOrf_dist*cm
waste_inr := (NominalPipeSize(D_sludgedrain*in)/2)
wasteorifice_rad := D_sludgeOrf/2*cm
wasteorifice_dist := sludgeOrf_dist*cm
waste_inr = 1 in
offfloorlamina_dist := spacebelow_total
lamina_amp := .5 in
lamina_thick := 4 mm
lamina_width := tank_dim[1]
lamina_length := L_lamella
lamina_periods := 8.5
lamina_slope := α = 60 deg
lamina_num := N_lamella
lamina_col := 1  # this is a constant!
lamina_x := lamella_spacing
lamina_y := 7 cm
z_rotation := 0
rotate_angle := 90
ϕ := beta = 55 deg  # sedtank slope angle
# Flocculation Tank
floc_dim := [floc_dim[0]*0.5; floc_dim[1]; floc_dim[2]]*m
numfloc_tanks := 2
flochole_dim := [uturnhole_dim[0]*m; tank_thick; uturnhole_dim[1]*m]
baffletank1_location := baffle_positions[:, 0][0]*m
baffletank1_num := rows(baffletank1_location)
baffletank2_location := baffle_positions[:, 1][0]*m
baffletank2_num := rows(baffletank2_location)
baffle_positions = [[
    0.09, 2.1733, 0.278874;
    0.18, 0, 2.0383;
    0.27, 2.1733, 0.278874;
    0.36, 0, 2.0383;
    0.45, 2.1733, 0.278874;
    0.54, 0, 2.0383;
    0.63, 2.1733, 0.278874;
    0.75, 0, 0;
    0.87, 2.1733, 0.323874;
    0.99, 0, 1.9933;
    1.11, 2.1733, 0.323874;
    1.23, 0, 1.9933;
    1.35, 2.1733, 0.323874;
    1.47, 0, 1.9933;
    1.59, 2.1733, 0.323874;
    1.84, 0, 0
], [
    2.024, 2.1733, 0.518874;
    1.774, 0, 1.7983;
    1.524, 2.1733, 0.518874;
    1.274, 0, 1.7983;
    1.024, 2.1733, 0.518874;
    0.774, 0, 1.7983;
    0.524, 2.1733, 0.518874;
    0.274, 0, 1.7983
]]
baffle_amp := .5 in
baffle_thick := 4 mm
baffle_slope := 90 deg
baffle_width := floc_dim[1]
baffle_col := 1  # this is a constant!
baffle_periods := 8.5
baffle_y := 7 cm
baffle_num := 1
baffle_x := 4 in
# Platform
column_dim := [column_width; column_length; tank_dim[2] + tank_thick - channel_dim[2] - channel_thick]
# Grit Tank
grit_thick = 0.15 m
walk_space := 18 in
grit_origin := [
    tank_origin[0] - tank_dim[0] - tank_thick;
    (tank_origin[1] + (num_tanks*tank_dim[1]) + (num_tanks*tank_thick) + numfloc_tanks*floc_dim[1] + (numfloc_tanks - 1)*tank_thick) - 1*floc_dim[1]/2;
    tank_origin[2] + floc_inleth
]
grit_dim := grit_dim*m
grit_holes := 7
Δx_grit := walkway_width
grit_rad := .25 in
gritriser_h := 30/12*ft
Δy_grit := tank_thick + floc_dim[1]/2 + walkway_width - grit_dim[1] - 2*grit_thick
gritpipe_inr := D_GritRiser*m/2
gritdisp1 := 8 in
Δz_grit := tank_dim[2] - channel_dim[2] - platform_thick - floc_inleth
gritdisp2 := 6 in
# Plant Level Tank
lvlpipe_inr := manifold_inr
effluent_inr := (D_weir*in/2)
sedpipe_inr = 2 in
sedeff_origin := [
    tank_origin[0] - tank_dim[0] - tank_thick;
    tank_origin[1] + 2.5*tank_dim[1] + 2*tank_thick;
    tank_origin[2] + tank_dim[2] - channel_dim[2] - channel_thick - ElbowRadius(2*sedpipe_inr)
]
lvltank_dim := lvltank_dim*m
lvltank_waterlvl := HW_plantleveling*cm
wall_disp := 3/12*ft + outerradius(2*effluent_inr)
Δz_effluent := ElbowRadius(2*sedpipe_inr) + platform_thick + grit_thick - channel_dim[2]
Δy_effluent := tank_dim[1]/2 + tank_thick + numfloc_tanks*(floc_dim[1] + tank_thick) - grit_dim[1] - lvltank_dim[1] - 2*lvltank_thick - 2*grit_thick
# Chemical Stock Platform
stockplat_dim1 := [
    4*r_drum + 3*drum_disp + lvltank_dim[0] + 2*lvltank_thick - grit_dim[0] - 2*grit_thick;
    2*r_drum + 2*drum_disp;
    stockplat_thick
]
stockplat_dim2 := [4*r_drum + 3*drum_disp; 2*r_drum + 2*drum_disp; stockplat_thick]
stockplat1_origin := [
    tank_origin[0] - tank_dim[0] - tank_thick - walkway_width - grit_dim[0] - 2*grit_thick - ShortTeeLength(NominalPipeSize(2*gritpipe_inr)) - walk_space;
    sedeff_origin[1] + 2*stockplat_dim2[1] + 2*lvltank_thick + walkway_width;
    tank_origin[2] + tank_dim[2] - channel_dim[2] + stockplatcol_dim[2]
]
stockplat2_origin := [
    tank_origin[0] - tank_dim[0] - tank_thick - walkway_width - lvltank_dim[0] - 2*lvltank_thick;
    sedeff_origin[1] + stockplat_dim2[1] + 2*lvltank_thick;
    tank_origin[2] + tank_dim[2] - channel_dim[2] + stockplatcol_dim[2]
]
