# INDEX
# Basis of Design Assumptions | Click on these titles to go to that section:
# Drum  Parameters
# Flocculation tank assumptions
# Used throughout program
# Sedimentation tank assumptions
ν := 1*10^-6*m^2/s  # The kinematic viscosity of water.
# Launder Design and Sludge Assumptions
Re_pipetransition := 2100  # Sedtank Drain assumptions
ε_pvc := 0.12 mm
# Plant Leveling Tank assumptions
# Grit Chamber assumptions
# Channel assumptions
stockplatcol_dim := [20; 20; 120]*cm  # Chemical Feed Stock Assumptions:
column_width := 2 ft
# Plant Elevation Design Assumptions
column_length := column_width  # Minor Loss Coefficients
# Drum  Parameters
r_drum := 0.3 m
h_drum := 0.7 m
drum_disp := 6 in
chemplatform_addwidth := 30 cm  # This is the extra space in addition to the chemical drums needed for walking on the chemical platform.
# Flocculation tank assumptions
# One flocculation tank has the same volume as the one sedimentation tanks. We arrive at this conclusion because:
# The Length of the flocculator is based on the same length of the sedimentation tank. In order to save money on materials, it was decided to make the width of the flocculation tank 1/2 the size of the sedimentation tanks. Therefore, in order to transition nicely into the channel that distributes flow into the three sedimentation tanks, the flocculator is modeled as a U shape. (Currently, we have assumed 2 channels in the flocculator and 3 sedimentation tanks.)
# The depth of the flocculation tank is similarly set by the depth of the sedimentation tank.
# (These are currently the parameters which set the dimensions for the flocculator. Until research proves otherwise, this is what guides the motivation for the flocculator design.)
n_channels := 2  # We are setting the number of channels in the flocculator to 2.
# This is the ideal value of G in each of the three baffle spacings. This is based off the Okum and Schulz model that called for G values of (75, 45, 15) 1/s. However, these values consider the theory that flocs only collide over a distance of 2b after making the 180 degree turn around a baffle.
G := [166; 83; 19]*1/s
# This is the minimum value for Gtheta that a flocculator must have to be effective. This value was found based on the flocculator at Ojojona. This value also considers the theory that flocs only collide over a distance of 2b after making the 180 degree turn around a baffle (not through the entire tank as as previously assumed).
Gθ_min := 5000
k_b := 3  # This is the loss coefficient for a 180 degree turn.
overlap_min := 2 cm  # This is the minumum overlap between adjacent baffles to prevent short circuiting.
freeboard_floc := 10 cm  # Space between top of tank and water surface (there will be more space at the end of the tank since the water level is decreasing)
# This is the ratio of the baffle spacing to the distance between the bottom of a baffle and the bottom of the tank (or top of a baffle and water surface.
spacingratio := 1.5
# This is the ratio between the design flow rate (max flow rate) and the minimum flow rate. The flocculator must be able to handle both.
flowratio_hightolowflow := .5
uturnhole_unusedspace := 1.5 cm
# This is extra space around the hole that the water flows through when making the u turn. Half of this space is between the hole and the last baffle and the other half is between the hole and the end of the channel.
Gθ_absmin := 4500  # This is the absolute minimum allowable Gθ value for the flocculator.
floc_inleth := 6 in  # This is the height of the inlet pipe to the flocculator above the floor of the sed tank
# Sedimentation tank assumptions
α := 60 deg  # Degree lamella is installed relative to the horizontal (so flocs slide down lamella)
v_up := 100*m/day  # We assume critical velocity should be 10 m/day, but to allow for formation of sludge blanket we need an upflow velocity of 100m/day.
criticalvelocity_toobig := 20*m/day
# Critical velocity must be low enough to allow for almost all
# of the particles to settle out
spacebelow_total := 1 m  # This is the amount of space under the plate settlers, it will be some combination of straight and slanted walls.
n_sedtanks := 3
# Number of sedimentation tanks (to ensure currently reasonable dimensions, this might be a factor by which to enlarge the number of sedimentation tanks in the future.)
freeboard_sed := 10 cm  # Space between top of tank and water surface
ratio_waterdepthtolaunderspacing := 0.25
# this is the ratio between the depth of the water between the top of the plate settlers and the effluent launders and the spacing between effluent launders
pipe_diameter := 15 cm
# This is just an assumed value for the diameter of the effluent launder. This is just needed for the determination of the active length of the sed tank. The actual diameter is calculted in the launder design function.
# Launder Design and Sludge Assumptions
# Ratio of the flow between the launders, the long path flow divided by the short path flow
Q_ratioLaunders := 0.95
Q_ratioLaunderOrf := 0.85  # Ratio of the flow between the orifices within a launder (the farthest orifice divided by the closest orifice)
Orifice_dist := 0.1 m  # Orifice spacing in the launder
PLTlengthAssumed := 0.8 m
# Length of Plant Leveling Tank assumed to calculate headloss through launders. Any difference from actual length is assumed to be negligible.
# Sedtank Drain assumptions
L_sludgeports := 0.1 m  # The orifice spacing in the sedimentation tank drainage
t_drain := 1800 sec  # The drainage time for the sedimentation tank
Q_ratioSludge := 0.85  # Ratio of the flow between the sludge pipes, the long path flow divided by the short path flow
# Plant Leveling Tank assumptions
Cd := 0.61  # Weir coefficient
# This costraint might not work for smaller plants
Π := 1/3  # This is the ratio between the spaing above the weir and the diameter of the weir
hl_launder := 0.1 m  # The maximum allowed head loss through the launders
concrete_space := 0.5 m  # Total space assumed for concrete between inlet pipes
# Assumes distances of the sedimentation tank exit pipes. This will not stay as an assumption, the AutoCADD team and hydraulic team need to collabrate to calculate this array
# Grit Chamber assumptions
A_ratio := 0.3
# The maximum inlet orifice area into a vertical pipe normalized by the pipe area. This prevents the orifice flow from becoming so large that the orifice flows interfere with each other. This estimate is based on experience we have at Ojojona, and may be revised as we build more of these flow measuring devices. The orfices should also be placed on one side of the pipe so that the orifice jets don't impinge on each other.
L_rmpipe := 2 m  # The total pipe length between the orifices and the flocculator (rapid mix pipe) .
n_elbowsrapid := 3
# Pipe connecting the Grit chamber to the floc tank has three elbows. Based on how the AutoCAD team draws this pipe. The minor loss coefficient for this is K.el90
n_trapid := 1
# Pipe connecting the Grit chamber to the floc tank has one T. Based on how the AutoCAD team draws this pipe. The minor loss coefficient for this is either K.Tflowbr
HL_RapidMix := 20 cm
# This is the allowable head loss through the rapid mix pipe and is what is used to size the pipes from the grit chamber to the flocculator AND the flow measurement tubes in the grit chamber
HL_LFOM := 20 cm  # The maximum headloss between orfices  # Linear Flow Orifice Meter
Max_error := 0.03
# Maximum error between ideal and actual flow rates in grit chamber
ΔH_LFOMorifice := 2 cm  # Veritical distance between orifices
Platform_extra := 30 cm  # extra space on either side of the chemical drums chemical feed platform
grit_extralength := 2  # two pipe diameters of extra space needed to assemble pipes together in grit chamber
Π_LFOMarea := 3
# Ratio of LFOM pipe area to orifice area. Note that for this calculation is based on the assumption of one orifice located HL.FlowMeter below the water surface.
# Channel assumptions
K_90 := 0.4  # The loss coefficient for the channel transition in a 90 degree turn
Π_cell := 2
# The length of the zone where the energy is dissipated. This is the length of the cell, L, divided by the width of the cell b. Also used in flocculation calculation
HW_channel := 60 cm  # This is the height of the water level in the channel.
freeboard_channel := 10 cm  # Additional wall height above the water level of the channel
# Chemical Feed Stock Assumptions:
HL_FCM := 20 cm  # Taken from the Tamara design for plant water levels. Don't know how accurately they will hold when the plant flow rate changes.
HL_FCMvalvefreefall := 5 cm
D_FCMvalve := 0.093 in
Al_maxdose := 60*mg/L
Al_stock := 120*gm/L
HL_FCMinlet := 20 cm
H_stocktankport := 10 cm
# Plant Elevation Design Assumptions
# L.sedinlet is the average length of the sedimentation inlet pipes
L_sedinlet := 2.5 m
# n.sedinlet is the number of inlet
# pipes per sed tank
n_sedinlet := 4
# n.siturns is the number of turns in each inlet pipe
n_siturns := 2  # WHAT IS GOING ON HERE? - EXPLAIN ASSUMPTIONS PLEASE
l_sedactive := 3.745 m
n_sedexitturns := [5; 4; 4]  # Design Assumption: based on the layout of the plant
n_rmturns := 6  # Number of right angles in the pipe from the Rapid Mix to the flocculators.
n_launturns := 0
# is the number of turns in the launder pipe (this value
# should be zero)
L_sedexits := [3.56 m; 4.39 m; 6.0 m]
# Drill Bits available for drilling orifices
i := 0 .. 30
j := 0 .. 23
D_engdrill[i] := 1/16*(i + 2)*in
D_metdrill[j] := 2*(j + 2)*mm
# Determine which array of drillbit sizes to use based on type of drill set (english or metric)
D_drill :=
    D_engdrill if DrillSeries == 1
    D_metdrill otherwise  # error: This variable is undefined.
