# AguaClara Water Treatment Plants -- Ecuador
# Automated Design
# User Inputs:
HW_Sed := 1.55 m
# Design References
# [reference: UserInputs- Ecuador.xmcd]
# [reference: DesignAssumptions- Ecuador.xmcd]
# [reference: MathFunctions - Ecuador.xmcd]
# [reference: PipeDatabase - Ecuador.xmcd]
# [reference: MinorLossCoefficients - Ecuador.xmcd]
# [reference: FluidsFunctions - Ecuador.xmcd]
# Sed Tanks and Slopes:
# [reference: Sed. Inlet Slopes - Triangles - Ecuador.xmcd]
N_SedTanks = 2
H_SedBetween = 0.0762 m
HW_Sed = 1.55 m
B_SedPort = 6.40067 cm
.
L_Sed = 2.27293 m
L_SedPort = 7.39086 cm
W_SedPort = 7.39086 cm
N_TrianglesperTank = 2
B_SedPort = 6.40067 cm
W_Sed = 0.92 m
N_SedPorts = 8
ND_SedPipeEntrance = 6 in
# H.SedRectangle needs to be greater than H.SedPort
Π_SedCell = 2
L_Sed = 2.27293 m
L_SedMax = 2.27293 m
N_SedPorts*W_SedPort = 0.591269 m
V_SedPort = 2.72906 cm/s
# Sedimentation Tank Sludge Drain:
# [reference: SludgeDrain-Ecuador.xmcd]
N_SedSludgeOrifices = 26
Time_SludgeDrain = 0.695202 hr
ND_SedSludge = 2 in
Q_SludgeDrainInitial = 10.3131 L/min
D_SedSludgeOrifice = 0.3125 in
# Sedimentation Tank Dimensions:
# [reference: Sedimentation Dimensions - Ecuador.xmcd]
H_SedBottomSlope = 0.0811104 m
H_SedTopSlope = 0.719069 m
H_SlopeRectangle = 0.08 m
Z_SedSlopes = 0.859394 m
H_Sed = 1.65 m
W_Sed = 0.92 m
# Inlet Channel:
# [reference: Inlet Channel - Ecuador.xmcd]
W_InletChannel = 20.8275 cm
L_Channel = 2.14 m
ND_SedPipeEntrance = 6 in
N_SedInletPipes = 2
H_InletChannel = 0.640606 m
Q_Plant = 47.551 gal/min
# Sedimentation Tank Effluent Launder:
# [reference: Launder - Ecuador.xmcd]
N_SedLaunderOrifices = 66
ND_SedLaunderEst = 3 in
Q_SedLaunderOrifices = 0.681818 L/min
# Exit Channel:
# [reference: Exit Channel - Ecuador.xmcd]
W_ExitChannel = 0.208275 m
ND_SedLaunder = 3 in
H_ExitChannel = 0.640606 m
L_SedLaunder = 3.35517 m
L_ExitChannel = 2.14 m
D_SedLaunderOrifice = 0.1875 in
H_PltWeir = 0.470519 m
Z_SedLaunder = 1.46555 m
HW_ExitChannel = 0.500606 m
ZW_ExitChannel = 1.51 m
# Lamella:
# [reference: Lamella - Ecuador.xmcd]
L_SedPlate = 0.560614 m
B_SedPlate = 6.28237 cm
S_SedPlate = 5.98237 cm
N_SedPlates = 42
AN_SedPlate = 60 deg
V_SedC = 10.0209 m/day
V_SedUp = 35.9204 m/day
H_SedPlate = 0.485506 m
H_SedAbove = 0.1289 m
# Flow Controller:
# [reference: FCM - Ecuador.xmcd]
N_Fcm = 1
ID_FcmTube = 3.175 mm
ID_FcmTube = 0.125 in
L_FcmTube = 209.132 cm
Q_FcmTubeMax = 135 mL/min
HL_FcmValve = 3.386 cm
# Flocculator:
# [reference: Flocculation - Ecuador.xmcd]
W_FlocChannel = 0.46 m
S_FlocBaffle = [6.1652; 8.71891; 15.1016] cm
B_FlocBaffle = [6.5652; 9.11891; 15.5016] cm
N_FlocBafflesMin = 71
HL_Floc = 6.96052 cm
X_FlocBaffles = [
    0.61, 3.85335, 0.076652;
    0.675652, 3.76216, 0.231668;
    0.741304, 3.60714, 0.386684;
    0.806956, 3.45213, 0.5417;
    0.872608, 3.29711, 0.696716;
    0.93826, 3.14209, 0.851732;
    1.00391, 2.98708, 1.00675;
    1.06956, 2.83206, 1.16176;
    1.13522, 2.67705, 1.31678;
    1.20087, 2.52203, 1.4718
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] m
HW_FlocStart = 1.61961 m
L_FlocBaffles = [
    1.48835, 1.46281, 1.39898;
    1.58835, 1.56281, 1.49898;
    1.48835, 1.39898, 1.39898;
    1.58835, 1.49898, 1.49898;
    1.48835, 1.39898, 1.39898;
    1.58835, 1.49898, 1.49898;
    1.48835, 1.39898, 1.39898;
    1.58835, 1.49898, 1.49898;
    1.48835, 1.39898, 1.39898;
    1.58835, 1.49898, 1.49898
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] m
W_FlocPort = 0.061652 m
H_FlocPort = 1.12677 m
N_FlocBaffles = 91
Z_FlocBaffles = [
    0, 0, 0;
    0.061652, 0.0871891, 0.151016;
    0, 0, 0;
    0.061652, 0.151016, 0.151016;
    0, 0, 0;
    0.061652, 0.151016, 0.151016;
    0, 0, 0;
    0.061652, 0.151016, 0.151016;
    0, 0, 0;
    0.061652, 0.151016, 0.151016
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] m
Gt_FlocMinFlow = 9000.54
N_FlocChannels = 3
# Entrance Tank:
# [reference: EntranceTank- Ecuador.xmcd]
ND_Lfom = 12 in
HL_Rm = 0.898175 cm
N_Lfom = 1
D_LfomOrifices = 9.525 mm
Q_LfomErrorMax = 0.0474448 %
N_LfomOrifices = [59; 19; 20; 14; 12; 12; 9; 10; 9; 9; 8; 7; 8; 7; 7; 7; 6; 6; 7; 5; 7]
L_Et = 1.5 m
W_Et = 0.75 m
HW_EtMin = 0.2 m
HW_EtMax = 0.4 m
H_Et = 2.01961 m
ZW_Et = 1.91961 m
# Any additional needed elevations should be calculated in the files above.
# Elevations:
ZW_ExitChannel = 1.51 m  # Water Level at the end of the plant in the exit channel and exit channel box
HW_Sed = 1.55 m
HW_FlocStart = 1.61961 m  # Water level at the beginning of the floc tank
HL_Floc = 6.96052 cm  # just for ref. the head loss throught the floc tank
ZW_Et = 1.91961 m  # the height of the water in the entrance tank.
# AutoCAD References
# [reference: basics.xmcd]
# [reference: pipe.xmcd]
# [reference: tank.xmcd]
# [reference: lamina.xmcd]
# [reference: laminaplain.xmcd]
# [reference: cross.xmcd]
# [reference: Tee.xmcd]
# [reference: elbow.xmcd]
# [reference: Sludge.xmcd]
# [reference: Channel.xmcd]
# [reference: Manifold.xmcd]
# [reference: SedTankslopes.xmcd]
# [reference: inletslope.xmcd]
# [reference: inletslopetrapezoid.xmcd]
# [reference: chemicalstock.xmcd]
# [reference: Sedimentation Tank.xmcd]
# [component: inputs SedTank]
# [reference: Flocculation Tank.xmcd]
# [component: inputs FlocTank]
# [reference: Entrance Tank.xmcd]
# [component: inputs EntranceTank]
