# Exit Channel Design
# [reference: UserInputs- 1m deep.xmcd]
# [reference: DesignAssumptions-1m deep.xmcd]
# [reference: MathFunctions.xmcd]
# [reference: PipeDatabase.xmcd]
# [reference: MinorLossCoefficients.xmcd]
# [reference: FluidsFunctions.xmcd]
# [reference: Inlet Channel.xmcd]
# [reference: Sedimentation.xmcd]
# [reference: Sed. Inlet Slopes.xmcd]
# [reference: Launder.xmcd]
L_ExitChannel := N_SedTanks*(W_Sed + T_PlantWall)  # The length is based on the side of the sed tank, this is also the same length of the inlet channel.
HW_ExitChannel := HW_InletChannel - HL_SedLaunder  # The water Height in both channels will be the same.
H_ExitChannel := H_InletChannel  # This is the depth of the exit channel.
# To Calculate the Width of the channel the width of the exit weir needs to be determined.
# The weir equation is used to determine the nominal size for the diameter of the weir (Assumes a circular over flow weir)
D_PltWeirEstimated := (3*Q_Plant/(2*Cd_PltWeir*sqrt(2*g)*π*Pi_PltWeir^(3/2)))^(2/5)
# Using the pipe database file, and given the schedule of the pipe, the actual nominal diameter of the pipe is determined
ND_PltWeir := NominalPipeSize(D_PltWeirEstimated) = 6 in
W_ExitChannel := max(W_InletChannel, outerdiameter(ND_PltWeir))
# The width of the exit channel will either be the same as the width of the inlet channel or as wide as the Outer Diameter of the exit weir.
Del_PltWeirH := (3*Q_Plant/(2*Cd_PltWeir*sqrt(2*g)*π*ND_PltWeir))^(2/3)  # Using the inner diameter, the actual spacing above the weir is calculated
H_PltWeir := HW_ExitChannel - Del_PltWeirH  # The actual weir height is determined using the actual inner diameter of the pipe and the weir equation
