# AguaClara Water Treatment Plants
# Automated Design
# User Inputs:
HW_Sed := 3.12 m
# Design References
# [reference: UserInputs- test.xmcd]
# [reference: DesignAssumptions-test.xmcd]
# [reference: MathFunctions.xmcd]
# [reference: PipeDatabase.xmcd]
# [reference: MinorLossCoefficients.xmcd]
# [reference: FluidsFunctions.xmcd]
# Inlet Channel:
N_SedTanks := 4
# [reference: Inlet Channel.xmcd]
W_InletChannel = (0.36385 + 0.680776i) m
L_Channel = 9.236 m
ND_SedPipeEntrance = 12 in
N_SedInletPipes = 8
H_InletChannel = -0.595698 m
Q_Plant = 800 gal/min
# Sedimentation Tanks:
# [reference: Sedimentation-gracias 1W test.xmcd]
N_SedTanks = 4
H_SedBelowSlope = 2.06009 m
H_SedBelowStraight = 0.0762 m
H_SedBetween = 0.0762 m
HW_Sed = 3.12 m
H_Sed = 3.22 m
H_SedBelow = 2.13629 m
L_Sed = 7.21365 m
ND_SedPipeEntrance = 12 in
# Sedimentation Tank Sludge Drain:
# [reference: SludgeDrain.xmcd]
N_SedSludgeOrifices = 72
ND_SedSludge = 6 in
Q_SludgeDrainInitial = 3239.45 L/min
D_SedSludgeOrifice = 0.25 in
# Sedimentation Tank Inlet Slopes:
# [reference: Sed. Inlet Slopes.xmcd]
B_SedInlet = 6.395 cm
H_SedInlet = 8.34807 cm
AN_SedTopInlet = 60 deg
AN_SedBottom = 10 deg
L_SedTopInlet = 2.159 m
A_SedInlet = 9064.58 cm^2
H_SedTopInlet = 186.975 cm
H_SedInletSlopes = 1.96975 m
H_SedBottom = 0.190345 m
# Sedimentation Tank Effluent Launder:
# [reference: Launder.xmcd]
N_SedLaunderOrifices = 126 - 28i
Q_SedLaunderOrifices = (2.86292 + 0.636204i) L/min
# Exit Channel:
# [reference: Exit Channel.xmcd]
W_ExitChannel = (0.36385 + 0.680776i) m
ND_SedLaunder =  # error: This variable is undefined.
H_ExitChannel = -0.595698 m
L_SedLaunder = (6.33595 - 1.36155i) m
L_ExitChannel = 9.236 m
D_SedLaunderOrifice =  # error
H_PltWeir = -0.830667 m
Z_SedLaunder =  # error
HW_ExitChannel = -0.735698 m
# Lamella:
# [reference: Lamella.xmcd]
L_SedPlate =  # error
B_SedPlate =  # error
S_SedPlate =  # error
N_SedPlates =  # error
AN_SedPlate = 60 deg
V_SedC =  # error
V_SedUp = 70 m/day
H_SedPlate =  # error
H_SedAbove =  # error
# Flow Controller:
# [reference: FCM.xmcd]
N_Fcm = 6
ID_FcmTube = 4.318 mm
ID_FcmTube = 0.17 in
L_FcmTube = 255.151 cm
Q_FcmTubeMax = 378.541 mL/min
HL_FcmValve = 26.6223 cm
# Flocculator:
# [reference: Flocculation.xmcd]
W_FlocChannel = 1.0795 m
S_FlocBaffle = [0.229659; 0.274731; 0.364221; 0.935701] m
B_FlocBaffle = [0.233659; 0.278731; 0.368221; 0.939701] m
N_FlocBafflesMin = 27
HL_Floc = 8.31788 cm
X_FlocBaffles =  # error
HW_FlocStart = 3.20318 m
W_FlocPort = 0.935701 m
L_FlocBaffles =  # error
H_FlocPort = 1.0795 m
N_FlocBaffles =  # error
Z_FlocBaffles =  # error
Gt_FlocMinFlow =  # error
N_FlocChannels = 3
# Entrance Tank:
# [reference: EntranceTank.xmcd]
ND_Lfom = 20 in
HL_Rm = 0.890191 cm
N_Lfom = 1
D_LfomOrifices = 52.3875 mm
Q_LfomErrorMax = 0.74575 %
N_LfomOrifices = [5; 4; 3; 2; 2; 2; 1; 2; 1; 1]
L_Et = 1.0795 m
W_Et = 1.0795 m
HW_EtMin = 0.2 m
HW_EtMax = 0.4 m
H_Et = 0.5 m
ZW_Et = 3.45318 m
# Any additional needed elevations should be calculated in the files above.
# AutoCAD References
# [reference: basics.xmcd]
# [reference: pipe.xmcd]
# [reference: tank.xmcd]
# [reference: lamina.xmcd]
# [reference: cross.xmcd]
# [reference: Tee.xmcd]
# [reference: elbow.xmcd]
# [reference: Sludge.xmcd]
# [reference: Channel.xmcd]
# [reference: Manifold.xmcd]
# [reference: SedTankslopes.xmcd]
# [reference: Sed Tank Inlet Slope.xmcd]
# [reference: chemicalstock.xmcd]
# [reference: Sedimentation Tank.xmcd]
# [component: inputs SedTank]
# [reference: Flocculation Tank.xmcd]
# [component: inputs FlocTank]
# [reference: Entrance Tank.xmcd]
# [component: inputs EntranceTank]
