# AguaClara Water Treatment Plants
# Automated Design
# User Inputs:
HW_Sed := 2.3 m
# Design References
# [reference: PipeDatabase.xmcd]
# [reference: UserInputs- Gracias.xmcd]
# [reference: DesignAssumptions- Gracias.xmcd]
# [reference: MathFunctions.xmcd]
# [reference: MinorLossCoefficients.xmcd]
# [reference: FluidsFunctions.xmcd]
# Sedimentation Tanks:
# [reference: Sedimentation - Gracias.xmcd]
N_SedTanks = 3
H_SedBetween = 0.060325 m
HW_Sed = 2.3 m
H_Sed = 2.4 m
L_Sed = 9.6182 m
# Sedimentation Tank Sludge Drain:
# [reference: SludgeDrain.xmcd]
N_SedSludgeOrifices = 96
ND_SedSludge = 6 in
Q_SludgeDrainInitial = 3184.07 L/min
D_SedSludgeOrifice = 0.3125 in
# Height Dimensions within Sedtank
H_SedBelowSlope := .5*W_Sed/N_SlopePairs*tan(AN_SedTopInlet) + T_SedInletSlope/cos(AN_SedTopInlet) + outerdiameter(ND_SedSludge) = 1.20315 m
# This depth of the sloped bottom
H_SedBelow := H_SedBelowSlope + H_SedBetween = 1.26347 m  # the entire area under the lamella will be a part of the sloped bottom
# Inlet Channel:
# [reference: Inlet Channel.xmcd]
W_InletChannel = 0.764053 m
L_Channel = 6.927 m
ND_SedPipeEntrance = 20 in
N_SedInletPipes = 4
H_InletChannel = 1.04685 m
Q_Plant = 800 gal/min
G_FlocMin := 10/s
AN_SedTopInlet := 80 deg
# Sedimentation Tank Inlet Slopes:
AN_SedBottom := 33 deg
# [reference: Sed. Inlet Slopes- minV.xmcd]
B_SedInlet = 2.68876 cm
L_SedTopFilled = 0.0520643 m
H_SedInlet = 3.67642 cm
W_SlopesFilled = 0.00904088 m
A_Inlet = 0.353605 m^2
L_SedBottomFilled = 0.01078 m
A_SedInlet = 0.707211 m^2
L_SedTopInlet = 3.1083 m
AN_SedTopInlet = 80 deg
AN_SedBottom = 33 deg
H_SedTopSlope = 3.06107 m
A_SedInletTotal = 0.731511 m^2
A_SedInletActual = 0.730981 m^2
L_SedBottom = 0.643578 m
H_SedBottomSlope = 0.350518 m
Z_SedSlopes = 3.51729 m
L_SedTopInlet = 3.1083 m
W_SlopesOpen = 0.530709 m
# Sedimentation Tank Effluent Launder:
# [reference: Launder.xmcd]
N_SedLaunderOrifices = 158
Q_SedLaunderOrifices = 1.59722 L/min
# Exit Channel:
# [reference: Exit Channel.xmcd]
W_ExitChannel = 0.764053 m
ND_SedLaunder = 6 in
H_ExitChannel = 1.04685 m
L_SedLaunder = 7.94009 m
L_ExitChannel = 6.927 m
D_SedLaunderOrifice = 0.375 in
H_PltWeir = 0.811882 m
Z_SedLaunder = 2.17586 m
HW_ExitChannel = 0.906851 m
ZW_ExitChannel = 2.26 m
# Lamella:
# [reference: Lamella.xmcd]
L_SedPlate = 0.956381 m
B_SedPlate = 5.00889 cm
S_SedPlate = 4.70889 cm
N_SedPlates = 128
AN_SedPlate = 60 deg
V_SedC = 10.008 m/day
V_SedUp = 70 m/day
H_SedPlate = 0.828251 m
H_SedAbove = 0.208275 m
# Flow Controller:
# [reference: FCM.xmcd]
N_Fcm = 6
ID_FcmTube = 4.318 mm
ID_FcmTube = 0.17 in
L_FcmTube = 255.151 cm
Q_FcmTubeMax = 378.541 mL/min
HL_FcmValve = 26.6223 cm
# Flocculator:
# [reference: Flocculation.xmcd]
W_FlocChannel = 1.0795 m
S_FlocBaffle = [0.229659; 0.274731; 0.364221; 0.935701] m
B_FlocBaffle = [0.233659; 0.278731; 0.368221; 0.939701] m
N_FlocBafflesMin = 27
HL_Floc = 8.31788 cm
Z_FlocBaffles = [
    0, 0;
    0.229659, 0.935701;
    0, 0;
    0.229659, 0.935701;
    0, 0;
    0.229659, 0.935701;
    0, 0;
    0.274731, 0.935701;
    0, 0;
    0.274731, 0;
    0, 0;
    0.364221, 0;
    0, 0;
    0.364221, 0;
    0, 0;
    0.364221, 0;
    0, 0;
    0.935701, 0;
    0, 0
] m
X_FlocBaffles = [
    1.2295, 8.6675;
    1.46316, 7.72779;
    1.69682, 6.78809;
    1.93048, 5.84839;
    2.16414, 4.90869;
    2.39779, 3.96899;
    2.67653, 3.02929;
    2.95526, 2.08959;
    3.23399, 1.14989;
    3.51272, 0;
    3.79145, 0;
    4.15967, 0;
    4.52789, 0;
    4.89611, 0;
    5.26434, 0;
    5.63256, 0;
    6.57226, 0;
    7.51196, 0;
    8.45166, 0
] m
L_FlocBaffles = [
    2.07034, 1.3643;
    2.17034, 1.4643;
    2.07034, 1.3643;
    2.17034, 1.4643;
    2.07034, 1.3643;
    2.17034, 1.4643;
    2.02527, 1.3643;
    2.12527, 1.4643;
    2.02527, 1.3643;
    2.12527, 0;
    2.02527, 0;
    2.03578, 0;
    1.93578, 0;
    2.03578, 0;
    1.93578, 0;
    2.03578, 0;
    1.3643, 0;
    1.4643, 0;
    1.3643, 0
] m
HW_FlocStart = 2.38318 m
W_FlocPort = 0.935701 m
H_FlocPort = 1.0795 m
N_FlocBaffles = 28
Gt_FlocMinFlow = 7415.12
N_FlocChannels = 2
# Entrance Tank:
# [reference: EntranceTank.xmcd]
ND_Lfom = 20 in
HL_Rm = 0.890191 cm
N_Lfom = 1
D_LfomOrifices = 52.3875 mm
Q_LfomErrorMax = 0.74575 %
N_LfomOrifices = [5; 4; 3; 2; 2; 2; 1; 2; 1; 1]
L_Et = 3 m
W_Et = 1.5 m
HW_EtMin = 0.2 m
HW_EtMax = 0.4 m
H_Et = 2.78318 m
ZW_Et = 2.68318 m
# Any additional needed elevations should be calculated in the files above.
# Elevations:
ZW_ExitChannel = 2.26 m  # Water Level at the end of the plant in the exit channel and exit channel box
HW_Sed = 2.3 m
HW_FlocStart = 2.38318 m  # Water level at the beginning of the floc tank
HL_Floc = 8.31788 cm  # just for ref. the head loss throught the floc tank
ZW_Et = 2.68318 m  # the height of the water in the entrance tank.
Z_Mp := (HW_Sed - HW_InletChannel)
# AutoCAD References
# [reference: basics.xmcd]
# [reference: pipe.xmcd]
# [reference: tank.xmcd]
# [reference: lamina.xmcd]
# [reference: cross.xmcd]
# [reference: Tee.xmcd]
# [reference: elbow.xmcd]
# [reference: Sludge.xmcd]
# [reference: Channel.xmcd]
# [reference: Manifold.xmcd]
# [reference: SedTankslopes.xmcd]
# [reference: Sed Tank Inlet Slope.xmcd]
# [reference: chemicalstock.xmcd]
# [reference: Sedimentation Tank.xmcd]
# [component: inputs SedTank]
# [reference: Flocculation Tank.xmcd]
# [component: inputs FlocTank]
# [reference: Entrance Tank.xmcd]
# [component: inputs EntranceTank]
