# AguaClara Water Treatment Plants -- Gracias
# Automated Design
# User Inputs:
HW_Sed := 2 m
# Design References
# [reference: UserInputs- Gracias.xmcd]
# [reference: DesignAssumptions- Gracias.xmcd]
# [reference: MathFunctions -Gracias.xmcd]
# [reference: PipeDatabase - Gracias.xmcd]
# [reference: MinorLossCoefficients - Gracias.xmcd]
# [reference: FluidsFunctions - Gracias.xmcd]
# Sed Tanks and Slopes:
# [reference: Influent sed manifold - Gracias.xmcd]
N_SedTanks = 3
H_SedBetween = 0.0762 m
B_SedPort = 6.20839 cm
.
L_Sed = 4.76411 m
L_SedPort = 7.16883 cm
W_SedPort = 6.20839 cm
N_SlopePairs = 4
B_SedPort = 6.20839 cm
W_Sed = 4.318 m
N_SedPorts = 17
ND_SedPipeEntrance = 20 in
# H.SedRectangle needs to be greater than H.SedPort
Π_SedCell = 2
L_Sed = 4.76411 m  # L.Sed should always be less than L.SedMax
L_SedMax = 5.22812 m
# Sedimentation Tank Sludge Drain:
# [reference: SludgeDrain-Gracias.xmcd]
N_SedSludgeOrifices = 31
Time_SludgeDrain = 0.481677 hr
ND_SedSludge = 3 in
Q_SludgeDrainInitial = 22.9613 L/min
D_SedSludgeOrifice = 0.4375 in
# Sedimentation Tank Dimensions:
# [reference: Sedimentation Dimensions - Gracias.xmcd]
H_SedBottomSlope = 0.0237931 m
H_SedTopSlope = 0.126186 m
H_SlopeRectangle = 0.08 m
Z_SedSlopes = 0.395086 m
H_Sed = 2.1 m
W_Sed = 4.318 m
# Inlet Channel:
# [reference: Inlet Channel - Gracias.xmcd]
W_InletChannel = 54.8 cm
L_Channel = 13.404 m
ND_SedPipeEntrance = 20 in
N_SedInletPipes = 2
H_InletChannel = 1.55491 m
Q_Plant = 792.516 gal/min
# Sedimentation Tank Effluent Launder:
# [reference: Launder - Gracias.xmcd]
N_SedLaunderOrifices = 70
Q_SedLaunderOrifices = 7.14286 L/min
# Exit Channel:
# [reference: Exit Channel - Gracias.xmcd]
W_ExitChannel = 0.548 m
ND_SedLaunder = 8 in
H_ExitChannel = 1.55491 m
L_SedLaunder = 3.51811 m
L_ExitChannel = 13.404 m
D_SedLaunderOrifice = 0.625 in
H_PltWeir = 1.32054 m
Z_SedLaunder = 1.85046 m
HW_ExitChannel = 1.41491 m
ZW_ExitChannel = 1.96 m
# Lamella:
# [reference: Lamella - Gracias.xmcd]
L_SedPlate = 1.46605 m
B_SedPlate = 5.4207 cm
S_SedPlate = 5.1207 cm
N_SedPlates = 44
AN_SedPlate = 60 deg
V_SedC = 10.0265 m/day
V_SedUp = 70 m/day
H_SedPlate = 1.26964 m
H_SedAbove = 0.259075 m
# Flow Controller:
# [reference: FCM - Gracias.xmcd]
N_Fcm = 6
ID_FcmTube = 4.318 mm
ID_FcmTube = 0.17 in
L_FcmTube = 257.56 cm
Q_FcmTubeMax = 375 mL/min
HL_FcmValve = 26.1265 cm
# Flocculator:
# [reference: Flocculation - Gracias.xmcd]
W_FlocChannel = 2.159 m
S_FlocBaffle = [15.9482; 22.5542; 39.065] cm
B_FlocBaffle = [16.3482; 22.9542; 39.465] cm
N_FlocBafflesMin = 38
HL_Floc = 6.55826 cm
X_FlocBaffles = [
    2.309, 4.58963, 0.174482;
    2.47248, 4.36009, 0.569133;
    2.63596, 4.13054, 0.963783;
    2.79945, 3.901, 1.35843;
    2.96293, 3.67146, 1.75308;
    3.12641, 3.44192, 2.14773;
    3.28989, 3.21238, 2.54239;
    3.45338, 2.98283, 2.93704;
    3.61686, 2.75329, 3.33169;
    3.78034, 2.35864, 3.72634;
    3.94382, 1.96399, 4.12099;
    4.17337, 1.56934, 0;
    4.40291, 1.17469, 0;
    0, 0.780039, 0;
    0, 0.385388, 0
] m
HW_FlocStart = 2.06558 m
L_FlocBaffles = [
    1.84052, 1.77446, 1.60935;
    1.94052, 1.87446, 1.70935;
    1.84052, 1.77446, 1.60935;
    1.94052, 1.87446, 1.70935;
    1.84052, 1.77446, 1.60935;
    1.94052, 1.87446, 1.70935;
    1.84052, 1.77446, 1.60935;
    1.94052, 1.87446, 1.70935;
    1.84052, 1.77446, 1.60935;
    1.94052, 1.70935, 1.70935;
    1.84052, 1.60935, 1.60935;
    1.87446, 1.70935, 0;
    1.77446, 1.60935, 0;
    0, 1.70935, 0;
    0, 1.60935, 0
] m
W_FlocPort = 0.159482 m
H_FlocPort = 5.28845 m
N_FlocBaffles = 39
Z_FlocBaffles = [
    0, 0, 0;
    0.159482, 0.225542, 0.39065;
    0, 0, 0;
    0.159482, 0.225542, 0.39065;
    0, 0, 0;
    0.159482, 0.225542, 0.39065;
    0, 0, 0;
    0.159482, 0.225542, 0.39065;
    0, 0, 0;
    0.159482, 0.39065, 0.39065;
    0, 0, 0;
    0.225542, 0.39065, 0;
    0, 0, 0;
    0, 0.39065, 0;
    0, 0, 0
] m
Gt_FlocMinFlow = 7268.9
N_FlocChannels = 3
# Entrance Tank:
# [reference: EntranceTank- Gracias.xmcd]
ND_Lfom = 12 in
HL_Rm = 0.898175 cm
N_Lfom = 1
D_LfomOrifices = 9.525 mm
Q_LfomErrorMax = 0.0474448 %
N_LfomOrifices = [59; 19; 20; 14; 12; 12; 9; 10; 9; 9; 8; 7; 8; 7; 7; 7; 6; 6; 7; 5; 7]
L_Et = 1.5 m
W_Et = 0.75 m
HW_EtMin = 0.2 m
HW_EtMax = 0.4 m
H_Et = 2.46558 m
ZW_Et = 2.36558 m
# Any additional needed elevations should be calculated in the files above.
# Elevations:
ZW_ExitChannel = 1.96 m  # Water Level at the end of the plant in the exit channel and exit channel box
HW_Sed = 2 m
HW_FlocStart = 2.06558 m  # Water level at the beginning of the floc tank
HL_Floc = 6.55826 cm  # just for ref. the head loss throught the floc tank
ZW_Et = 2.36558 m  # the height of the water in the entrance tank.
# AutoCAD References
# [reference: basics.xmcd]
# [reference: pipe.xmcd]
# [reference: tank.xmcd]
# [reference: lamina.xmcd]
# [reference: laminaplain.xmcd]
# [reference: cross.xmcd]
# [reference: Tee.xmcd]
# [reference: elbow.xmcd]
# [reference: Sludge.xmcd]
# [reference: Channel.xmcd]
# [reference: Manifold.xmcd]
# [reference: SedTankslopes.xmcd]
# [reference: inletslope.xmcd]
# [reference: inletslopetrapezoid.xmcd]
# [reference: chemicalstock.xmcd]
# [reference: Sedimentation Tank.xmcd]
# [component: inputs SedTank]
# [reference: Flocculation Tank.xmcd]
# [component: inputs FlocTank]
# [reference: Entrance Tank.xmcd]
# [component: inputs EntranceTank]
