# [reference: userinputs.xmcd]
# [reference: DesignAssumptions.xmcd]
# [reference: PipeDatabase.xmcd]
# [reference: FluidsFunctions.xmcd]
# Solution steps
# calculate diameter of rapid mix pipe. All riser pipes then take on this value to make connections easier
# Calculate number of riser pipes based on some sort of flow max for a given riser pipe diameter. Currently we are using the notion that an orifice at 20 cm carrying all of the water into the riser pipe must be less than 1/3 the area of the riser pipe.
# Design the orifice pattern for each riser pipe (note that an alternate solution would be to design standard riser pipe designs and then simply pick one of those designs. Thus a 3" pipe might be a 100 L/min Linear Flow Orifice Meter.
# Rapid mix pipe diameter
D_GritRiser := D_pipeschedule(Q_plant, PipeSpecification, h_lrapidmix, L_rmpipe, ν, ε_pvc, K_sum(0, n_elbowsrapid, 0, n_trapid, 0, 0, 0, 0, 0)) = 4 in
# returns nominal pipe size
# Number of risers
totalorificearea := A_orifice(h_lflowmeter, K_orifice, Q_plant) = 0.00400718 m^2
A_circle(D_circle)
# Gives an array of the vertical location of each set of holes given hole spacing and the maximum head:
ramp(interval, range) :=
    for i ∈ 0 .. range/interval
        ramp[i] ← i*interval
    return ramp
# ok
# This function provides the flow rate for a given head.  Requires an array with hole numbers at each level up to the current head level.
Q(h, n, Orifice_spacing, A_drillbit, K_orifice) :=
    Q ← 0
    return Q if h == 0
    otherwise
        levels ← floor(h/Orifice_spacing)
        Q ← Q + K_orifice*A_drillbit*n[0]*sqrt(2*g*h) if levels == 0
        otherwise
            for i ∈ 0 .. levels - 1
                Q ← Q + K_orifice*A_drillbit*n[i]*sqrt(2*g*(h - Orifice_spacing*i))
        return Q
# ok
# This returns an array with the number of holes required to create a linear relationship between flow and depth at each vertical orifice spacing:
N_holes(h_grit, Base, MaxHeadChange, Orifice_spacing, FirstFlow, A_drillbit, K_orifice) :=
    n_holes[0] ← Base
    for p ∈ 1 .. MaxHeadChange/Orifice_spacing - 1
        n_holes[p] ← 0
        while Q(h_grit[p + 1], n_holes, Orifice_spacing, A_drillbit, K_orifice) ≤ FirstFlow*(p + 1)
            n_holes[p] ← n_holes[p] + .1
        n_holes[p] ← round(n_holes[p])
    return n_holes
# ok
# Given the number of holes at each vertical orifice spacing above, what are the actual flow rates when the water reaches just below each set of holes?
OurFlows(h, n, Orifice_spacing, A_drillbit, K_orifice) :=
    for i ∈ 0 .. length(h) - 1
        Flows[i] ← Q(h[i], n, Orifice_spacing, A_drillbit, K_orifice)
    return Flows  # ok
# Inner Diameter of each riser
# ok - assuming pipe database is correct
ID_riser := D_pipe(Q_plant, AvailPipeSizes(PipeSpecification)[:, 0], h_lrapidmix, L_rmpipe, ν, ε_pvc, K_sum(0, n_elbowsrapid, 0, n_trapid, 0, 0, 0, 0, 0))
# where is K.sum?
ID_riser = 3.626 in
# K.sum is in the Pipe Design and Minor Loss Coefficients file
# Number of risers
n_GritRisers := ceil(4*A_orifice(h_lflowmeter, K_orifice, Q_plant)/(π*D_pipe(Q_plant, AvailPipeSizes(PipeSpecification)[:, 0], h_lrapidmix, L_rmpipe, ν, ε_pvc, K_sum(0, n_elbowsrapid, 0, n_trapid, 0, 0, 0, 0, 0))^2*A_ratio))
# so this is the area of a pipe available for orifices divided by the max number of holes at one vertical spacing, right?
# An array of desired flowrates through plant at each orifice spacing
# i don't have a clue where this equation came from. I'm going to assume it's right, but you might want to comment an explanation here or on the wiki...
Q_ideal := ramp(Orifice_spacing, h_lrapidmix)*Q_plant/h_lflowmeter
# This equation is based on y=mx + b assuming that a x=0 we want a flow = 0 and at the highest vertical spacing x=20 cm we want flow = Q.plant. I will put this on the wiki.
# Actual flowrate through plant given headloss through risers??
Q_actual := Q_plant/(h_lrapidmix/Orifice_spacing)
# should this equation us h.lorificemax rather than h.lmax? this equation could use a bit more clarification somewhere also...
# Array of drill bit diameters based on english and metric drill sets. The min and max diameter was determined based on a nonlinear flow measurement design function.
i := 0 .. 15
j := 0 .. 24
D_engdrill[i] := 1/8*(i + 1)*in
D_metdrill[j] := 2*(j + 2)*mm
D_engdrill = [0.125; 0.25; 0.375; 0.5; 0.625; 0.75; 0.875; 1; 1.125; 1.25; 1.375; 1.5; 1.625; 1.75; 1.875; 2] in
D_metdrill = [4; 6; 8; 10; 12; 14; 16; 18; 20; 22; 24; 26; 28; 30; 32; 34; 36; 38; 40; 42; 44; 46; 48; 50; 52] mm
# Determine which array of drillbit sizes to use based on type of drill set (english or metric)
D_drill :=
    D_engdrill if DrillSeries == 1
    D_metdrill otherwise
Q_error := 1
# Initial error between ideal and actual
# flow rates in grit chamber. This allows for the while loop to be entered initially.
# This function calculates the orifice diameter and creates an array of the number of orifices at each vertical spacing.
Riser_orifices :=
    i ← last(D_drill)
    while Q_error > Max_error
        A_drillbit ← π*D_drill[i]^2/4
        h_orifice ← Orifice_spacing - D_drill[i]/2
        BaseHoles ← round(Q_actual/Q_orifice(D_drill[i], h_orifice, K_orifice))
        n_orifices ← N_holes(heads(Orifice_spacing, h_lrapidmix), BaseHoles, h_lrapidmix, Orifice_spacing, Q_actual, A_drillbit, K_orifice)
        Q_error ← max(|OurFlows(heads(Orifice_spacing, h_lrapidmix), n_orifices, Orifice_spacing, A_drillbit, K_orifice) - Q_ideal|)/Q_plant
        i ← i - 1
        break if i == 0
    return [D_drill[i + 1]/m, n_orifices]
# The largest drill bit diameter is choosen. This function will then choose a smaller drill bit size if the error between the actual flow rate at and ideal flow rate at each vertical space is too large.
# A.drillbit is the area of a single orifice calculated.
# h.orifice the difference in height between vertical spacing is recaulculated based on the diameter of the drillbit. More specifically this is the distance between the center of the bottom orifice and the bottom of the orifice above it. Refer to the wiki for clarification.
# BaseHoles is the number of orifices at the first vertical space at the base of the riser.
# The number of orifices is at the remaining vertical spacings is calcultated.
# Q.error is the error between the actual flow rate and the ideal flow rate at each vertical spacing. This is normalized by the plant flow rate.
# Max.error is the max allowable error between the desired flow rate and the actual flowrate
D_gritOrf := Riser_orifces[0]
n_GritOrf := Riser_orifces[1]
# A.drillbit is the area of the orifice
# BaseHoles is the number of orfices in the first vertical spacing of the riser
Riser_orifices =  # error: This variable is undefined.
# n orifices is the number of orifices at each vertical spacing
# Q.actual is the actual flowrate
# Q.error is calculating the error between actual and desired flowrates
# why is the error term divided by Q.plant rather than Q.ideal?
# how would i ever by equal to its initial value after going though this loop. what does this line do since it never actually assigns anything a value?
# You are right it won't. I have made this change.
# this function could use some simple sketches uploaded to the wiki to make sure everyone is on the same page about which dimensions we are discussing...
# I have updated the wiki with a sketch for determing the water level and therefore the depth of the grit chamber.
# so are all those connections really inside the grit chamber? I don't really understand how everything is connected?
# Nominal Pipe Size of each riser. This will also be the size of rapid mix pipe.
# I made the mistake in including the connections in the grit chamber in the head loss calculations. You only need to consider the headloss in the rapid mix pipe which results from 3 elbows. I have made this updated to the K.sum inputs.
# Are we sure that they won't want to put the chem strorage drums side by side?
D_GritRiser := NominalDiameter(ID_riser, PipeSpecification)
# so is length really just going to be a design assumption? At some point doesn't the grit chamber design need to account for the capacity we need based on flowrate and what not?
# These are like design assumptions but did not include in the diseign assumptions file to prevent cluttering. This may need to be changed.
# have the master program send the grit chamber the water level in the sed tank
# I have updated the length based on the new configuration.
n_elbowsgritdim := 2  # The number of elbows needed to calculate the width and length of the grit chamber.
n_risersgritdim := 2  # The number of pipe diameters needed to calculate the width and length of the grit chamber.
n_tgritdim := 1  # The number of tees needed to calculate the width and length of the grit chamber.
# The length of the grit chamber is calculated as the length of the tees and elbows needed for the risers in addition to some extra space (grit extra length) to allow for the riser to be assembled into the grit chamber.
grit_length := (n_tgritdim + grit_extralength)*TeeLength(NominalDiameter(ID_riser, PipeSpecification)) + n_elbowsgritdim*ElbowRadius(NominalDiameter(ID_riser, PipeSpecification)) + n_risersgritdim*D_riser
# Caluculates the width of the grit chamber as the larger of the width of the chemical feed platform and the width of the riser pipes.
grit_width :=
    return 2*r_drum + chemplatform_addwidth if (n_tgritdim + grit_extralength)*TeeLength(NominalDiameter(ID_riser, PipeSpecification)) + n_elbowsgritdim*ElbowRadius(NominalDiameter(ID_riser, PipeSpecification)) < 2*r_drum + chemplatform_addwidth
    (n_tgritdim + grit_extralength)*TeeLength(NominalDiameter(ID_riser, PipeSpecification)) + n_elbowsgritdim*ElbowRadius(NominalDiameter(ID_riser, PipeSpecification)) otherwise
# changed h.grit to h.lmax to output max. headloss through orifices
# instead of an array of orifice heights.
# The depth of the grit chamber is calculated starting from the depth of the sed tank plus the headloss through flocculator plus headloss through rapid mix pipe, plus the height of a tee, the height of half an orifice diameter, plus the height of the riser itself, and freeboard
grit_depth(floc_headloss, sedwater_level, Z_platform) := sedwater_level + floc_headloss + h_e(Q_plant, ID_riser, K_sum(0, n_elbowsrapid, 0, n_trapid, 0, 0, 0, 0, 0)) + TeeLength(NominalDiameter(ID_riser, PipeSpecification)) + .5*Riser_orifices[:, 0]*m + h_lrapidmix + freeboard_grit - Z_platform
grit_dim := [grit_length; grit_width; grit_depth(floc_headloss, sedwater_level, Z_platform)]
# The height of the riser is the same as the depth of the grit chamber
h_riser := grit_depth(floc_headloss, sedwater_level, Z_platform)
# didn't you already make this assignment above?
# didn't you already assign D.riser() to this. it would be simpler to now just assign D.riser to D.riser() as you did with n.risers
# I have made this change.
