# Inlet Slopes
# [reference: UserInputs-sestest.xmcd]
# [reference: DesignAssumptions-sestest.xmcd]
# [reference: MathFunctions.xmcd]
# [reference: PipeDatabase.xmcd]
# [reference: MinorLossCoefficients.xmcd]
# [reference: FluidsFunctions.xmcd]
# [reference: Channel-sestest.xmcd]
# [reference: Sedimentation.xmcd]
# Variables that needs to be added to User inputs and Design Assumptions
# Relative Outputs from other Programs
# Length of sed tank:
L_Sed = 2.88751 m
N_Inlets := 2
# Width Sed Tank:
W_Sed = 1 m
# Plant Flow Rate:
Q_Sed = 126.667 L/min
PI_JetDissipation := 5
# Flow rate through each manifold:
Q_man := Q_Sed/N_Inlets = 1055.56 cm^3/s
# Angle of ferrocement:
An_ferro := 45 deg  # Angle of the top panel of the entrance channel
# Angle of bottom:
AN_Bottom := 10 deg
# Height of ferrocement:
H_ferro := .5*W_Sed*tan(An_ferro) = 0.5 m
# Number of port holes:
n := 50
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# Length of ferrocement:
L_ferro := .5*W_Sed/cos(An_ferro) = 0.707107 m
# Size of each port hole:
# Height of bottom:
H_bottom := .5*W_Sed*tan(AN_Bottom) = 0.0881635 m
# Effective size of port holes:
PI_Cell := 2
# Length of bottom:
L_bottom := .5*W_Sed/cos(AN_Bottom) = 0.507713 m
# Target G
G_avg := 10*1/sec
K := 2.5
# Area of manifold
A_man := W_Sed/4*(H_ferro - H_bottom) = 0.102959 m^2
# Wetted perimeter
P_wetted := (H_ferro - H_bottom) + L_ferro + L_bottom = 1.62666 m
# Hydraulic Diameter:
D_ManHydraulic := 4*A_man/P_wetted = 0.25318 m
V_G := G_avg^(1/2)*(2*Nu_Water*PI_Cell*Q_man/(K*L_Sed))^(1/4) = 1.55514 cm/s  # Velocity needed to get target G
W_rectPort := Q_man/(V_G*L_Sed) = 2.35065 cm
# Hydraulic Radius:
R_hTri := A_man/P_wetted = 0.0632949 m
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# Initial velocity in manifold:
V_man := Q_man/A_man
V_man^2/(2*g) = 0.000535898 cm
B_Inlet := Q_man/(V_G*L_Sed) = 0.0235065 m
D_Gf(Q, G_avg, n, PI_JD, nu) := (64/2*1/(G_avg^2*nu*PI_JD)*(Q/(π*n))^3)^(1/7)
D_Gf(Q_Sed, G_avg, n, PI_JetDissipation, Nu_Water) = 1.5629 in
n_test := 10
D_G := D_Gf(Q_man, G_avg, n_test, PI_JetDissipation, Nu_Water) = 2.3146 in
# Port diameter needed to get target G given n & Q
ε := 0.12 mm
A_circle(D_G) = 0.00271463 m^2
3 m/50 = 0.06 m
Q_MultiplePort(Q_man, A_man, D_ManHydraulic, L_man, D_G, n) :=
    Q_port[0] ← Q_man/n
    loops ← 0
    error ← 1
    H_man[0] ← h_orifice(D_G, .62, Q_port[0])
    V[0] ← Q_man/A_man
    while |error| > 0.01 and loops < 200
        for i ∈ 1 .. n
            V[i] ← V[i - 1] - Q_port[i - 1]/A_man
            H_expansion ← V[i]*Q_port[i - 1]/(g*A_man)
            H_friction[i] ← h_f(V[i]*A_man, D_ManHydraulic, L_man/n, Nu_Water, ε)
            H_man[i] ← H_man[i - 1] - H_friction[i]
            Q_port[i] ← Q_orifice(D_G, H_man[i], 0.62)
        error ← (sum(Q_port) - Q_man)/Q_man
        H_man[0] ← (error + 1)^-2*H_man[0] if error > 0
        H_man[0] ← 2*H_man[0] otherwise
        loops ← loops + 1
    return V  # If we assume that the manifold is divided into 10 sections
N_sec := 10
L_ManSec := L_Sed/N_sec = 0.288751 m
A_port := L_ManSec*W_rectPort = 0.00678753 m^2
Re_Tri := 3*V_man*R_hTri/Nu_Water = 1946.73
f_Tri :=
    f ← 0.25/log(ε/(3.7*3*R_hTri) + 5.74/Re_Tri^0.9)^2 if Re_Tri > Re_pipetransition
    f ← 64/Re_Tri otherwise
    return f
    = 0.0328756
H_lTri := f_Tri*L_ManSec/(3*R_hTri)*V_man^2/(2*g) = 2.6791e-5 cm
A_man = 1029.59 cm^2
A_man/(W_rectPort*L_Sed) = 1.51689
Pi_VenaContractaOrifice := 0.61
Q_rectPort := Q_man/n_test = 0.000105556 m^3/s
V_rectPort := Q_rectPort/A_man = 0.00102522 m/s
h_orificeTri := (V_rectPort/Pi_VenaContractaOrifice)^2*1/(2*g) = 1.4402e-5 cm
