# [reference: UserInputs-sestest.xmcd]
# [reference: DesignAssumptions-sestest.xmcd]
# [reference: MathFunctions.xmcd]
# [reference: PipeDatabase.xmcd]
# [reference: MinorLossCoefficients.xmcd]
# [reference: FluidsFunctions.xmcd]
# [reference: Channel-sestest.xmcd]
W_Channel = 0.170996 m
# This program produces the critical parameters for a single sed tank. All sed tanks are built identically.
Q_Sed := Q_Plant/N_SedTanks = 133.333 L/min
# Each tank should have the same flowrate. The total space below the tank is 1 m (design assumption). Part of this space will have sloped walls (to help with draining) and part might have
# straight walls. The length of the sloped walls is determined by the tank width and the
# slope of the walls (they should be between 45 and 60 deg). The space between the top
# of the plate settlers and the water surface is equal to .25*spacing between adjacent launders.
# Since each tank has 1 launderer, the space between adjacent ones is equal to the tank width.
# This should ensure equal flow of effluent through these pipes. The depth of the middle section of
# the tank is determined by the length and slope of the plate settlers. The total depth of the tank is
# equal to the sum of these three depths, plus a freeboard depth. Freeboard space is empty space between the top of the tank and the water surface
H_SedBelowSlope := (W_Sed/2)*tan(AN_SedBottom) = 0.5 m
H_SedBelowStraight := (H_SedBelow - H_SedBelowSlope) = 5.55112e-17 m
H_SedAbove := Pi_SedAboveW*W_Sed = 0.112 m
H_SedPlate := L_SedPlateEstimated*sin(AN_SedPlate) = 0.380012 m
HW_Sed := (H_SedPlate + H_SedAbove + H_SedBelow) = 0.992012 m
H_Sed := (HW_Sed + H_PlantFreeboard) = 1.09201 m
Z_Mp := (HW_Sed - HW_Channel)
# The critical velocity is calculated and verfied against a max value. If the critical
# velocity is too large, some of the particles will not settle out in the sed tank.
# We need to make sure that both design constraints are met.
# VSedUp is based on the entire area in the bottom of the sed tank
# VSedC is based on the plate settlers.
# Calculate the inactive Length of the tank
L_SedVUp := Q_Sed/(V_SedUpBod*W_Sed) = 2.74286 m
# Note: the 0 in this function manifold function is assuming that there are no minor losses in the system
# and thus the minor loss coefficient is 0.
ND_LaunderEstimated := ND_Manifold(Q_Sed, HL_SedLaunderBod, L_SedVUp, Pi_QLaunderOrifices, EN_PipeSpec, Nu_Water, E_Pvc, 0, L_SedVUp/B_SedLaunderOrifices)
L_SedInactive := L_SedPlateEstimated*cos(AN_SedPlate) + W_Channel + T_ChannelWall + ND_LaunderEstimated = 0.616596 m
# Calculate minimum number of plate settlers
V_SedUpActiveMax := V_SedCBod*(1 + L_SedPlateEstimated/(B_SedPlate - T_SedPlate)*cos(AN_SedPlate)*sin(AN_SedPlate)) = 110.32 m/day
L_SedActiveMin := Q_Sed/(V_SedUpActiveMax*W_Sed) = 1.74039 m  # Note this doesn't include the area occupies by the thickness of the plate settlers
# Number of spaces where water is traveling is one less than the number of plates used to create those spaces
N_SedPlatesMin := ceil(L_SedActiveMin*sin(AN_SedPlate)/(B_SedPlate - T_SedPlate)) + 1 = 81
L_SedInactive + ((N_SedPlatesMin*T_SedPlate + (N_SedPlatesMin - 1)*(B_SedPlate - T_SedPlate))/sin(AN_SedPlate)) = 2.64679 m
L_Sed := max(L_SedVUp, L_SedInactive + ((N_SedPlatesMin*T_SedPlate + (N_SedPlatesMin - 1)*(B_SedPlate - T_SedPlate))/sin(AN_SedPlate))) = 2.74286 m
# Now calculate actual values of all parameters!
L_SedPlate := L_Sed - L_SedInactive = 2.12626 m
N_SedPlates := (L_SedPlate - T_SedPlate/sin(AN_SedPlate))*sin(AN_SedPlate)/B_SedPlate + 1 = 84.792
L_SedActive := L_SedPlate - N_SedPlates*T_SedPlate/sin(AN_SedPlate) = 1.83253 m
V_SedUp := Q_Sed/(L_Sed*W_Sed) = 70 m/day
V_SedUpActive := Q_Sed/(L_SedActive*W_Sed) = 104.773 m/day
V_SedC := V_SedUpActive/(1 + L_SedPlateEstimated/(B_SedPlate - T_SedPlate)*cos(AN_SedPlate)*sin(AN_SedPlate)) = 9.4972 m/day
