# Channel Design
# [reference: FluidsFunctions.xmcd]
# Please look online to see how to make a relative reference.
# [reference: DesignAssumptions.xmcd]
# [reference: Launder.xmcd]
# Should we add a reference to the Channel function? Otherwise I do not know where HLlaunorf is.
# n.channels does not need to be input since it is defined in the design assumptins
Channel(Q_plant, SedTank_width, tank_thick) :=
    height_channel ← HW_channel + freeboard_channel
    b ← (1/G_cell)^(1/2)*(Q_plant/height_channel)^(3/4)*(K_90/(2*ν*Π_cell))^(1/4)
    width_channel ← Π_cell*b
    length_channel ← n_sedtanks*SedTank_width + 2*tank_thick
    channel_dim ← [length_channel; width_channel; height_channel]
    return channel_dim
# The water height in the plant leveling tank is determined by the water level in the
# channel and the freeboard.
# The width of the channel is a function of the Gcell average we want to maintain the losses from 90 degree turns and the energy dissapation zone (Π_cell)
# The length is based on the side of the sed tank
PLT_waterlevel(HW_channel, HL_laundertotal) :=
    HW_PLT ← HW_channel - HL_laundertotal
    return HW_PLT
# Headloss (HL.laundertotal) is caculated in a function in the launder design program, and is based on the total headloss through all launders and launder orifices from the sedtank to the plant leveling tank
