# Entrance Tank Modular Design
# User Inputs
Q_Plant := 20*L/s  # To be left undefined and inputed online by the user
method := "EntTank"
# From Expert Inputs
Country := 0
Language := 0
ND_RMPipe :=
    (.102 m) if Q_Plant ≤ 4*L/s
    (.152 m) if Q_Plant ≤ 10*L/s and Q_Plant > 4*L/s
    (.203 m) if Q_Plant ≤ 17*L/s and Q_Plant > 10*L/s
    (.254 m) if Q_Plant ≤ 27*L/s and Q_Plant > 17*L/s
    (.305 m) if Q_Plant ≤ 38*L/s and Q_Plant > 27*L/s
    (.381 m) if Q_Plant ≤ 54*L/s and Q_Plant > 38*L/s
    (.508 m) if Q_Plant ≤ 96*L/s and Q_Plant > 54*L/s
    .61 m otherwise
# General Assumptions and Constants
S_Fitting := 5 cm
# Entrance Tank
ND_EtFloat := 8 in
S_EtFloat := 10 cm
ND_EtDrain := 3 in
# Drain Channels
W_EtDCMin := 20 cm
# Design References
# [reference: MathFunctions.xmcd]
# [reference: PipeDatabase.xmcd]
# [reference: FluidsFunctions.xmcd]
# From Entrance Tank Design Code
W_EtDCLFOM := W_EtDCMinRMFit + T_PlantWall + S_Fitting + OuterDiameterFittingPVC(ND_RMPipe) + S_Fitting  # error: This variable is undefined.
# From Entrance Tank Drawing Code
# [reference: MtoATranslators.xmcd]
# [reference: MtoATranslatorsWrapped.xmcd]
# [reference: PlumbingF.xmcd]
# [reference: TankF.xmcd]
# [reference: EntranceBoxAC.xmcd]
# [reference: EntranceTankAC.xmcd]
AC_EntranceTank :=
    AC_EntranceTank if EN_Water == 0
    AC_EntranceTankWater otherwise  # error: This variable is undefined.
# Previews
# [reference: LayoutsAC.xmcd]
# Display Variables
Q_Plant = 0.02 m^3/s
