# AguaClara Design Tool
Q_Plant := 70*L/s
Mod := 0
method := "EtFlocSedFi"
## References
# MathCAD dimension calculations:
# [reference: ExpertInputs.xmcd]
# [reference: MathFunctions.xmcd]
# [reference: PipeDatabase.xmcd]
# [reference: MaterialsDatabase.xmcd]
# [reference: FluidsFunctions.xmcd]
# [reference: SedTankFunctions.xmcd]
# [reference: CdcFunctions.xmcd]
# [reference: LfomFunctions.xmcd]
# [reference: SedimentationTankmrf222.xmcd]
# Reference changed for testing 7/2/14 by mrf222
# [reference: Flocculator.xmcd]
# [reference: LFOM.xmcd]
# [reference: EntranceTankmrf222TEST.xmcd]
# [reference: SRSFmrf222TEST.xmcd]
# [reference: LinearCdc.xmcd]
# [reference: ChemStorageTanks.xmcd]
# AutoCAD drawing programs:
# Translators:
# These are the codes that take MathCAD outputs and create AutoCAD scripts that are used to draw the plant (formerly Basics)
# [reference: MtoATranslators.xmcd]
# The wrapped MtoA translator contains the functions that the user will want to access. These functions will draw pieces with full functionality - specifying the location, dimension, and orientation of the object. Also, it contains layer control and subtraction capabilities for grouped objects.
# [reference: MtoATranslatorsWrapped.xmcd]
# Drawing functions:
# [reference: ChannelF.xmcd]
# [reference: PlumbingF.xmcd]
# [reference: TankF.xmcd]
# [reference: StairsF.xmcd]
# [reference: DrainChannelF.xmcd]
# AutoCAD Script Files:
# [reference: FlocculatorAC.xmcd]
# [reference: SedTankRemoveBotSlab.xmcd]
# [reference: EntranceTankACmrf222TEST.xmcd]
# [reference: ChemStockTanksAC.xmcd]
# [reference: SRSFACmrf222TEST.xmcd]
# [reference: CdcAC.xmcd]
# Reference changed for testing 7/2/14 by mrf222
# The CDC drawing file also does not draw the manifold.
# [reference: OperatorAccessAC.xmcd]
# [reference: MaterialsAC.xmcd]
# Materials List:
# [reference: MaterialsList.xmcd]
# Layouts:
# This file will execute at the very end to create multiple views of the entire plant in paperspace
# [reference: LayoutsAC.xmcd]
# Section Cuts:
# This file will create section cuts in paper space
## All variables displayed must have the standard SI units. They may not have units attached by the user.
# General
Q_Plant = 0.07 m^3/s
Pi_VenaContractaOrifice = 0.63
T_PlantWall = 0.15 m
W_SedPlate = 1.0668 m
T_ConcreteMin = 0.05 m
L_SedPlateSheet = 3 m
C_CoagStock = 200 kg/m^3
T_SedPlate = 0.002 m
Ti_CoagStock = 108000 s
T_SedWeir = 0.04 m
C_ChlorineStock = 15 kg/m^3
W_SedBay = 1.0668 m
Ti_ChlorineStock = 108000 s
HL_ChannelMax = 0.05 m  # Eliminate FCM variable from design specs
H_PlantFreeboard = 0.1 m
EN_DrillSeries = 0
W_HumanMin = 0.45 m
W_ChannelMin = 0.15 m
# Entrance Tank
# Tank
HW_Et = 1.30314 m
HW_EtMax = 1.5 m
H_Et = 1.40314 m
Z_EtTop = 2.88203 m
L_Et = 8.83311 m
Z_Et = 1.47889 m
ZW_Et = 2.78203 m
W_Et = 1.35164 m
H_EtTop = 0.5 m  # height of the top part of the entrance tank above the hoppers
# Hoppers
H_EtHopperBack = 0.750037 m
N_EtFullHopper = 3
H_EtHopper = 0.903138 m
Z_EtHopper = 2.38203 m  # elevation of top of slab.
T_EtHopperLedge = 0.15 m
L_EtHopper = 2.00788 m
AN_EtSlope = 0.785398
# Rapid Mix
# Drain Channel
ED_Tee =  # error: This variable is undefined.
ND_RMPipe = 0.3048 m
W_EtDC = 0.551638 m  # drain channel under entrance tank dimensions
# Drains
L_EtDC = 8.38068 m
ND_EtDrain = 0.0762 m
H_EtDC = 0.352425 m  # Give heights of the channel at the beginning and end and change the design specs to explain that it's sloped.
L_EtDrainStopper = 1.39914 m
# Flow measurement
ND_LfomPipe = 0.3048 m
HL_Flowmeasure = 0.4 m
Z_LfomOrifices = 2.40108 m  # elevation of the center of
HL_Lfom = 0.4 m
D_LfomOrifices = 0.0381 m
B_LfomRows = 0.0444444 m
N_LfomOrifices = [16; 4; 6; 3; 4; 3; 3; 2; 3]
H_LfomOrifices = [0.01905; 0.0634944; 0.107939; 0.152383; 0.196828; 0.241272; 0.285717; 0.330161; 0.374606] m
# Trash Rack
B_EtRebar = 0.0386038 m
# Flow Control Valve | Other Parameters
# Overflow Weir
ND_EtFlowControl = 0.254 m
V_EtUp = 0.00670116 m/s
W_EtOverflowSlot = 0.15048 m
Ti_Et = 227.045 s
ND_EtOverflowDrain = 0.254 m
H_EtOverflowCutaway = 0.02508 m
L_EtOverflowWeir = 2.20948 m
W_PlantDC = 1 m
# Maybe give the vertical distances below the bottom of the sed tank of the beginning and end of the channel? Calculate them, display, and add to the design specs.
H_PlantDC = 0.75392 m
L_PlantDC = 15.8628 m
H_HumanAccess = 1.5 m
# Plant Drain Channel
# Coag Dose Controller
# Coagulant | Chlorine
Z_CoagTank = 3.14973 m
C_CoagStockMax = 200 kg/m^3
C_ChlorineStockMax = 15 kg/m^3
Z_CoagTankOutlet = 3.24973 m
C_CoagDoseMax = 0.08 kg/m^3
C_ChlorineDoseMax = 0.002 kg/m^3
L_CdcFloatArm = 0.550333 m
N_CdcCoagTubes = 1
N_CdcChlorineTubes = 1
L_CdcScaleArm = 0.364067 m
L_CdcCoagTube = 8.46168 m
L_CdcChlorineTube = 3.82158 m
B_StockOutlet = 0.1 m
HL_CdcCoag = 0.2 m
HL_CdcChlorine = 0.1 m
Ti_CoagStock = 108000 s
Vol_CoagTank = 2500 L
Vol_ChlorineTank = 1100 L
H_CoagTankAboveHeadTank = 0.3 m
D_CdcCoag = 0.009525 m
K_CdcTube = 2
D_CdcChlorine = 0.00635 m
ND_EtFloat = 0.2032 m
Q_CoagStock = 2.8e-5 m^3/s
Q_ChlorineStock = 9.33333e-6 m^3/s
ND_CoagPiping = 0.0127 m
# Flocculator
# Tank
EN_FlocType :=
    "horizontal" if EN_FlocHoriz == 1
    "vertical" otherwise
EN_FlocType = "vertical"
H_Floc = 2.14843 m
HW_FlocEnd = 1.8272 m
HW_FlocStart = 2.04843 m
Z_FlocTank = 0 m
L_Floc = 8.96684 m
H_FlocPort = [1.55359; 1.55359] m
W_FlocChannel = 0.98 m
N_FlocChannels = 2
# Drains
ND_FlocValve = 0.1016 m
N_FlocValves = 1
H_FlocSlope = 0.05715 m
Ti_FlocDrain = 1800 s
# Parameters
ED_Floc = 0.01 m^2/s^3
CP_Floc = 75 m^(2/3)
Ti_Floc =  # error
G_Floc =  # error  # Look at Flocculator Positioning arrays
V_Floc = 0.192166 m/s
# Fill last channel with bafffles from last channel
ED_FlocMax =  # error  # Fix port width to be based on energy dissipation in that channel
# Adjust spacing after the number of baffles per channel is known.
ED_FlocAve =  # error
# Check the residence time of the flocculator should be at least 20minutes
HL_Floc = 0.221229 m
K_FlocBaffle = 2.5
CP_Floc = 75 m^(2/3)
# Baffles
S_FlocBaffle = [0.371702; 0.371702] m
B_FlocBaffle = [0.373702; 0.373702] m
N_FlocChannelBaffles = [23; 22]
W_FlocPort = [0.351702; 0.362763] m
L_FlocBaffleLower = 1.26965 m
L_FlocBaffleUpper = 1.54088 m
T_FlocBaffle = 0.002 m
S_FlocBaffleFirst = 0.371702 m
EN_FlocBaffle = 1
Z_FlocBaffles = [
    0, 0.557552;
    0.557552, 0;
    0, 0.557552;
    0.557552, 0;
    0, 0.557552;
    0.557552, 0;
    0, 0.557552;
    0.557552, 0;
    0, 0.557552;
    0.557552, 0;
    0, 0.557552;
    0.557552, 0;
    0, 0.557552;
    0.557552, 0;
    0, 0.557552;
    0.557552, 0;
    0, 0.557552;
    0.557552, 0;
    0, 0.557552;
    0.557552, 0;
    0, 0.557552;
    0.557552, 0;
    0, 0
] m
# Modules
ND_FlocModulesMain = 0.0127 m
ND_FlocModulesLarge = 0.0381 m
L_FlocModuleLong = [1.12042; 1.12042] m
L_FlocModuleShort = [0.746721; 0.373019] m
ND_SpacerPipe = 0.01905 m
L_FlocModuleLongOuter = [0.746721; 0.746721] m
# Sed Tanks
# Tanks
N_SedTanks = 9
Q_SedBay = 0.00777778 m^3/s
W_Sed = 1.0668 m  # Total tank wall height
HW_Sed = 1.8272 m
L_Sed = 8.96684 m
L_Sed = 8.96684 m  # Total tank length
N_SedBays = 1
H_Sed = 1.9272 m
W_SedSideSlopes = 0.511175 m
L_SedActive = 7.48015 m
AN_SedSlope = 0.872665
# Floc Hopper
AN_SedHopperSlope = 0.785398
# Parameters
V_SedUpBod = 0.001 m/s  # design constraints
V_SedCBod = 0.00012 m/s
V_SedUp = 0.000978322 m/s  # Actual values from this design
Ti_Sed = 1742.51 s
# sludge drain
N_SedSludgeOrifices = 72  # per cell
Ti_SludgeDrain = 1800 s  # Tank Drain time
W_SedSludge = 0.0892934 m  # Width of the sludge channel
H_SedSludge = 0.0892934 m  # Depth of the sludge channel
# Distance center to center between drain orifices
B_SedSludgeOrifices = 0.103254 m
W_SedDrainCover = 0.129293 m
D_SedSludgeOrifice = 0.00947435 m  # Diameter of drain orifices
N_SedSludgeOrifices = 72
ND_SedSludgePipe = 0.1524 m
Z_SedSludge = 0.0313684 m  # Height from 0 of the top of the sludge drain
Z_SedSideSlopes = 0.792938 m
# inlet channel | exit channel
W_SedExitChannel = 0.57763 m
HW_SedInletChannel = 0.362763 m
H_SedExitChannel = 0.462763 m
W_SedInletChannel = 0.646906 m
EN_InletChannelGeom = 1
HW_SedExitChannel = 0.322763 m
# water height in exit channel from base of channel
L_SedChannel = 10.8012 m
H_SedWeirExit = 0.29978 m
H_SedInletChannel = 0.462763 m
Z_SedChannelBottom = 1.46444 m
W_SedInletChannelPreWeir = 0.362763 m
HL_SedWeirInlet = 0.0229827 m
H_SedWeirInlet = 0.382763 m
W_SedWeirInlet = 10.8012 m
# launder
N_SedLaunderOrifices = 72  # Number of orifices per launder
ND_SedLaunder = 0.2032 m
D_SedLaunderOrifice = 0.015875 m
Z_SedLaunder = 1.64595 m
L_SedLaunder = 7.48402 m
Q_SedLaunderOrifices = 0.000108025 m^3/s
HL_SedLaunderOrifice = 0.0382631 m
B_SedLaunderOrifices = 0.1 m  # Center to center launder spacing
# inlet manifold
ND_SedManifold = 0.2032 m
L_SedManifoldDiffuser = 0.0967643 m
Z_SedManifoldPipe = 0.381104 m
ND_SedDiffuser = 0.0254 m
D_SedManifoldPort = 0.0238125 m
B_SedManifoldPort = 0.05 m
N_SedManifoldPorts = 147
L_SedManifoldPipe = 8.48504 m
ED_SedInlet = 0.03 m^2/s^3
Q_SedManifoldPort = 5.29101e-5 m^3/s
# plate settlers
S_SedPlateMin = 0.025 m
L_SedPlate = 0.5 m
B_SedPlate = 0.027 m  # center to center distance between lamella
S_SedPlate = 0.025 m  # spacing between lamella
N_SedPlates = 240  # Number of Sed Plates per Sedimentation Tank Bay.
N_SedModules = 30  # Number of modules per bay
N_SedModulePlates = 8  # Number of plates per module
AN_SedPlate = 1.0472
# SRSF
# tank
Porosity_Sand := ε_FiSand
T_FiWall = 0.25 m
N_FiLayer = 6
Q_Fi = 0.0233333 m^3/s
Z_FiBottom = -2.95471 m
HL_FiTerminal = 0.455621 m
H_FiLayer = 0.2 m
H_Fi = 4.6908 m
D_FiSand60 = 0.000825 m
HL_FiBwInitiation = 1.48782 m
Z_FiTop = 1.73609 m
V_FiLayer = 0.00183333 m/s
L_Fi = 1.58239 m
N_Fi = 3
HL_FiBwSS = 1.28782 m
Porosity_Sand = 0.4
W_Fi = 1.61356 m
H_FiBottomLayer = 0.26 m
V_FiBw = 0.011 m/s
H_FiSand = 1.30083 m
# sand drain
# trunk lines
Ti_FiSand = 1204.73 s  # This is the time required to empty the filter of the sand.
ND_FiTrunk = 0.1524 m
ND_FiBwTrunk = 0.254 m
ND_FiSandOutlet = 0.0508 m
# siphon
ND_FiSiphonAirValve = 0.0254 m
Z_FiSiphonCoupling = 0.69383 m
ND_FiSiphon = 0.254 m
Z_FiSiphonInlet = -1.06363 m
B_FiSiphonManOrifices = 0.106863 m
N_FiSiphonManOrifices = 12
D_FiSiphonManOrifices = 0.0508 m
# Waste and drain pipes
ND_FiExitWaste = 0.1016 m
# branches
N_FiSlotRows = 2
B_FiManifoldBranch = 0.1 m
ND_FiManBranch = 0.0254 m
ND_FiBwManBranch = 0.0381 m
B_FiManSlot = 0.0047625 m
B_FiBwManSlot = 0.0047625 m
# Inlet Channel
HL_FiInletChannel = 0.000990161 m
L_FiInletChannel = 4.87456 m
Z_FiEntranceWeir = 1.58684 m
# Entrance Box
Z_FiEntranceBottom = 0.583695 m  # bottom of the entrance box
# Exit Box
Z_FiExitBottom = 0.583695 m  # bottom of the filtered water box
L_FiExit = 0.5183 m
L_SedLaunder = 7.48402 m
N_ValveCouplings = 9
N_SedPlatesTotal = 2160
N_SedPlatesPerSheet = 6
N_SedPlateSheets = 360
N_Valves = 9
A_EtFloor = 15.0846 m^2
W_FlocWithWalls = 2.26 m
L_FlocWithWalls = 9.26684 m
Vol_FlocFloor = 3349.96 L
A_FlocFloor = 22.3331 m^2
A_SedFloor = 102.873 m^2
# Materials List
# Plant Summary Calculations:
HL_PlantTotal := Z_EtTop - H_PlantFreeboard - Z_FiExitWeir
## Display AC variables
AC_EntranceTank =  # no stored result
AC_FlocTank =  # no stored result
AC_OperatorAccess = [
    "-layer m OpWalkwayCon"; "c t 132,132,132"; "OpWalkwayCon"; "  "; "_box 0.15,-0.15,1.26444 -16.55127,15.86284,1.46444"; "-group c OpWalkwayCon y "; "all "; "-layer s 0"; "  "; "-layer f OpWalkwayCon"
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]
AC_SedTank =  # no stored result
AC_ChemTanks =  # no stored result
AC_Filter =  # no stored result
AC_Cdc = [
    "-layer m CdcLayer";
    "c t 0,0,0";
    "CdcLayer";
    "  ";
    "_box -8.7454,13.77947,2.89473 -8.74857,14.67947,2.92013";
    "_box -8.91366,13.77947,2.89473 -8.91684,14.67947,2.92013";
    "_cylinder -8.77757,13.83887,2.96303 0.01067 a -9.38757,13.83887,2.96303";
    "_cylinder -8.76757,13.83887,2.96303 0.00966 a -9.39757,13.83887,2.96303";
    "_zoom w -9.39757,13.8182,2.96303 -9.37757,13.85954,2.96303";
    "_subtract -9.38757,13.84954,2.96303  -9.39757,13.84853,2.96303 "
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]  # AC_MatApply
AI_EtFlocSedFiSed = [
    "-group c * y "; "all "; "-layer s 0"; "  "; "-layer f *"; "  "; "-layer t *Sed*"; "  "; "-layer s *Sed*"; "  "
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]
AI_EtFlocSedFi = [
    "laythw"; "_-view o t"; "-plot y "; "PublishToWeb PNG.pc3"; "User 1 (824.00 x 583.00 Pixels)"; "l n e F"; ""; " ."; "y  [FILEPATH]EtFlocSedFi_t"; "n y"
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]
AI_EtFlocSedFiFloc = [
    "-group c * y "; "all "; "-layer s 0"; "  "; "-layer f *"; "  "; "-layer t *Floc*"; "  "; "-layer s *Floc*"; "  "
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]
AI_EtFlocSedFiFilter = [
    "-group c * y "; "all "; "-layer s 0"; "  "; "-layer f *"; "  "; "-layer t Fi*"; "  "; "-layer s Fi*"; "  "
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]
