# AguaClara Design Tool
Q_Plant := 3*L/s
method := "EtFlocSedFi"
## References
# MathCAD dimension calculations:
# [reference: ExpertInputs.xmcd]
# [reference: MathFunctions.xmcd]
# [reference: PipeDatabase.xmcd]
# [reference: FluidsFunctions.xmcd]
# [reference: SedimentationTank.xmcd]
Z_FlocBafflesMin := Z_SedWeirExit
W_FlocChannelOpening := W_SedInletChannelPreWeir
H_FlocLF := H_Sed - H_PlantFreeboard = 1.67846 m
# [reference: FlocculatorMod.xmcd]
# [reference: LFOM.xmcd]
# [reference: EntranceTank.xmcd]
# [reference: StackedRapidSandFilter.xmcd]
# [reference: LinearCdc.xmcd]
# [reference: ChemStorageTanks.xmcd]
# AutoCAD drawing programs:
# Translators:
# These are the codes that take MathCAD outputs and create AutoCAD scripts that are used to draw the plant (formerly Basics)
# [reference: MtoATranslators.xmcd]
# The wrapped MtoA translator contains the functions that the user will want to access. These functions will draw pieces with full functionality - specifying the location, dimension, and orientation of the object. Also, it contains layer control and subtraction capabilities for grouped objects.
# [reference: MtoATranslatorsWrapped.xmcd]
# Drawing functions:
# [reference: ChannelF.xmcd]
# [reference: PlumbingF.xmcd]
# [reference: TankF.xmcd]
# [reference: StairsF.xmcd]
# [reference: DrainChannelF.xmcd]
# AutoCAD Script Files:
Floc_Origin := [Plant_Origin[0]; Plant_Origin[1] + N_SedTanks*(W_Sed + T_PlantWall); Plant_Origin[2] + Z_FlocTank]
Z_FlocChannelBottom := Z_SedChannelBottom
# [reference: FlocculatorACMod.xmcd]
# [reference: SedimentationTankAC.xmcd]
# [reference: EntranceTankACher28.xmcd]
LFOM_Origin := [RMElbow_Origin[0]; RMElbow_Origin[1] + ElbowRadius(ND_RMPipe); ZW_Et - HL_Flowmeasure]
L_RMVertPipeTop := H_PlantFreeboard
L_LfomPipe := HL_Lfom
L_RMVertPipeBottom := (Z_EtTop - (RMElbow_Origin[2] + ElbowRadius(ND_RMPipe)) - HL_Lfom - H_PlantFreeboard)
# [reference: LfomAC.xmcd]
# [reference: ChemStockTanksAC.xmcd]
# [reference: StackedRapidSandFilterAC.xmcd]
# [reference: CdcAC.xmcd]
# [reference: OperatorAccessAC.xmcd]
# [reference: MaterialsAC.xmcd]
# Materials List:
# [reference: MaterialsList.xmcd]
# Layouts:
# This file will execute at the very end to create multiple views of the entire plant in paperspace
# [reference: LayoutsAC.xmcd]
## All variables displayed must have the standard SI units. They may not have units attached by the user.
# General
Q_Plant = 0.003 m^3/s
Pi_VenaContractaOrifice = 0.62
T_PlantWall = 0.15 m
W_SedPlate = 1.0668 m
T_ConcreteMin = 0.05 m
L_SedPlateSheet = 3 m
C_CoagStock = 266.667 kg/m^3
T_SedPlate = 0.002 m
Ti_CoagStock = 108000 s
T_SedWeir = 0.04 m
C_ChlorStock = 5.45455 kg/m^3
W_SedBay = 1.0668 m
Ti_ChlorineStock = 108000 s
HL_ChannelMax = 0.05 m  # Eliminate FCM variable from design specs
H_PlantFreeboard = 0.1 m
EN_DrillSeries = 0
W_HumanMin = 0.54 m
W_ChannelMin = 0.15 m
# Entrance Tank
# Tank
HW_Et = 0.55 m
HW_EtMax = 1.5 m
H_Et = 0.65 m
Z_EtTop = 2.46106 m
L_Et = 2.3048 m
Z_Et = 1.81106 m
ZW_Et = 2.36106 m
H_EtOverflowChannel =  # error: This variable is undefined.
W_Et = 0.766725 m
H_EtTop = 0.3 m  # height of the top part of the entrance tank above the hoppers
# Hoppers
H_EtLastSlope =  # error
H_EtHopperBack = 0.35 m
N_EtFullHopper = 1
H_EtHopper = 0.35 m
Z_EtHopper = 2.16106 m  # elevation of top of slab.
T_EtHopperLedge = 0.15 m
L_EtHopper = 0.9016 m
AN_EtSlope = 0.785398
# Rapid Mix
# Drain Channel
ED_Tee = 0.135044 m^2/s^3
ND_RMPipe = 0.1016 m
W_EtDC = 0.388138 m  # drain channel under entrance tank dimensions
# Drains
L_EtDC = 2.07621 m
ND_EtDrain = 0.0762 m
H_EtDC = 0.132653 m  # Give heights of the channel at the beginning and end and change the design specs to explain that it's sloped.
L_EtDrainStopper = 0.646 m
# Flow measurement
ND_Lfom =  # error
HL_Flowmeasure = 0.2 m
Z_LfomOrifices = 2.16741 m  # elevation of the center of
HL_Lfom = 0.2 m
D_LfomOrifices = 0.0127 m
B_LfomRows = 0.02 m
N_LfomOrifices = [7; 4; 2; 2; 2; 2; 1; 2; 1; 1]
H_LfomOrifices = [0.00635; 0.02635; 0.04635; 0.06635; 0.08635; 0.10635; 0.12635; 0.14635; 0.16635; 0.18635] m
Q_LfomScale =  # error
# Trash Rack
B_EtRebar = 0.0211796 m
# Flow Control Valve | Other Parameters
# Overflow Weir
ND_EtFlowControl = 0.0508 m
V_EtUp = 0.00223177 m/s
W_EtOverflowSlot = 0.0489204 m
Ti_Et = 343.322 s
ND_EtOverflowDrain = 0.0762 m
H_EtOverflowCutaway = 0.0081534 m
L_EtOverflowWeir = 1.0778 m
W_DC =  # error
# Maybe give the vertical distances below the bottom of the sed tank of the beginning and end of the channel? Calculate them, display, and add to the design specs.
H_DC =  # error
L_DC =  # error
H_HumanAccess = 1.5 m
# Plant Drain Channel
# Coag Dose Controller
# Coagulant | Chlorine
Z_CoagTank = 2.72876 m
C_CoagStockMax = 400 kg/m^3
C_ChlorineStockMax = 50 kg/m^3
Z_CoagTankOutlet = 2.82876 m
C_CoagDoseMax = 0.08 kg/m^3
C_ChlorineDoseMax = 0.002 kg/m^3
L_CdcFloatArm = 0.41275 m
N_CoagCdcTubes = 1
N_ChlorCdcTubes = 1
L_CdcScaleArm = 0.50165 m
L_CoagCdcTube = 0.815944 m
L_ChlorCdcTube = 2.04846 m
B_StockOutlet = 0.1 m
HL_CoagCdc = 0.2 m
HL_ChlorCdc = 0.1 m
Ti_CoagStock = 108000 s
Vol_CoagTank = 208.198 L
Vol_ChlorineTank = 208.198 L
H_CoagTankAboveHeadTank = 0.3 m
D_CdcCoag = 0.00238125 m
K_CdcTube = 8
D_CdcChlor = 0.003175 m
ND_EtFloat = 0.2032 m
Q_CoagStock = 9e-7 m^3/s
Q_ChlorStock = 1.1e-6 m^3/s
ND_CoagPiping = 0.0127 m
# Flocculator
# Tank
EN_FlocType :=
    "horizontal" if EN_FlocHoriz == 1
    "vertical" otherwise
EN_FlocType = "vertical"
H_Floc = 1.97585 m
HW_FlocEnd = 1.67846 m
HW_FlocStart = 1.87585 m
Z_FlocTank = 0 m
L_FlocTank =  # error
H_FlocPort = [0.326745; 0.326745; 0.326745; 0.326745; 0.326745; 0.326745; 0.326745; 0.326745; 0.326745; 0.326745; 0.326745] m
W_FlocChannel = 0.16715 m
N_FlocChannels = 11
# Drains
ND_FlocValve = 0.0508 m
N_FlocValves = 6
H_FlocSlope = 0.0301625 m
Ti_FlocDrain = 1800 s
# Parameters
ED_Floc = 0.0105 m^2/s^3
CP_Floc = 75 m^(2/3)
Ti_Floc = 555.501 s
G_Floc = 72.4569 1/s  # Look at Flocculator Positioning arrays
V_Floc = 0.0646265 m/s
# Fill last channel with bafffles from last channel
ED_FlocMax = 0.00525 m^2/s^3  # Fix port width to be based on energy dissipation in that channel
# Adjust spacing after the number of baffles per channel is known.
ED_FlocAve = 0.00525 m^2/s^3  # Check the residence time of the flocculator should be at least 20minutes
ED_FlocChannelFirst =  # error
HL_Floc = 0.297388 m
K_FlocBaffle = 2.5
CP_Floc = 75 m^(2/3)
# Baffles
S_FlocBaffle = [0.135; 0.135; 0.135; 0.135; 0.135; 0.135; 0.135; 0.135; 0.135; 0.135; 0.135] m
B_FlocBaffle = [0.137; 0.137; 0.137; 0.137; 0.137; 0.137; 0.137; 0.137; 0.137; 0.137; 0.137] m
N_FlocChannelBaffles = [3; 3; 3; 3; 3; 3; 3; 3; 3; 3; 3]
W_FlocPort = 0.115 m
L_FlocBaffleLower = 1.49015 m
L_FlocBaffleUpper = 1.75229 m
T_FlocBaffle = 0.002 m
S_FlocBaffleFirst = 0.135 m
EN_FlocBaffle = 1
Z_FlocBaffles = [
    0, 0, 0, 0, 0, 0, 0, 0, 0, 0, 0.2025;
    0.2025, 0.2025, 0.2025, 0.2025, 0.2025, 0.2025, 0.2025, 0.2025, 0.2025, 0.2025, 0;
    0, 0, 0, 0, 0, 0, 0, 0, 0, 0, 0.2025
] m
# Last Channel
# Modules | First Channel
N_FlocChannelModulesLongLast = 0
ND_FlocModulesMain = 0.0127 m
N_FlocChannelModulesLongFirst = 0
N_FlocChannelBafflesShortLast = 3
ND_FlocModulesLarge = 0.0381 m
N_FlocChannelBafflesShortFirst = 3
L_FlocModuleLongOuterLast = 0.273317 m
L_FlocModuleLongOuterFirst = 0.273317 m
ND_SpacerPipe = 0.01905 m
L_FlocModuleLongFirst = 0.410317 m
L_FlocModuleLongLast = 0.410317 m
# Sed Tanks
# Tanks
N_SedTanks = 1
Q_SedBay = 0.003 m^3/s
W_Sed = 1.0668 m  # Total tank wall height
HW_Sed = 1.67846 m
L_Sed = 3.86842 m
L_Sed = 3.86842 m  # Total tank length
N_SedBays = 1
H_Sed = 1.77846 m
W_SedSideSlopes = 0.52505 m
L_SedActive = 2.99067 m
AN_SedSlope = 0.872665
# Floc Hopper
AN_SedHopperSlope = 0.785398
# Parameters
V_SedUpBod = 0.001 m/s  # design constraints
V_SedCBod = 0.00012 m/s
V_SedUp = 0.000951894 m/s  # Actual values from this design
Ti_Sed = 1723.4 s
# sludge drain
N_SedSludgeOrifices = 27  # per cell
Ti_SludgeDrain = 1800 s  # Tank Drain time
W_SedSludge = 0.0693876 m  # Width of the sludge channel
H_SedSludge = 0.0693876 m  # Depth of the sludge channel
# Distance center to center between drain orifices
B_SedSludgeOrifices = 0.109195 m
W_SedDrainCover = 0.109388 m
D_SedSludgeOrifice = 0.00955352 m  # Diameter of drain orifices
N_SedSludgeOrifices = 27
ND_SedSludgePipe = 0.0762 m
Z_SedSludge = 0.0693876 m  # Height from 0 of the top of the sludge drain
Z_SedSideSlopes = 0.761818 m
# inlet channel | exit channel
W_SedExitChannel = 0.34 m
HW_SedInletChannel = 0.231901 m
H_SedExitChannel = 0.331901 m
W_SedInletChannel = 0.28415 m
EN_InletChannelGeom = 0
HW_SedExitChannel = 0.191901 m
# water height in exit channel from base of channel
L_SedChannel = 1.0668 m
H_SedWeirExit = 0.178587 m
H_SedInletChannel = 0.331901 m
Z_SedChannelBottom = 1.44656 m
W_SedInletChannelPreWeir = 0.28415 m
HL_SedWeirInlet = 0.0321612 m
H_SedWeirInlet = 0.19974 m
W_SedWeirInlet = 0.28415 m
# launder
N_SedLaunderOrifices = 28  # Number of orifices per launder
ND_SedLaunder = 0.1016 m
N_SedLaunderOrificesRow =  # error  # Number of orifices per row
D_SedLaunderOrifice = 0.015875 m
Z_SedLaunder = 1.56086 m
L_SedLaunder = 2.959 m
Q_SedLaunderOrifices = 0.000107143 m^3/s
HL_SedLaunderOrifice = 0.0388649 m
B_SedLaunderOrifices = 0.1 m  # Center to center launder spacing
# inlet manifold
ND_SedManifold = 0.1524 m
L_SedManifoldDiffuser = 0.157882 m
Z_SedManifoldPipe = 0.371224 m
ND_SedDiffuser = 0.0254 m
D_SedManifoldPort = 0.03175 m
B_SedManifoldPort = 0.05 m
N_SedManifoldPorts = 57
L_SedManifoldPipe = 2.97427 m
ED_SedInlet = 0.0105 m^2/s^3
Q_SedManifoldPort = 5.26316e-5 m^3/s
# plate settlers
S_SedPlateMin = 0.025 m
L_SedPlate = 0.5 m
B_SedPlate = 0.027 m  # center to center distance between lamella
S_SedPlate = 0.025 m  # spacing between lamella
N_SedPlates = 96  # Number of Sed Plates per Sedimentation Tank Bay.
N_SedModules = 12  # Number of modules per bay
N_SedModulePlates = 8  # Number of plates per module
AN_SedPlate = 1.0472
# SRSF
# tank
Porosity_Sand := ε_FiSand
T_FiWall = 0.25 m
N_FiLayer = 6
Q_Fi = 0.003 m^3/s
Z_FiBottom = -2.68314 m
HL_FiTerminal = 0.455621 m
H_FiLayer = 0.2 m
H_Fi = 4.30579 m
D_FiSand60 = 0.000825 m
HL_FiBwInitiation = 1.42842 m
Z_FiTop = 1.62265 m
V_FiLayer = 0.00183333 m/s
L_Fi = 0.582392 m
N_Fi = 1
HL_FiBwSS = 1.22842 m
Porosity_Sand = 0.4
W_Fi = 0.582588 m
H_FiBottomLayer = 0.2 m
V_FiBw = 0.011 m/s
H_FiSand = 1.24083 m
# sand drain
# trunk lines
Ti_FiSand = 166.477 s  # This is the time required to empty the filter of the sand.
ND_FiTrunk = 0.0508 m
ND_FiBwTrunk = 0.1016 m
ND_FiSandOutlet = 0.0508 m
# siphon
ND_FiSiphonAirValve = 0.0127 m
Z_FiSiphonCoupling = 0.849891 m
ND_FiSiphon = 0.0762 m
Z_FiSiphonInlet = -0.870061 m
B_FiSiphonManOrifices = 0.120198 m
N_FiSiphonManOrifices = 4
D_FiSiphonManOrifices = 0.04445 m
# Waste and drain pipes
ND_FiExitWaste = 0.0381 m
ND_FiBwWeirDrain =  # error
ND_FiBwDrain =  # error
# branches
N_FiSlotRows = 2
B_FiManifoldBranch = 0.1 m
ND_FiManBranch = 0.0254 m
ND_FiBwManBranch = 0.0381 m
B_FiManSlot = 0.0047625 m
B_FiBwManSlot = 0.0047625 m
# Inlet Channel
HL_FiWeir =  # error
L_FiWeir =  # error
Z_FiEntranceWeir = 1.50221 m
# Entrance Box
Z_FiEntranceBottom = 0.544056 m  # bottom of the entrance box
# Exit Box
Z_FiExitBottom = 0.544056 m  # bottom of the filtered water box
Z_FiExitWeir =  # error
N_Launders =  # error
L_LaunderPipeTotal =  # error
N_LaunderCouplings =  # error
N_ValveCouplings = 1
N_SedPlatesTotal = 96
N_SedPlatesPerSheet = 6
N_SedPlateSheets = 16
N_Valves = 1
A_EtFloor = 2.77861 m^2
W_FlocWithWalls = 3.48865 m
L_FlocWithWalls = 4.16842 m
Vol_FlocFloor = 2275.11 L
A_FlocFloor = 15.1674 m^2
Vol_SedSlopes =  # error
A_SedWalls =  # error
A_SedFloor = 5.69739 m^2
# Materials List
# Plant Summary Calculations:
HL_PlantTotal := Z_EtTop - H_PlantFreeboard - Z_FiExitWeir
HL_PlantTotal =  # error
## Display AC variables
AC_EntranceTank =  # no stored result
AC_FlocTank =  # error
AC_OperatorAccess = [
    "-layer m OpWalkwayCon"; "c t 132,132,132"; "OpWalkwayCon"; "  "; "_box 0.15,-0.15,1.24656 -9.0865,6.77218,1.44656"; "-group c OpWalkwayCon y "; "all "; "-layer s 0"; "  "; "-layer f OpWalkwayCon"
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]
AC_SedTank =  # no stored result
AC_ChemTanks =  # no stored result
AC_Filter =  # no stored result
AC_ZZLayout := AC_Layout
AC_Cdc = [
    "-layer m Cdc";
    "c t 125,0,160";
    "Cdc";
    "  ";
    "-insert https://confluence.cornell.edu/download/attachments/173604905/CdcLeverArm.dwg";
    "-3.59777,6.02372,2.48596 x 1 1  270";
    "-insert https://confluence.cornell.edu/download/attachments/173604905/CdcLeverArmBracket.dwg";
    "-4.01052,5.99172,2.46106 x 1 1  270";
    "-insert https://confluence.cornell.edu/download/attachments/173604905/CdcCht.dwg";
    "-4.94387,6.02372,2.57876 x 1 1  90"
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]
AC_MatApply = [
    "-insert https://confluence.cornell.edu/download/attachments/173604905/CdcLeverArm.dwg"; "0,0,0 x 1 1  0"; "-layer"; "material"; "Flat - Polished Gray"; "*con"; "  "; "-layer"; "material"; "PVC - White"
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]
AC_ZZLayout =  # error
AI_EtFlocSedFi = [
    "laythw"; "_-view o t"; "-plot y "; "PublishToWeb PNG.pc3"; "User 1 (824.00 x 583.00 Pixels)"; "l n e F"; ""; " ."; "y  [FILEPATH]EtFlocSedFi_t"; "n y"
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]
Q_Plant = 0.003 m^3/s
# [component: inputs stack(AC_EntranceTank, AC_LFOM)]
