# Flocculator Modular Design
Mod := 1
# for 20Lps design:
# L.Sed=4.397m
# H.Floc=2.059m
# CP.FlocUser=75m^(2/3)
# ED.FlocUser=0.011m^2/s^3
method := "Flocculator"
# User Inputs
# To be left undefined and inputed online by the user
Q_Plant := 20*L/s  # Length of the Flocculator, defined by user
L_Sed := 4.397 m  # Height/depth of the flocculator
H_Floc := 2.059 m
# collison potential of the flocculator, defined by the user
CP_FlocUserNoUnits := 75
# energy dissipation in the flocculator, defined by the user
ED_FlocUser := 0.011*m^2/s^3
CP_FlocUser := CP_FlocUserNoUnits*m^(2/3)
# From Expert Inputs
# [reference: ExpertInputs.xmcd]
CP_Floc := CP_FlocUser
ED_Floc := ED_FlocUser
# Design References
# [reference: MathFunctions.xmcd]
# [reference: PipeDatabase.xmcd]
# [reference: MaterialsDatabase.xmcd]
# [reference: FluidsFunctions.xmcd]
# [reference: SedTankFunctions.xmcd]
# [reference: CdcFunctions.xmcd]
# From Flocculator Design Code
CFD_Constant := 2
Pi_VCBaffle := 1/(sqrt(K_FlocBaffle) + 1) = 0.387426
Q_Transition := ED_Floc^(1/3)*W_HumanMin*(1.6 m)^(4/3)*Pi_Jet^3/(K_FlocBaffle^(1/3)*Pi_VCBaffle^2) = 58.8382 L/s
Pi_JSGraph := 2 .. 40  # Used to create the graphs
α_ψ(Pi_JS) := min((4*Pi_Jet^3/(Pi_VCBaffle^2*K_FlocBaffle))^(1/6), (4/Pi_JS)^(1/6))
α_ε(Pi_JS) := max(2, Pi_Jet^3/Pi_VenaContractaOrifice^4*2/K_FlocBaffle*Pi_JS)
ψ_P(J, S) := α_ψ(J/S)*J^(2/3)*(K_FlocBaffle/2)^(1/3)
S_FlocBaffleMin := W_HumanMin = 0.45 m
J(P, S) := P*S
J_Min := J(Pi_JSOptimal, S_FlocBaffleMin) = 1.35 m
H_MaxHorizontal(Q, S, Pi_JS, ED, J) := Q/(S*(J*2*ED/(K_FlocBaffle*α_ε(Pi_JS)))^(1/3))
Q_Plant = 0.02 m^3/s
S_FlocBaffleMin = 0.45 m
Pi_JSOptimal = 3
ED_Floc = 0.011 m^2/s^3
H_MaxHorizontal(Q_Plant, S_FlocBaffleMin, Pi_JSOptimal, ED_Floc, J_Min) = 0.245408 m
HW_FlocEndEst :=
    fHW_Sed(Q_Plant) if H_FlocOption == 0
    H_MaxHorizontal(Q_Plant, S_FlocBaffleMin, Pi_JSOptimal, ED_Floc, J_Min) if H_FlocOption == -1
    H_FlocOption*m if H_FlocOption > 0
    = 1.8986 m
N_FlocSpacesFH(L, T, S) := (Floor((L + T)/(S + T) + 1, 2) - 1)
SofN_FlocBaffleF(L, T, N_Spaces) := (L + T)/N_Spaces - T
S_FlocBaffleNonIterative(Q, P, Pi_JS, ED) := (Q/P)^(3/4)*(1/Pi_JS)^(1/4)*(K_FlocBaffle*α_ε(Pi_JS)/(2*ED))^(1/4)
S_FlocBaffleCalcH := SofN_FlocBaffleF(L_Sed, T_FlocBaffleRigidH, N_FlocSpacesFH(L_Sed, T_FlocBaffleRigidH, S_FlocBaffleNonIterative(Q_Plant, HW_FlocEndEst, Pi_JSOptimal, ED_Floc))) = 0.117471 m
HW_FlocEnd :=
    H_MaxHorizontal(Q_Plant, S_FlocBaffleCalcH, Pi_JSOptimal, ED_Floc, J(Pi_JSOptimal, S_FlocBaffleCalcH)) if H_FlocOption == -1
    HW_FlocEndEst otherwise
    = 1.8986 m
Q_MinHorizontal(P, S, Pi_JS, ED, J) := P*S*(J*2*ED/(K_FlocBaffle*α_ε(Pi_JS)))^(1/3)
Q_MinHorizontal(HW_FlocEnd, S_FlocBaffleMin, Pi_JSOptimal, ED_Floc, J_Min) = 154.73 L/s
EN_FlocHoriz :=
    EN_FlocHoriz ← 1 if Q_Plant ≥ Q_MinHorizontal(HW_FlocEnd, S_FlocBaffleMin, Pi_JSOptimal, ED_Floc, J_Min) and H_FlocOption > -1
    EN_FlocHoriz ← 1 if H_FlocOption == -1
    EN_FlocHoriz ← 0 otherwise
S_FlocBaffleIterative(Q, W, J, S, ED) := (K_FlocBaffle*α_ε(J/S)/(2*J*ED))^(1/3)*Q/W
W_FlocChannelV(Q, J, S, ED) := (K_FlocBaffle*α_ε(J/S)/(2*J*ED))^(1/3)*Q/S
W_FlocChannelMinRigidBaffleV := W_FlocChannelV(Q_Plant, HW_FlocEnd, S_FlocBaffleMin, ED_Floc)
W_FlocChannelPlasticBaffleV := max(0.5*W_Plastic, S_FlocBaffleMin)
T_FlocBaffle :=
    T_FlocBaffleRigidH if EN_FlocHoriz == 1
    T_SedPlate otherwise
T_FlocBaffleRigidV if (EN_FlocHoriz == 0) and (W_FlocChannelMinRigidBaffleV > W_FlocChannelPlasticBaffleV)
T_FlocChannelWall :=
    T_FlocBaffleRigidV if Q_Plant ≤ Q_PlantMaxLF
    T_FlocChannelWallMidFlow otherwise
    = 0.15 m
EN_FlocBaffle :=
    EN_FlocBaffle ← 0 if EN_FlocHoriz == 1
    EN_FlocBaffle ← 1 otherwise
S_FlocPortGap :=
    T_ConcreteMin if (EN_FlocBaffle == 0) and (EN_FlocHoriz == 0)
    S_FlocBaffleSetBackPlastic if (EN_FlocBaffle == 1) and (EN_FlocHoriz == 0)
    (0 m) otherwise
    = 0.02 m
T_Slab := 25 cm
Cost_UnitConcrete := 150*USD/yd^3 = 196.193 base_currency/m^3
Cost_UnitBaffle := 360/19*USD/(12 ft) = 5.18027 base_currency/m
Cost_UnitWall := 950/19*USD/m^2 = 50 base_currency/m^2
Cost_UnitSlab := (575 + 700)/19*USD/m^2
S_FlocEstVF(ED_FlocBod, Q_Plant, W_FlocChannel, H_Floc) := max((K_FlocBaffle/(ED_FlocBod*H_Floc))^(1/3)*Q_Plant/W_FlocChannel, 1/(ED_FlocBod^(1/4)*Pi_VCBaffle)*(Pi_Jet*Q_Plant/W_FlocChannel)^(3/4))
N_FlocChannelSpacesVF(ED_FlocBod, Q_Plant, W_FlocChannel, L_FlocChannel, T_FlocBaffle, H_Floc) := Floor((L_FlocChannel + T_FlocBaffle)/(S_FlocEstVF(ED_FlocBod, Q_Plant, W_FlocChannel, H_Floc) + T_FlocBaffle), 2)
S_FlocVF(ED_FlocBod, Q_Plant, W_FlocChannel, L_FlocChannel, T_FlocBaffle, H_Floc) := (L_FlocChannel + T_FlocBaffle - N_FlocChannelSpacesVF(ED_FlocBod, Q_Plant, W_FlocChannel, L_FlocChannel, T_FlocBaffle, H_Floc)*T_FlocBaffle)/N_FlocChannelSpacesVF(ED_FlocBod, Q_Plant, W_FlocChannel, L_FlocChannel, T_FlocBaffle, H_Floc)
Ψ_BaffleVF(ED_FlocBod, Q_Plant, W_FlocChannel, L_FlocChannel, T_FlocBaffle, H_Floc) := min((S_FlocVF(ED_FlocBod, Q_Plant, W_FlocChannel, L_FlocChannel, T_FlocBaffle, H_Floc)*K_FlocBaffle/H_Floc)^(1/6), (Pi_Jet^3/Pi_VCBaffle^4)^(1/6))*(CFD_Constant^(1/6)*(K_FlocBaffle/2)^(1/3)*H_Floc^(2/3))
N_FlocChannelsVF(ED_FlocBod, Q_Plant, W_FlocChannel, L_FlocChannel, T_FlocBaffle, H_Floc) := Ceil(CP_Floc/(N_FlocChannelSpacesVF(ED_FlocBod, Q_Plant, W_FlocChannel, L_FlocChannel, T_FlocBaffle, H_Floc)*Ψ_BaffleVF(ED_FlocBod, Q_Plant, W_FlocChannel, L_FlocChannel, T_FlocBaffle, H_Floc)), 2)
N_FlocSpacesVF(ED_FlocBod, Q_Plant, W_FlocChannel, L_FlocChannel, T_FlocBaffle, H_Floc) := N_FlocChannelsVF(ED_FlocBod, Q_Plant, W_FlocChannel, L_FlocChannel, T_FlocBaffle, H_Floc)*N_FlocChannelSpacesVF(ED_FlocBod, Q_Plant, W_FlocChannel, L_FlocChannel, T_FlocBaffle, H_Floc) - 1
Ψ_FlocVF(ED_FlocBod, Q_Plant, W_FlocChannel, L_FlocChannel, T_FlocBaffle, H_Floc) := Ψ_BaffleVF(ED_FlocBod, Q_Plant, W_FlocChannel, L_FlocChannel, T_FlocBaffle, H_Floc)*N_FlocSpacesVF(ED_FlocBod, Q_Plant, W_FlocChannel, L_FlocChannel, T_FlocBaffle, H_Floc)
V_FlocVF(ED_FlocBod, Q_Plant, W_FlocChannel, L_FlocChannel, T_FlocBaffle, H_Floc) := Q_Plant/(S_FlocVF(ED_FlocBod, Q_Plant, W_FlocChannel, L_FlocChannel, T_FlocBaffle, H_Floc)*W_FlocChannel)
α_εVF(ED_FlocBod, Q_Plant, W_FlocChannel, L_FlocChannel, T_FlocBaffle, H_Floc) := max(2, Pi_Jet^3/Pi_VCBaffle^4*2*H_Floc/(K_FlocBaffle*S_FlocVF(ED_FlocBod, Q_Plant, W_FlocChannel, L_FlocChannel, T_FlocBaffle, H_Floc)))
ED_FlocMaxVF(ED_FlocBod, Q_Plant, W_FlocChannel, L_FlocChannel, T_FlocBaffle, H_Floc) := α_εVF(ED_FlocBod, Q_Plant, W_FlocChannel, L_FlocChannel, T_FlocBaffle, H_Floc)*K_FlocBaffle*(V_FlocVF(ED_FlocBod, Q_Plant, W_FlocChannel, L_FlocChannel, T_FlocBaffle, H_Floc)^3/(2*H_Floc))
h_eBaffleVF(ED_FlocBod, Q_Plant, W_FlocChannel, L_FlocChannel, T_FlocBaffle, H_Floc) := K_FlocBaffle*V_FlocVF(ED_FlocBod, Q_Plant, W_FlocChannel, L_FlocChannel, T_FlocBaffle, H_Floc)^2/(2*g)
h_eFlocVF(ED_FlocBod, Q_Plant, W_FlocChannel, L_FlocChannel, T_FlocBaffle, H_Floc) := h_eBaffleVF(ED_FlocBod, Q_Plant, W_FlocChannel, L_FlocChannel, T_FlocBaffle, H_Floc)*N_FlocSpacesVF(ED_FlocBod, Q_Plant, W_FlocChannel, L_FlocChannel, T_FlocBaffle, H_Floc)
Vol_FlocVF(ED_FlocBod, Q_Plant, W_FlocChannel, L_FlocChannel, T_FlocBaffle, H_Floc) := W_FlocChannel*N_FlocChannelsVF(ED_FlocBod, Q_Plant, W_FlocChannel, L_FlocChannel, T_FlocBaffle, H_Floc)*L_FlocChannel*(H_Floc + h_eFlocVF(ED_FlocBod, Q_Plant, W_FlocChannel, L_FlocChannel, T_FlocBaffle, H_Floc)/2)
Ti_FlocVF(ED_FlocBod, Q_Plant, W_FlocChannel, L_FlocChannel, T_FlocBaffle, H_Floc) := Vol_FlocVF(ED_FlocBod, Q_Plant, W_FlocChannel, L_FlocChannel, T_FlocBaffle, H_Floc)/Q_Plant
H_FlocWallsVF(ED_FlocBod, Q_Plant, W_FlocChannel, L_FlocChannel, T_FlocBaffle, H_Floc) := H_Floc + h_eFlocVF(ED_FlocBod, Q_Plant, W_FlocChannel, L_FlocChannel, T_FlocBaffle, H_Floc) + H_PlantFreeboard
A_WallsVF(ED_FlocBod, Q_Plant, W_FlocChannel, L_FlocChannel, T_FlocBaffle, H_Floc) := (L_FlocChannel + 2*W_FlocChannel + 2*T_PlantWall)*H_FlocWallsVF(ED_FlocBod, Q_Plant, W_FlocChannel, L_FlocChannel, T_FlocBaffle, H_Floc)*N_FlocChannelsVF(ED_FlocBod, Q_Plant, W_FlocChannel, L_FlocChannel, T_FlocBaffle, H_Floc)
Vol_WallsVF(ED_FlocBod, Q_Plant, W_FlocChannel, L_FlocChannel, T_FlocBaffle, H_Floc) := (L_FlocChannel + 2*W_FlocChannel + 2*T_PlantWall)*H_FlocWallsVF(ED_FlocBod, Q_Plant, W_FlocChannel, L_FlocChannel, T_FlocBaffle, H_Floc)*N_FlocChannelsVF(ED_FlocBod, Q_Plant, W_FlocChannel, L_FlocChannel, T_FlocBaffle, H_Floc)*T_PlantWall
A_SlabVF(ED_FlocBod, Q_Plant, W_FlocChannel, L_FlocChannel, T_FlocBaffle, H_Floc) := (L_FlocChannel + 2*T_PlantWall)*(W_FlocChannel + T_PlantWall)*N_FlocChannelsVF(ED_FlocBod, Q_Plant, W_FlocChannel, L_FlocChannel, T_FlocBaffle, H_Floc)
Vol_SlabVF(ED_FlocBod, Q_Plant, W_FlocChannel, L_FlocChannel, T_FlocBaffle, H_Floc) := (L_FlocChannel + 2*T_PlantWall)*(W_FlocChannel + T_PlantWall)*N_FlocChannelsVF(ED_FlocBod, Q_Plant, W_FlocChannel, L_FlocChannel, T_FlocBaffle, H_Floc)*T_Slab
Vol_WallVF(ED_FlocBod, Q_Plant, W_FlocChannel, L_FlocChannel, T_FlocBaffle, H_Floc) := Vol_WallsVF(ED_FlocBod, Q_Plant, W_FlocChannel, L_FlocChannel, T_FlocBaffle, H_Floc) + Vol_SlabVF(ED_FlocBod, Q_Plant, W_FlocChannel, L_FlocChannel, T_FlocBaffle, H_Floc)
Cost_SlabVF(ED_FlocBod, Q_Plant, W_FlocChannel, L_FlocChannel, T_FlocBaffle, H_Floc) := Cost_UnitSlab*A_SlabVF(ED_FlocBod, Q_Plant, W_FlocChannel, L_FlocChannel, T_FlocBaffle, H_Floc)
Cost_WallVF(ED_FlocBod, Q_Plant, W_FlocChannel, L_FlocChannel, T_FlocBaffle, H_Floc) := Cost_UnitWall*A_WallsVF(ED_FlocBod, Q_Plant, W_FlocChannel, L_FlocChannel, T_FlocBaffle, H_Floc)
Cost_WallSlabVF(ED_FlocBod, Q_Plant, W_FlocChannel, L_FlocChannel, T_FlocBaffle, H_Floc) := Cost_WallVF(ED_FlocBod, Q_Plant, W_FlocChannel, L_FlocChannel, T_FlocBaffle, H_Floc) + Cost_SlabVF(ED_FlocBod, Q_Plant, W_FlocChannel, L_FlocChannel, T_FlocBaffle, H_Floc)
# Baffle Material Costs:
L_FlocBafflesUpperVF(ED_FlocBod, Q_Plant, W_FlocChannel, L_FlocChannel, T_FlocBaffle, H_Floc, Pi_Baffle) := H_FlocWallsVF(ED_FlocBod, Q_Plant, W_FlocChannel, L_FlocChannel, T_FlocBaffle, H_Floc) - Pi_Baffle*S_FlocVF(ED_FlocBod, Q_Plant, W_FlocChannel, L_FlocChannel, T_FlocBaffle, H_Floc) - 0.5*H_PlantFreeboard
L_FlocBafflesLowerVF(ED_FlocBod, Q_Plant, W_FlocChannel, L_FlocChannel, T_FlocBaffle, H_Floc, Pi_Baffle) := min(fZ_SedWeirExit(Q_Plant) - S_FlocVF(ED_FlocBod, Q_Plant, W_FlocChannel, L_FlocChannel, T_FlocBaffle, H_Floc), H_Floc - Pi_Baffle*S_FlocVF(ED_FlocBod, Q_Plant, W_FlocChannel, L_FlocChannel, T_FlocBaffle, H_Floc))
N_FlocBafflesUpperVF(ED_FlocBod, Q_Plant, W_FlocChannel, L_FlocChannel, T_FlocBaffle, H_Floc) := (N_FlocChannelSpacesVF(ED_FlocBod, Q_Plant, W_FlocChannel, L_FlocChannel, T_FlocBaffle, H_Floc)/2 - 1)*N_FlocChannelsVF(ED_FlocBod, Q_Plant, W_FlocChannel, L_FlocChannel, T_FlocBaffle, H_Floc)
N_FlocBafflesLowerVF(ED_FlocBod, Q_Plant, W_FlocChannel, L_FlocChannel, T_FlocBaffle, H_Floc) := N_FlocChannelSpacesVF(ED_FlocBod, Q_Plant, W_FlocChannel, L_FlocChannel, T_FlocBaffle, H_Floc)/2*N_FlocChannelsVF(ED_FlocBod, Q_Plant, W_FlocChannel, L_FlocChannel, T_FlocBaffle, H_Floc) - 1
L_FlocBafflesTotalVF(ED_FlocBod, Q_Plant, W_FlocChannel, L_FlocChannel, T_FlocBaffle, H_Floc, Pi_Baffle) := N_FlocBafflesUpperVF(ED_FlocBod, Q_Plant, W_FlocChannel, L_FlocChannel, T_FlocBaffle, H_Floc)*L_FlocBafflesUpperVF(ED_FlocBod, Q_Plant, W_FlocChannel, L_FlocChannel, T_FlocBaffle, H_Floc, Pi_Baffle) + N_FlocBafflesLowerVF(ED_FlocBod, Q_Plant, W_FlocChannel, L_FlocChannel, T_FlocBaffle, H_Floc)*L_FlocBafflesLowerVF(ED_FlocBod, Q_Plant, W_FlocChannel, L_FlocChannel, T_FlocBaffle, H_Floc, Pi_Baffle)
Cost_BafflesVF(ED_FlocBod, Q_Plant, W_FlocChannel, L_FlocChannel, T_FlocBaffle, H_Floc, Pi_Baffle) := Cost_UnitBaffle*L_FlocBafflesTotalVF(ED_FlocBod, Q_Plant, W_FlocChannel, L_FlocChannel, T_FlocBaffle, H_Floc, Pi_Baffle)
# From Flocculator Drawing Code
# [reference: MtoATranslators.xmcd]
# [reference: MtoATranslatorsWrapped.xmcd]
# [reference: PlumbingF.xmcd]
# [reference: TankF.xmcd]
Plant_Origin[2] := Floc_Origin[2] - Z_FlocTank  # Redefined for this modular code!
# [reference: FlocculatorAC.xmcd]
AC_FlocTank :=
    stack(FlocTankScript, FlocTankBaffleScriptH, FlocTankDrainCouplingScript, FlocTankDrainPipeScript, FlocTankDrainAdapterScript, FlocTankDrainValveScript, FlocRMScript) if EN_FlocHoriz == 1 and N_FlocChannels ≤ 2
    stack(FlocTankScript, FlocTankBaffleScriptH, FlocTankDrainCouplingScript, FlocTankDrainPipeScript, FlocTankDrainAdapterScript, FlocTankDrainValveScript, FlocDrainArray, FlocRMScript) if EN_FlocHoriz == 1 and N_FlocChannels > 2
    stack(FlocTankScript, FlocTankBaffleScriptV, FlocModules, FlocTankDrainCouplingScript, FlocTankDrainPipeScript, FlocTankDrainAdapterScript, FlocTankDrainValveScript, FlocRMScript) if EN_FlocHoriz == 0 and N_FlocChannels ≤ 2
    stack(FlocTankScript, FlocTankBaffleScriptV, FlocModules, FlocTankDrainCouplingScript, FlocTankDrainPipeScript, FlocTankDrainAdapterScript, FlocTankDrainValveScript, FlocDrainArray, FlocRMScript) otherwise
# Display Variables
EN_FlocType :=
    "horizontal" if EN_FlocHoriz == 1
    "vertical" otherwise
L_Sed = 4.397 m
HW_Sed =  # error: This variable is undefined.
Q_Plant = 0.02 m^3/s
Z_FlocBafflesMin =  # error
W_FlocChannelOpening =  # error
Z_FlocChannelBottom =  # error
# Tank
H_Floc = 2.059 m
HW_FlocEnd = 1.8986 m
HW_FlocStart =  # error
Z_FlocTank =  # error
L_Floc =  # error
H_FlocPort =  # error
W_FlocChannel =  # error
N_FlocChannels =  # error
# Drains
ND_FlocValve =  # error
N_FlocValves =  # error
H_FlocSlope =  # error
Ti_FlocDrain = 1800 s
# Parameters
ED_Floc = 0.011 m^2/s^3
CP_Floc = 75 m^(2/3)
Ti_Floc =  # error
G_Floc =  # error  # Look at Flocculator Positioning arrays
V_Floc =  # error
# Fill last channel with bafffles from last channel
ED_FlocMax =  # error  # Fix port width to be based on energy dissipation in that channel
# Adjust spacing after the number of baffles per channel is known.
ED_FlocAve =  # error
# Check the residence time of the flocculator should be at least 20minutes
HL_Floc =  # error
K_FlocBaffle = 2.5
CP_Floc = 75 m^(2/3)
# Baffles
S_FlocBaffle =  # error
B_FlocBaffle =  # error
N_FlocChannelBaffles =  # error
W_FlocPort =  # error
L_FlocBaffleLower =  # error
L_FlocBaffleUpper =  # error
T_FlocBaffle = 0.002 m
S_FlocBaffleFirst =  # error
EN_FlocBaffle = 1
Z_FlocBaffles =  # error
# Modules
ND_FlocModulesMain = 0.0127 m
ND_FlocModulesLarge = 0.0381 m
L_FlocModuleLong =  # error
L_FlocModuleShort =  # error
ND_SpacerPipe = 0.01905 m
L_FlocModuleLongOuter =  # error
AC_FlocTank =  # error
CP_Floc := CP_FlocUser
ED_Floc := ED_FlocUser
# Previews
# [reference: LayoutsAC.xmcd]
AI_FlocTank = [
    "laythw"; "_-view o t"; "-plot y "; "PublishToWeb PNG.pc3"; "VGA (640.00 x 480.00 Pixels)"; "l n e F"; ""; " ."; "y  [FILEPATH]Flocculator_t"; "n y"
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]
