# LFOM Orifices Template
Q_Plant := □  # error: This placeholder is empty.
HL_Lfom := □  # error: This placeholder is empty.
# Design References
L_Paper := 10.5 in
W_Paper := 7.5 in
XStartPoint := LFOM_Origin[0]
YStartPoint := LFOM_Origin[1]
Labels := ["A", "Page AB"; "B", "Page BC"; "C", "Page CD"; "D", "Page DE"; "E", "Page EF"; "F", "Page FG"]
OrificeCenterDist := D_LfomOrifices + S_LfomOrificesMin
LFOM_Origin := [0; 0; 0]*m
# Variables
DimStyle(H_Component) := concat("-dimstyle ", "st ", "dimtxt ", stringit(H_Component), sp, "dimasz ", stringit(H_Component), sp, "dimgap ", stringit(H_Component), sp, "dimcen ", stringit(0.0000 m), sp)
LfomDiameterDim := concat(DimStyle(.005 m), "_dimdiameter ", point([
    (OrificeCenterDist*N_LfomOrifices[0]) - D_LfomOrifices/2 - S_LfomOrificesMin + (D_LfomOrifices/2*sqrt(2)/2);
    H_LfomOrifices[0] + (D_LfomOrifices/2*sqrt(2)/2)
]), sp, point([
    (OrificeCenterDist*N_LfomOrifices[0] - D_LfomOrifices/2 + S_LfomOrificesMin) + (D_LfomOrifices/2*sqrt(2)/2);
    H_LfomOrifices[0] + (D_LfomOrifices/2*sqrt(2)/2)
]))
Boundary := concat("_line ", point([XStartPoint - D_LfomOrifices/2; YStartPoint + H_LfomOrifices[0] - D_LfomOrifices/2]), sp, point([
    XStartPoint - D_LfomOrifices/2;
    YStartPoint + H_LfomOrifices[last(H_LfomOrifices)] + D_LfomOrifices/2
]), sp, "_line ", point([XStartPoint - D_LfomOrifices/2; YStartPoint + H_LfomOrifices[0] - D_LfomOrifices/2]), sp, point([
    (XStartPoint + D_LfomOrifices + N_HLayouts(L_Paper)*(floor(L_Paper/OrificeCenterDist)*OrificeCenterDist - D_LfomOrifices));
    YStartPoint + H_LfomOrifices[0] - D_LfomOrifices/2
]), sp)
Zoom := concat("z ", "e")
LabelLayout(Text, TextSize, Start, End, Rotation) := concat("-mtext ", point(Start), sp, "height ", stringit(TextSize), sp, "r ", stringit(Rotation), sp, point(End), sp, Text)
CopyText(Object, BasePt, DisPt) := concat("copy ", point(Object), sp, point(BasePt), sp, sp, "mode ", "single ", sp, point(DisPt))
CreateLayout(LayoutName) := concat("-layout ", "n ", stringit(LayoutName), sp)
SetLayout(LayoutName) := concat("-layout ", "s ", stringit(LayoutName), sp)
VPortErase(VPort) := concat(".erase ", point(VPort), sp)
VPortNew(Corner1, Corner2) := concat("-vport ", point(Corner1), sp, point(Corner2), sp, "z ", "e")
ChangeView(CornerA, CornerB) := concat("ms ", "z ", "w ", point(CornerA), sp, point(CornerB), sp, "ps")
N_HLayouts(PaperLength) := floor((OrificeCenterDist*N_LfomOrifices[0] + D_LfomOrifices)/(floor(PaperLength/OrificeCenterDist)*OrificeCenterDist - D_LfomOrifices)) + 1
N_VLayouts(PaperWidth) := floor((H_LfomOrifices[last(H_LfomOrifices)] + D_LfomOrifices/2)/(floor(PaperWidth/(H_LfomOrifices[1] - H_LfomOrifices[0]))*(H_LfomOrifices[1] - H_LfomOrifices[0])))
SetUpHLayouts(N_Layout) :=
    Num ← 1 m
    Layout ← CreateLayout(Num)
    for a ∈ 1 .. N_Layout
        if a == 1
            Layout ← stack(Layout, SetLayout(Num), VPortErase([1; 7]*m), VPortNew([.013; .013]*m, [
                .013 m + (floor(L_Paper/OrificeCenterDist)*OrificeCenterDist - D_LfomOrifices) + D_LfomOrifices/2;
                floor(W_Paper/(H_LfomOrifices[1] - H_LfomOrifices[0]))*(H_LfomOrifices[1] - H_LfomOrifices[0]) + .013 m
            ]), ChangeView([
                XStartPoint + (-D_LfomOrifices/2) + ((floor(L_Paper/OrificeCenterDist)*OrificeCenterDist)*(a - 1));
                YStartPoint
            ], [
                XStartPoint + (floor(L_Paper/OrificeCenterDist)*OrificeCenterDist - D_LfomOrifices)*a;
                YStartPoint + floor(W_Paper/(H_LfomOrifices[1] - H_LfomOrifices[0]))*(H_LfomOrifices[1] - H_LfomOrifices[0])
            ]))
        if a ≠ 1
            Layout ← stack(Layout, CreateLayout(Num), SetLayout(Num), VPortErase([1; 7]*m), VPortNew([.013; .013]*m, [
                .013 m + (floor(L_Paper/OrificeCenterDist)*OrificeCenterDist - D_LfomOrifices) + D_LfomOrifices/2;
                floor(W_Paper/(H_LfomOrifices[1] - H_LfomOrifices[0]))*(H_LfomOrifices[1] - H_LfomOrifices[0]) + .013 m
            ]), ChangeView([
                XStartPoint + (-D_LfomOrifices/2) + ((floor(L_Paper/OrificeCenterDist)*OrificeCenterDist)*(a - 1));
                YStartPoint
            ], [
                XStartPoint + (floor(L_Paper/OrificeCenterDist)*OrificeCenterDist - D_LfomOrifices)*a;
                YStartPoint + floor(W_Paper/(H_LfomOrifices[1] - H_LfomOrifices[0]))*(H_LfomOrifices[1] - H_LfomOrifices[0])
            ]))
        Num ← Num + 1 m
    return Layout
SetUpVLayouts(N_Layout, PaperLength) :=
    Num ← N_HLayouts(PaperLength)*m + 1 m
    Layout ← CreateLayout(Num)
    for b ∈ 1 .. N_Layout
        if b == 1
            Layout ← stack(Layout, SetLayout(Num), VPortErase([1; 7]*m), VPortNew([.013; .013]*m, [
                .013 m + (floor(L_Paper/OrificeCenterDist)*OrificeCenterDist - D_LfomOrifices) + D_LfomOrifices/2;
                floor(W_Paper/(H_LfomOrifices[1] - H_LfomOrifices[0]))*(H_LfomOrifices[1] - H_LfomOrifices[0]) + .013 m
            ]), ChangeView([
                XStartPoint + (-D_LfomOrifices/2) + ((floor(L_Paper/OrificeCenterDist)*OrificeCenterDist)*(b - 1));
                YStartPoint + floor(W_Paper/(H_LfomOrifices[1] - H_LfomOrifices[0]))*(H_LfomOrifices[1] - H_LfomOrifices[0])*b
            ], [
                XStartPoint + (floor(L_Paper/OrificeCenterDist)*OrificeCenterDist - D_LfomOrifices)*b;
                YStartPoint + floor(W_Paper/(H_LfomOrifices[1] - H_LfomOrifices[0]))*(H_LfomOrifices[1] - H_LfomOrifices[0])*(b + 1)
            ]))
        if b ≠ 1
            Layout ← stack(Layout, CreateLayout(Num), SetLayout(Num), VPortErase([1; 7]*m), VPortNew([.013; .013]*m, [
                .013 m + (floor(L_Paper/OrificeCenterDist)*OrificeCenterDist - D_LfomOrifices) + D_LfomOrifices/2;
                floor(W_Paper/(H_LfomOrifices[1] - H_LfomOrifices[0]))*(H_LfomOrifices[1] - H_LfomOrifices[0]) + .013 m
            ]), ChangeView([
                XStartPoint + (-D_LfomOrifices/2) + ((floor(L_Paper/OrificeCenterDist)*OrificeCenterDist)*(b - 1));
                YStartPoint + floor(W_Paper/(H_LfomOrifices[1] - H_LfomOrifices[0]))*(H_LfomOrifices[1] - H_LfomOrifices[0])*b
            ], [
                XStartPoint + (floor(L_Paper/OrificeCenterDist)*OrificeCenterDist - D_LfomOrifices)*b;
                YStartPoint + floor(W_Paper/(H_LfomOrifices[1] - H_LfomOrifices[0]))*(H_LfomOrifices[1] - H_LfomOrifices[0])*(b + 1)
            ]))
        Num ← Num + N_HLayouts(PaperLength)*m + 1 m
    return Layout
DelineateL(PaperLength, XStartPoint, YStartPoint) := concat("_line ", point([
    XStartPoint + floor(PaperLength/OrificeCenterDist)*OrificeCenterDist - D_LfomOrifices;
    YStartPoint + (H_LfomOrifices[0] - D_LfomOrifices/2)
]), sp, point([
    XStartPoint + floor(PaperLength/OrificeCenterDist)*OrificeCenterDist - D_LfomOrifices;
    YStartPoint + H_LfomOrifices[last(H_LfomOrifices)] + D_LfomOrifices/2
]), sp)
DelineateLMultiple(PaperLength, PaperWidth, XStartPoint, YStartPoint) :=
    TempX ← XStartPoint
    Line ← Boundary
    b ← 0
    while XStartPoint < TempX + (N_LfomOrifices[0]*OrificeCenterDist)
        Label_MiddleS ← [
            XStartPoint + floor(PaperLength/OrificeCenterDist)*OrificeCenterDist - D_LfomOrifices + .5 cm;
            (YStartPoint + H_LfomOrifices[last(H_LfomOrifices)] + D_LfomOrifices/2)/2 - 1 cm
        ]
        Label_MiddleE ← [
            XStartPoint + floor(L_Paper/OrificeCenterDist)*OrificeCenterDist - D_LfomOrifices + .5 cm;
            (YStartPoint + H_LfomOrifices[last(H_LfomOrifices)] + D_LfomOrifices/2)/2 + 2 cm
        ]
        Label_TopS ← [
            XStartPoint + floor(PaperLength/OrificeCenterDist)*OrificeCenterDist - D_LfomOrifices - 1 cm;
            YStartPoint + floor(PaperWidth/(H_LfomOrifices[1] - H_LfomOrifices[0]))*(H_LfomOrifices[1] - H_LfomOrifices[0]) - 2 cm
        ]
        Label_TopE ← [
            XStartPoint + floor(L_Paper/OrificeCenterDist)*OrificeCenterDist - D_LfomOrifices - .5 cm;
            YStartPoint + floor(PaperWidth/(H_LfomOrifices[1] - H_LfomOrifices[0]))*(H_LfomOrifices[1] - H_LfomOrifices[0]) - .5 cm
        ]
        Line ← stack(Line, DelineateL(PaperLength, XStartPoint, YStartPoint), Zoom, LabelLayout(Labels[:, 1][b], .005 m, Label_MiddleS, Label_MiddleE, 90 m), "", CopyText(Label_MiddleE, Label_MiddleS, [-.015; 0]*m), LabelLayout(Labels[:, 0][b], .005 m, Label_TopS, Label_TopE, 0 m), "", Zoom)
        XStartPoint ← (XStartPoint + ((floor(PaperLength/OrificeCenterDist)*OrificeCenterDist) - D_LfomOrifices + D_LfomOrifices/2))
        b ← b + 1
    return Line
DelineateW(PaperWidth, XStartPoint, YStartPoint) := concat("_line ", point([
    XStartPoint - D_LfomOrifices/2;
    YStartPoint + floor(PaperWidth/(H_LfomOrifices[1] - H_LfomOrifices[0]))*(H_LfomOrifices[1] - H_LfomOrifices[0])
]), sp, point([
    XStartPoint + D_LfomOrifices + N_HLayouts(L_Paper)*(floor(L_Paper/OrificeCenterDist)*OrificeCenterDist - D_LfomOrifices);
    YStartPoint + (floor(PaperWidth/(H_LfomOrifices[1] - H_LfomOrifices[0]))*(H_LfomOrifices[1] - H_LfomOrifices[0]))
]), sp)
DelineateWMultiple(PaperLength, PaperWidth, XStartPoint, YStartPoint) :=
    TempY ← YStartPoint
    Line ← Boundary
    a ← 0
    while YStartPoint < (TempY + H_LfomOrifices[last(H_LfomOrifices)] + D_LfomOrifices) - (floor(PaperWidth/(H_LfomOrifices[1] - H_LfomOrifices[0]))*(H_LfomOrifices[1] - H_LfomOrifices[0]))
        Label_MiddleS ← [
            XStartPoint + floor(PaperLength/OrificeCenterDist)*OrificeCenterDist - D_LfomOrifices - 5 cm;
            YStartPoint + floor(PaperWidth/(H_LfomOrifices[1] - H_LfomOrifices[0]))*(H_LfomOrifices[1] - H_LfomOrifices[0]) + 1 cm
        ]
        Label_MiddleE ← [
            XStartPoint + floor(PaperLength/OrificeCenterDist)*OrificeCenterDist - D_LfomOrifices - 2 cm;
            YStartPoint + floor(PaperWidth/(H_LfomOrifices[1] - H_LfomOrifices[0]))*(H_LfomOrifices[1] - H_LfomOrifices[0]) + .5 cm
        ]
        Label_TopS ← [
            XStartPoint + floor(PaperLength/OrificeCenterDist)*OrificeCenterDist - D_LfomOrifices - 1 cm;
            YStartPoint + H_LfomOrifices[last(H_LfomOrifices)] + D_LfomOrifices/2 - 2 cm
        ]
        Label_TopE ← [
            XStartPoint + floor(L_Paper/OrificeCenterDist)*OrificeCenterDist - D_LfomOrifices - .5 cm;
            YStartPoint + H_LfomOrifices[last(H_LfomOrifices)] + D_LfomOrifices/2 - .5 cm
        ]
        Line ← stack(Line, DelineateW(PaperWidth, XStartPoint, YStartPoint), LabelLayout(Labels[:, 1][a + N_HLayouts(PaperLength)], .005 m, Label_MiddleS, Label_MiddleE, 0 m), "", CopyText(Label_MiddleE, Label_MiddleS, [0; -.015]*m), LabelLayout(Labels[:, 0][a + N_HLayouts(PaperLength)], .005 m, Label_TopS, Label_TopE, 0 m), "", Zoom)
        YStartPoint ← YStartPoint + floor(PaperWidth/(H_LfomOrifices[1] - H_LfomOrifices[0]))*(H_LfomOrifices[1] - H_LfomOrifices[0])
        a ← a + 1
    return Line
# Functions
# Drawing Code
LfomOrificesTemplate :=
    Local ← view("t")
    for h ∈ 0 .. last(H_LfomOrifices)
        origin ← [XStartPoint + D_LfomOrifices/2*(mod(h, 2) == 0); YStartPoint + H_LfomOrifices[h]]
        Crosshair ← concat("z ", "e ", "_line ", point(origin[:, 0] - [D_LfomOrifices/4; 0 m]), sp, point(origin[:, 0] + [D_LfomOrifices/4; 0 m]), sp, sp, "_line ", point(origin[:, 0] - [0 m; D_LfomOrifices/4]), sp, point(origin[:, 0] + [0 m; D_LfomOrifices/4]), sp)
        PointArray ← [
            [origin[0] - D_LfomOrifices/3; origin[1]];
            [origin[0]; origin[1] - D_LfomOrifices/3];
            [origin[0] + (D_LfomOrifices/2*sqrt(2)/2); origin[1]];
            [origin[0]; origin[1] + (D_LfomOrifices/2*sqrt(2)/2)]
        ]
        Local ← stack(Local, circle(origin, D_LfomOrifices/20), circle(origin, D_LfomOrifices/2), Crosshair) if N_LfomOrifices[h] ≠ 0
        Local ← stack(Local, ArrayMultiple(PointArray, 1, N_LfomOrifices[h], 0, OrificeCenterDist)) if N_LfomOrifices[h] > 1
    Local ← stack(Local, LfomDiameterDim, DelineateLMultiple(L_Paper, W_Paper, XStartPoint, YStartPoint), DelineateWMultiple(L_Paper, W_Paper, XStartPoint, YStartPoint), SetUpHLayouts(N_HLayouts(L_Paper)), SetUpVLayouts(N_VLayouts(W_Paper), L_Paper))
    return Local
AC_LfomOrificesTemplate := LfomOrificesTemplate
AC_LfomOrificesTemplate =  # error: This variable is undefined.
