# LFOM Modular Design
# User Inputs
Q_Plant := 12*L/s
# To be left undefined and inputed online by the user
L_RMPipeVert := 2 m
# From Expert Inputs
Country := 0
Language := 0
Rho_H2O := 1000*kg/m^3  # Density of water
Nu_Water := 1*10^-6*m^2/s  # The kinematic viscosity of water.
Rho_FB := 1001*kg/m^3  # Density of Flocs
Re_PipeTransition := 2100
E_Pvc := 0.12 mm
E_Concrete := 2 mm
E_ConcreteLedge := 0.014 mm
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Pi_Jet := 0.4
# This is an empirically determined factor to make the equation
# correct.
Pi_VenaContractaOrifice := 0.63
P_Atm := 1 atm
Nu_Air := 12*mm^2/s
Rho_Air := 1.204*kg/m^3
Rho_Clay := 2.65*gm/mL
Plant_Origin := [0; 0; 0]*m
T_PlantWall := 15 cm
T_ConcreteMin := 5 cm
EN_DrillSeries := 0  # 0 is English, 1 is metric
EN_TubeSeries := 0
W_HumanMin := 0.54 m
H_HumanAccess := 1.5 m  # The height of the walkway above the drain channel bottom so that someone can walk through the drain channel.
acad_version := 2008
H_Freefall := 0.1 m
H_PlantFreeboard := 0.1*m
EN_PlantDrains := 1  # Set to zero if drains on left, 1 if drains on right
D_Rebar := 1/2*in
ND_SpacerPipe := 3/4*in
S_Fitting := 5 cm  # minimum space between fittings in a tank or fittings and the wall of the tank.
W_ChannelMin := 15 cm  # Minimum channel width for constructability
W_DeepChannelMin := 30 cm  # Minimum channel width for a deep channel. Assumes you may need to stick your head in the channel.
H_DeepChannelMax := 60 cm  # The maximum depth of a channel, based on having your arm reach to the bottom of the channel.
S_ChannelPipeWall := 2 cm  # Extra space allowed on both sides of pipe to avoid interference with the channel walls
Π_Rectangular := 1/2  # Π.Rectangular is defined as the optimum "height over width ratio" (1/2) for a rectangular open channel
HL_ChannelMax := 5 cm
EN_MatApply := 0  # EN.MatApply equals 0 if materials are not to be applied, otherwise materials are applied
USD := ¤  # Defining US Dollars as a currency unit
Lem := USD/19.06  # Lempira/US Dollar exchange rate as of 3/5/2012
EN_Water := 0  # Equals 1 to draw boxes showing max water levels, 0 normally
# If EN_Water is set to 1, this controls the filter operation mode for which water/sand elevations are drawn. 0 for terminal, 1 for clean bed, and 2 for backwash.
EN_FilterWater := 2
EN_DrillSeries := 0
Π_Lfomorifice := 10  # Number of rows in lfom.  note: execution time of the lfom file exponentially increases with this number.
Π_LfomSafety := 1.5  # sefety coefficient for lfom pipe diameter
HL_Nlfom := 40 cm  # head loss through nonlinear orifice meter (simple orifice)
HL_Lfom := 20 cm  # head loss through linear orifice meter (sutro weir analog)
HL_CoagCdc := HL_Lfom
H_LfomSF := 5 cm
N_Lfom := 1
S_LfomOrificesMin := 5 mm  # Difference between the height of the water in floc tank and the bottom set of holes on the linear flow orifice meter
H_LfomFreefall := 5 cm
# Both of these assumptions were tested over a range of flow rates and found to give reasonable Lfom configurations.
Pi_Sutro := 0.1
Pi_Lfomorifice := 20
D_DrillEng :=
    i ← 0
    D_DrillEng[0] ← 1/32*in
    while D_DrillEng[i] ≤ 3/16*in - 1/128*in
        i ← i + 1
        D_DrillEng[i] ← D_DrillEng[i - 1] + 1/128*in
    while D_DrillEng[i] < 1 in - 1/16*in
        i ← i + 1
        D_DrillEng[i] ← D_DrillEng[i - 1] + 1/16*in
    while D_DrillEng[i] < 2 in
        i ← i + 1
        D_DrillEng[i] ← D_DrillEng[i - 1] + 1/4*in
    return D_DrillEng
D_DrillMet :=
    i ← 0
    D_DrillMet[0] ← 0.5 mm
    while D_DrillMet[i] ≤ 5 mm - 0.1 mm
        i ← i + 1
        D_DrillMet[i] ← D_DrillMet[i - 1] + 0.1 mm
    while D_DrillMet[i] < 20 mm
        i ← i + 1
        D_DrillMet[i] ← D_DrillMet[i - 1] + 1 mm
    while D_DrillMet[i] < 50 mm
        i ← i + 1
        D_DrillMet[i] ← D_DrillMet[i - 1] + 2 mm
    return D_DrillMet
D_Drill :=
    D_Drill ← D_DrillEng if EN_DrillSeries == 0
    D_Drill ← D_DrillMet otherwise
EN_LinearFlow := 1  # 1 if using Lfom, zero if using nonlinear system
HL_Flowmeasure :=
    HL_Lfom if EN_LinearFlow
    HL_Nlfom otherwise
# Design References
# [reference: MathFunctions.xmcd]
# [reference: PipeDatabase.xmcd]
# [reference: FluidsFunctions.xmcd]
# [reference: SedimentationTank.xmcd]
# [reference: Flocculator.xmcd]
# [reference: LFOM.xmcd]
# [reference: EntranceTank.xmcd]
# [reference: MtoATranslators.xmcd]
# [reference: MtoATranslatorsWrapped.xmcd]
# [reference: PlumbingF.xmcd]
# LFOM Code
LFOM_Origin := [0; 0; 0]*m
# LFOM Pipe
RMPipeLayer := layer_new("EtRmPipePlu", blue)
RMVertPipe := PipeSUBF([LFOM_Origin[0]; LFOM_Origin[1]; LFOM_Origin[2]], L_RMPipeVert, [0; 90; 0]*deg, ND_RMPipe, PS_Default, ["EtCon"])
FreezeRMPipe := FreezeLayer("EtRmPipePlu")
SelectRMPipes := SelectLayer("EtRmPipePlu")
# LFOM Orifices
LfomOrifices :=
    Local ← FreezeRMPipe
    for h ∈ 0 .. last(H_LfomOrifices)
        if N_LfomOrifices[h] ≠ 0
            Local ← stack(Local, CylinderF([LFOM_Origin[0]; LFOM_Origin[1]; L_RMPipeVert - HL_Flowmeasure + H_LfomOrifices[h]], D_LfomOrifices/2, outerradius(ND_RMPipe) + zc, [
                90 deg + (asin(0.5*S_LfomOrificesMin/(2*outerradius(ND_RMPipe))) + asin(D_LfomOrifices/(2*outerradius(ND_RMPipe))))*(mod(h, 2) == 0);
                0 deg
            ]))
        Local ← stack(Local, ArrayLastPolar([LFOM_Origin[0]; LFOM_Origin[1]; L_RMPipeVert - HL_Flowmeasure + H_LfomOrifices[h]], N_LfomOrifices[h], (N_LfomOrifices[h] - 1)*(2*asin(D_LfomOrifices/(2*outerradius(ND_RMPipe))) + 2*asin(S_LfomOrificesMin/(2*outerradius(ND_RMPipe)))))) if N_LfomOrifices[h] > 1
    return Local
SubtractRMPipeOrifices := SubtractF(["EtRmPipePlu"], "DeleteMe")
LFOMScript := stack(RMPipeLayer, RMVertPipe, FreezeRMPipe, GroupAll("DeleteMe"), SubtractRMPipeOrifices, SelectRMPipes, LfomOrifices, GroupAll("DeleteMe"), SubtractRMPipeOrifices)
LFOMScript2 := stack(RMPipeLayer, RMVertPipe, FreezeRMPipe, LfomOrifices, GroupAll("DeleteMe"), SubtractRMPipeOrifices)
# [component: inputs LFOMScript2]
