# Code created by Heidi Rausch (her28@cornell.edu)
# SRSF Modular Code
Mod := 1
# User Inputs
# To be left undefined and inputed online by the user
Q_Plant := □  # error: This placeholder is empty.
N_FiLayerUser := □  # error: This placeholder is empty.
D_FiSandUser := □  # error: This placeholder is empty.
# From Expert Inputs
# [reference: ExpertInputs.xmcd]
N_FiLayer := N_FiLayerUser  # error: This variable is undefined.
# Design References
# [reference: MathFunctions.xmcd]
# [reference: PipeDatabase.xmcd]
# [reference: MaterialsDatabase.xmcd]
# [reference: FluidsFunctions.xmcd]
D_FiSandES := D_FiSandUser  # error: This variable is undefined.
D_FiSand60 := D_FiSandES*Pi_UCFiSand  # error: This variable is undefined.
# From SRSF Design Code
Z_SedWeirExit := 3 m  # I made this an arbitartily high height for the modular code
W_SedInletChannel := 0 m  # for this code I have defined this as 0m
ND_SedManifold := 8 in  # for this code this is pre-set as the largest pipe diameter that the sed manifold pipe can be
Z_SedChannelBottom := 10 m  # not actually used for design but must be defined for code to work
# [reference: StackedRapidSandFilter.xmcd]
# From SRSF Drawing Code
L_Sed := 1 m
N_SedTanks := 1
W_Sed := 1 m
N_SedBays := 1
L_SedOutletVertPipe := 0 m  # for this modular code it doesn't matter what this is so I made it 0m
# [reference: MtoATranslators.xmcd]
# [reference: MtoATranslatorsWrapped.xmcd]
# [reference: ChannelF.xmcd]
# [reference: PlumbingF.xmcd]
# [reference: TankF.xmcd]
# [reference: StairsF.xmcd]
# [reference: DrainChannelF.xmcd]
# [reference: StackedRapidSandFilterAC.xmcd]
# Filter Modular Script Outputs
AC_FilterMod =  # error: This variable is undefined.
# Previews
# [reference: LayoutsAC.xmcd]
AI_Filter = [
    "laythw"; "_-view o t"; "-plot y "; "PublishToWeb PNG.pc3"; "VGA (640.00 x 480.00 Pixels)"; "l n e F"; ""; " ."; "y  [FILEPATH]SRSF_t"; "n y"
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]
# Display Variables
Q_Plant =  # error
