# AguaClara Design Tool
Country =  # error: This variable is undefined.
C_ChlorineDoseMax := 2*mg/L
C_ChlorineStock := 50*gm/L
Ti_ChlorineStock := 30 hr
Language =  # error
Country := 0
## References
# Design References
# MathCAD dimension calculations:
# [reference: BasicClientInputs.xmcd]
# [reference: BasicInputs.xmcd]
# [reference: ExpertInputs.xmcd]
# [reference: DesignAssumptions.xmcd]
# [reference: MathFunctions.xmcd]
# [reference: PipeDatabase.xmcd]
# [reference: MinorLossCoefficients.xmcd]
# [reference: FluidsFunctions.xmcd]
# [reference: Sedimentation Tank.xmcd]
# [reference: Flocculator.xmcd]
# [reference: LFOM.xmcd]
# [reference: EntranceTankDim.xmcd]
# [reference: LinearCdc_app37.xmcd]
# [reference: ChemStorageCylinders.xmcd]
# [reference: Stacked Rapid Sand Filter.xmcd]
# [reference: Materials List.xmcd]
# AutoCAD drawing programs:
# Translators:
# These are the codes that take MathCAD outputs and create AutoCAD scripts that are used to draw the plant (formerly Basics)
# [reference: MtoATranslators.xmcd]
# The wrapped MtoA translator contains the functions that the user will want to access. These functions will draw pieces with full functionality - specifying the location, dimension, and orientation of the object. Also, it contains layer control and subtraction capabilities for grouped objects.
# [reference: MtoATranslators Wrapped.xmcd]
# Plant Elements:
# These are all of the files that draw the fundamental parts of the plants (tees, elbows, tanks, pipes, etc)
# [reference: Channel.xmcd]
# [reference: cross.xmcd]
# [reference: Sludge.xmcd]
# [reference: Manifold.xmcd]
# [reference: pipe.xmcd]
# [reference: elbow.xmcd]
# [reference: tank.xmcd]
# [reference: adapter.xmcd]
# [reference: Tee.xmcd]
# [reference: pvccap.xmcd]
# [reference: LaunderCap.xmcd]
# [reference: ChimneyStops.xmcd]
# [reference: laminaplain.xmcd]
# [reference: Stairs.xmcd]
# [reference: DrainChannel.xmcd]
# [reference: Manifold.xmcd]
# Specific Pieces:
# These are the codes that draw the bigger pieces of the plant (the sed tank, floc tank, etc)
# [reference: floctank.xmcd]
# [reference: SedTank- with pieces.xmcd]
# [reference: Entrance Tank.xmcd]
# [reference: Plant Drain Channel.xmcd]
# [reference: ChemStockCylinders.xmcd]
# [reference: SRSF.xmcd]
# [reference: Operator Access.xmcd]
# Layouts:
# This file will execute at the very end to create multiple views of the entire plant in paperspace
# [reference: Layouts.xmcd]
## All variables displayed must have the standard SI units. They may not have units attached by the user.
# General:
Q_Plant = 0.012 m^3/s
T_PlantWall = 0.15 m
W_SedPlate = 1.08 m
T_ConcreteMin = 0.05 m
L_SedPlateSheet = 3.658 m
C_CoagStock = 120 kg/m^3
T_SedPlate = 0.002 m
Ti_CoagStock = 108000 s
T_SedWeir = 0.05 m
C_ChlorineStock = 50 kg/m^3
W_SedBay = 1.08 m
Ti_ChlorineStock = 108000 s
EN_FcmTube = 0
H_PlantFreeboard = 0.1 m
EN_DrillSeries = 1
# Entrance Tank
V_EtUp = 0.008 m/s
H_Et = 1.70194 m
H_EtTop = 0.2 m  # height of the top part of the entrance tank above the hoppers
W_Et = 0.54 m
L_Et = 3.74163 m
ND_EtDrain = 0.0762 m
ZW_Et = 2.16837 m
Z_EtTop = 2.26837 m
ND_EtOverflow = 0.2032 m
Z_Et = 0.566437 m  # elevation of top of slab.
ND_RMPipe = 0.2032 m
Z_EtHopper = 1.96837 m
H_EtHopper = 1.40194 m
N_EtHoppers = 2
AN_EtSlope = 1.0472
L_EtHopper = 1.82042 m
W_EtDC = 0.218269 m  # drain channel under entrance tank dimensions
L_EtDC = 3.74163 m
H_EtDC = 0.0443806 m
# Flow measurement
D_LfomOrifices = 0.019 m
S_LfomRows = 0.02 m
H_LfomOrifice = [0.0095; 0.0295; 0.0495; 0.0695; 0.0895; 0.1095; 0.1295; 0.1495; 0.1695; 0.1895] m
Q_LfomScale = [0; 0.0012; 0.0024; 0.0036; 0.0048; 0.006; 0.0072; 0.0084; 0.0096; 0.0108; 0.012] m^3/s
N_LfomOrifices = [15; 4; 5; 3; 4; 2; 3; 3; 2; 2]
ND_Lfom = 0.2032 m
HL_Lfom = 0.2 m
# Rapid Mix
ED_Tee = 0.0861918 m^2/s^3
Z_LfomOrifices = 1.97787 m  # elevation of the center of
Z_EtExit = 1.54957 m  # elevation of center of pipe exiting the entrance tank and heading toward the flocculator
# Plant Drain Channel:
W_DC = 0.5 m
H_DC = 0.0462521 m
L_DC = 11.3721 m
# Coag Dose Controller:
Z_CoagTank = 2.56837 m
Z_CoagTankOutlet = 2.66837 m
L_CdcFloatArm = 0.41275 m
L_CdcScaleArm = 0.50165 m
# Flocculator:
H_Floc = 1.93146 m
Z_FlocTank = 0 m  # Look at Flocculator Positioning arrays
N_FlocValves = 2
W_FlocChannel = 0.54 m
Ti_Floc = 1043.25 s  # Fill last channel with bafffles from last channel
H_FlocSlope = 0.0301625 m  # Fix port width to be based on energy dissipation in that channel
ED_Floc = 0.01 m^2/s^3
# Adjust spacing after the number of baffles per channel is known.
V_Floc = 0.142721 m/s  # Check the residence time of the flocculator should be at least 20minutes
HW_FlocEnd = 1.65242 m
ND_FlocValve = 0.0508 m
CP_Floc = 100 m^(2/3)
Ti_FlocDrain = 1800 s
CP_FlocTotal = 103.43 m^(2/3)
G_Floc = 41.0238 1/s
N_FlocChannels = 4
L_FlocTank = 14.0299 m
ED_FlocChannelFirst = 0.00758548 m^2/s^3
HL_Floc = 0.179036 m
HW_FlocStart = 1.83146 m
S_FlocBaffle = [0.155704; 0.155704; 0.155704; 0.158775] m
B_FlocBaffle = [0.157704; 0.157704; 0.157704; 0.160775] m
N_FlocChannelBaffles = [21; 21; 21; 20]
W_FlocPort = [0.155704; 0.155704; 0.155704; 0.165118] m
HL_FlocChannels = [0.045696; 0.045696; 0.045696; 0.0419476] m
L_FlocBaffleLower = 1.41886 m
L_FlocBaffleUpper = 1.6479 m
H_FlocPort = [0.54; 0.54; 0.54; 0.519256] m
Ti_Floc = 1043.25 s  # residence time of the flocculator
N_FlocBaffles = 83
# Sed Tanks:
N_SedTanks = 4
H_SedBetween = 0 m  # Distance from the top of the inlet manifold to the bottom of the ledge supporting the lamella frame
L_Sed = 3.50748 m
N_SedBays = 1  # Number of bays of inlet manifolds in each sed tank
# Length of the port through which water exits the inlet manifold
# Width of ferrous cement plates in whice one manifold port is cut
Q_SedBay = 0.003 m^3/s
ND_FlocValve = 2 in
V_SedCBod = 0.00012 m/s
V_SedUpBod = 0.0008 m/s
W_SedSlope = 0.416816 m
AN_SedSlope = 1.0472
H_SedBayDivider = 0.82013 m
Ti_Sed = 1756.97 s
# Sedimentation Tank Sludge Drain:
N_SedSludgeOrifices = 35  # per cell
Ti_SludgeDrain = 1800 s  # Tank Drain time
W_SedSludge = 0.0963685 m  # Width of the sludge channel
B_SedSludgeOrifices = 0.1 m  # Distance center to center between drain orifices
H_SedSludge = 0.0481842 m  # Depth of the sludge channel
T_SedSludge = 0.05 m
T_SedSludge = 0.05 m
# Thickness of the plate topping the sludge channel
# through which drain holes are formed
W_SedDrainCover = 0.196368 m
D_SedSludgeOrifice = 0.011 m  # Diameter of drain orifices
W_SedInletBottom = 0.441816 m
N_SedSludgeOrifices = 35
ND_SedSludgeValve = 0.0508 m
# Sedimentation Tank Dimensions:
Z_SedSludge = 0.0981842 m  # Height from 0 of the top of the sludge drain
Z_SedSlopes = 0.82013 m  # Height from 0 of the top of the inlet manifold
W_Sed = 1.08 m  # Total tank wall height
L_Sed = 3.50748 m  # Total tank length
H_Sed = 1.75242 m
# Sedimentation Tank Inlet Channel:
HW_InletChannel = 0.255049 m
W_InletChannel = 0.405049 m
L_Channel = 5.07 m
N_SedInletPipes = 1  # per sed bay
H_InletChannel = 0.355049 m
HL_SedWeirInlet = 0.0117426 m
W_SedInletchannelPreweir = 0.255049 m
H_SedWeirInlet = 0.243306 m
W_SedWeirInlet = 5.07 m
# Sedimentation Tank Effluent Launder:
N_SedLaunderOrifices = 44  # Number of orifices per launder
N_SedLaunderOrificesRow = 22  # Number of orifices per row
Z_SedLaunder = 1.54353 m
Q_SedLaunderOrifices = 7.12829e-5 m^3/s  # More Launder Dimensions
L_SedLaunder = 2.39129 m
ND_SedLaunder = 0.1016 m
B_SedLaunderOrifices = 0.10219 m  # Center to center launder spacing
D_SedLaunderOrifice = 0.013 m
# Sedimentation Tank Inlet Manifold:
ND_SedManifold = 0.1524 m
L_Diffuser = 0.176174 m
Z_SedManifoldLift = 0.264262 m
D_Diffuser = 0.0381 m
D_SedManifoldPort = 0.036 m
B_SedManifoldPort = 0.1 m
N_SedManifoldPorts = 29
L_SedManifoldPipe = 3.37996 m
S_SedManifoldBetween = 0.009 m
ND_SedManifoldDiffuser = 0.0381 m
L_SedManifoldDiffuser = 0.176174 m
ED_SedInlet = 0.01 m^2/s^3
Q_SedManifoldPort = 0.000103448 m^3/s
# Exit Channel:
W_ExitChannel = 0.3532 m
H_ExitChannel = 0.355049 m
L_ExitChannel = 5.07 m
H_PltWeir = 0.265049 m  # height of the weir carrying water to the distribution tank
HW_ExitChannel = 0.215049 m  # water height in exit channel from 0
# Lamella:
L_SedPlate = 0.609667 m
B_SedPlate = 0.0287961 m  # center to center distance between lamella
S_SedPlate = 0.0267961 m  # spacing between lamella
N_SedPlates = 70  # Number of Sed Plates per Sedimentation Tank Bay.
N_SedModules = 7  # Number of modules per bay
N_SedModulePlates = 10  # Number of plates per module
AN_SedPlate = 1.0472
V_SedC = 0.000118182 m/s
L_SedActive = 2.32756 m
V_SedUp = 0.000791957 m/s
Z_SedLaunder = 1.54353 m
H_SedPlate = 0.527987 m
H_SedAbove = 0.166043 m  # Height of water needed above the lamella
HW_Sed = 1.65242 m
H_Sed = 1.75242 m
Z_Mp = 1.39737 m
H_SedBayDivider = 0.82013 m
# SRSF:
H_Fi = 3.7959 m
L_Fi = 1.4 m
W_Fi = 0.978446 m
B_FiManifoldBranch = 0.1 m
ND_FiTrunk = 0.1016 m
ND_FiManBranch = 0.0254 m
ND_FiBwTrunk = 0.1524 m
ND_FiBwManBranch = 0.0381 m
ND_FiExitWaste = 0.0762 m
ND_FiBwWeirDrain = 0.1524 m
ND_FiBwDrain = 0.0762 m  # For the box that holds keeps the end of the siphon submerged
ND_FiSandOutlet = 0.0508 m
Ti_FiSand = 609.668 s
ND_FiSiphonAirValve = 0.0508 m
ND_FiSiphon = 0.1524 m
Q_FiSiphonMax = 0.0579688 m^3/s
B_FiSiphonManOrifices = 0.1 m
N_FiSiphonManOrifices = 13
D_FiSiphonManOrifices = 0.0428529 m
Ti_FiBwInitiation = 80.4126 s
H_FiSand = 1.2 m
N_FiLayer = 6
H_FiLayer = 0.2 m
V_FiLayer = 0.00183333 m/s
HL_FiTerminal = 0.451428 m
V_FiBw = 0.011 m/s
HL_FiBwInitiation = 1.588 m
HL_FiBwSS = 1.188 m
D_FiSand = 0.0005 m
N_Fi = 1
Q_Fi = 0.012 m^3/s
W_Slots = 0.0002032 m
B_FiBwManSlot = 0.0047625 m
L_FiBwManSlot = 0.0197669 m
B_FiManSlot = 0.003175 m
L_FiManSlot = 0.0263827 m
N_FiSlotRows = 2
Z_FiBottom = -2.23732 m
Z_FiTop = 1.55858 m
# Weirs
HL_FiWeir = 0.0420986 m
L_FiWeir = 0.746887 m
Z_FiEntranceWeir = 1.45858 m
Z_FiBwWeir = -0.348743 m
Z_FiSiphonInlet = -0.448743 m  # This is the centerline elevation of the siphon orifices
Z_FiExitWeir = 0.922307 m
Z_FiExitBottom = 0.822307 m  # bottom of the filtered water box
Z_FiEntranceBottom = 0.822307 m  # bottom of the entrance box
Z_FiSiphonCoupling = 0.83817 m
Z_FiBwTop = -0.12844 m
W_FiBwDrain = 0.348518 m
H_FiBwDrain = 0.332357 m
# Materials List:
N_Launders = 4
L_LaunderPipeTotal = 9.56517 m
N_LaunderCouplings = 4
N_ValveCouplings = 4
N_SedPlatesTotal = 280
N_SedPlatesPerSheet = 6
N_SedPlateSheets = 47
N_Valves = 4
A_EtFloor = 3.39497 m^2
AC_SedTankA :=
    AC_SedTank if last(AC_SedTank) < 598
    submatrix(AC_SedTank, 0, 598, 0, 0) otherwise
AC_FilterA :=
    AC_Filter if last(AC_Filter) < 598
    submatrix(AC_Filter, 0, 598, 0, 0) otherwise
AC_SedTankB :=
    submatrix(AC_SedTank, 599, last(AC_SedTank), 0, 0) if last(AC_SedTank) < 1197
    submatrix(AC_SedTank, 599, 1197, 0, 0) otherwise
AC_FilterB :=
    submatrix(AC_Filter, 599, last(AC_Filter), 0, 0) if last(AC_Filter) < 1197
    submatrix(AC_Filter, 599, 1197, 0, 0) otherwise
AC_SedTankC :=
    submatrix(AC_SedTank, 1198, last(AC_SedTank), 0, 0) if last(AC_SedTank) < 1796
    submatrix(AC_SedTank, 1198, 1796, 0, 0) otherwise
AC_FilterC :=
    submatrix(AC_Filter, 1198, last(AC_Filter), 0, 0) if last(AC_Filter) < 1796
    submatrix(AC_Filter, 1198, 1796, 0, 0) otherwise
AC_ChemTanksA :=
    AC_ChemTanks if last(AC_ChemTanks) < 598
    submatrix(AC_ChemTanks, 0, 598, 0, 0) otherwise
AC_FilterD :=
    submatrix(AC_Filter, 1797, last(AC_Filter), 0, 0) if last(AC_Filter) < 2395
    submatrix(AC_Filter, 1797, 2395, 0, 0) otherwise
AC_FlocTankA :=
    AC_FlocTank if last(AC_FlocTank) < 598
    submatrix(AC_FlocTank, 0, 598, 0, 0) otherwise
AC_ChemTanksB :=
    submatrix(AC_ChemTanks, 1198, last(AC_ChemTanks), 0, 0) if last(AC_ChemTanks) < 1197
    submatrix(AC_ChemTanks, 1198, 1796, 0, 0) otherwise
AC_FlocTankB :=
    submatrix(AC_FlocTank, 599, last(AC_Filter), 0, 0) if last(AC_Filter) < 1197
    submatrix(AC_FlocTank, 599, 1197, 0, 0) otherwise
AC_ChemTanksC :=
    submatrix(AC_ChemTanks, 1198, last(AC_ChemTanks), 0, 0) if last(AC_ChemTanks) < 1796
    submatrix(AC_ChemTanks, 1198, 1796, 0, 0) otherwise
AC_FlocTankC :=
    submatrix(AC_FlocTank, 1198, last(AC_FlocTank), 0, 0) if last(AC_FlocTank) < 1796
    submatrix(AC_FlocTank, 1198, 1796, 0, 0) otherwise
AC_DrainChannelA :=
    AC_DrainChannel if last(AC_DrainChannel) < 598
    submatrix(AC_DrainChannel, 0, 598, 0, 0) otherwise
AC_EntranceTankA :=
    AC_EntranceTank if last(AC_EntranceTank) < 598
    submatrix(AC_EntranceTank, 0, 598, 0, 0) otherwise
AC_DrainChannelB :=
    submatrix(AC_DrainChannel, 1198, last(AC_DrainChannel), 0, 0) if last(AC_DrainChannel) < 1197
    submatrix(AC_DrainChannel, 1198, 1796, 0, 0) otherwise
AC_EntranceTankB :=
    submatrix(AC_EntranceTank, 599, last(AC_EntranceTank), 0, 0) if last(AC_EntranceTank) < 1197
    submatrix(AC_EntranceTank, 599, 1197, 0, 0) otherwise
AC_DrainChannelC :=
    submatrix(AC_DrainChannel, 1198, last(AC_DrainChannel), 0, 0) if last(AC_DrainChannel) < 1796
    submatrix(AC_DrainChannel, 1198, 1796, 0, 0) otherwise
AC_EntranceTankC :=
    submatrix(AC_EntranceTank, 1198, last(AC_EntranceTank), 0, 0) if last(AC_EntranceTank) < 1796
    submatrix(AC_EntranceTank, 1198, 1796, 0, 0) otherwise
AC_LayoutA :=
    AC_Layout if last(AC_Layout) < 598
    submatrix(AC_Layout, 0, 598, 0, 0) otherwise
AC_OperatorAccessA :=
    AC_OperatorAccess if last(AC_OperatorAccess) < 598
    submatrix(AC_OperatorAccess, 0, 598, 0, 0) otherwise
AC_OperatorAccessB :=
    submatrix(AC_OperatorAccess, 599, last(AC_OperatorAccess), 0, 0) if last(AC_OperatorAccess) < 1197
    submatrix(AC_OperatorAccess, 599, 1197, 0, 0) otherwise
AC_LayoutB :=
    submatrix(AC_Layout, 1198, last(AC_Layout), 0, 0) if last(AC_Layout) < 1197
    submatrix(AC_Layout, 1198, 1796, 0, 0) otherwise
AC_OperatorAccessC :=
    submatrix(AC_OperatorAccess, 1198, last(AC_OperatorAccess), 0, 0) if last(AC_OperatorAccess) < 1796
    submatrix(AC_OperatorAccess, 1198, 1796, 0, 0) otherwise
AC_LayoutC :=
    submatrix(AC_Layout, 1198, last(AC_Layout), 0, 0) if last(AC_Layout) < 1796
    submatrix(AC_Layout, 1198, 1796, 0, 0) otherwise
## Make AC variables that are shorter than 598 lines
## Display AC variables
AC_EntranceTankA = [
    "-layer m Cdc"; "c t 129,0,129"; "Cdc"; "  "; "-insert CdcLeverArm.dwg"; "-3.61383,10.1428,2.29327 x 1 1  0"; "-insert CdcLeverArmBracket.dwg"; "-3.58183,9.73005,2.26837 x 1 1  0"; "-insert CdcCht.dwg"; "-4.34403,9.64595,2.38607 x 1 1  0"
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]
AC_EntranceTankB =  # error
AC_EntranceTankC =  # error
AC_FlocTankA = [
    "-layer m FlocTank"; "c t 132,132,132"; "FlocTank"; "  "; "_-view o t _zoom w 0.16,4.76,0 -3.66748,7.69,1.93146 _box 0,4.92,0 -3.50748,7.53,1.93146 _box 0.15,4.77,-0.15 -3.65748,7.68,1.93146 _subtract 0.15,4.77,-0.15  0,4.92,0 "; "_box -3.65748,5.46,0 0.15,5.61,1.93146"; "-array l  R 3 1 0.69"; "-group c FlocTank y "; "all "; "-layer s 0"
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]
AC_FlocTankB =  # error
AC_FlocTankC =  # error
AC_OperatorAccessA = [
    "-layer m AlumPlatform"; "c t 132,132,132"; "AlumPlatform"; "  "; "_-view o f"; "_pline"; "-6.57863,2.58107"; "-6.27863,2.58107"; "-6.27863,2.39127"; "-5.97863,2.39127"
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]
AC_OperatorAccessB =  # error
AC_OperatorAccessC =  # error
AC_SedTankA = [
    "_-view o t";
    "-layer m tank";
    "c t 132,132,132";
    "tank";
    "  ";
    "_-view o t _zoom w 0.16,-0.16,0 -3.66748,1.24,1.75242 _box 0,0,0 -3.50748,1.08,1.75242 _box 0.15,-0.15,-0.15 -3.65748,1.23,1.75242 _subtract 0.15,-0.15,-0.15  0,0,0 ";
    "_box -2.95244,0,1.47923 -2.90244,1.08,1.42923";
    "_box 0,0,0.36351 -0.05,1.08,0.31351";
    "_box -3.50748,0,1.39737 -3.10244,1.08,1.24737";
    "_box -3.10244,0,1.24737 -2.95244,1.08,1.75242"
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]
AC_SedTankB = [
    "_cylinder 0.54,1.54353,-0.28097 0.06429 0.00714"; "_union all "; "-group c laundercouplingcap y "; "all "; "-layer s 0"; "  "; "-layer f laundercouplingcap"; "  "; "-layer m launderorificecap"; "c t 0,255,0"
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]
AC_SedTankC =  # error
AC_FilterA = [
    "-layer m FiInletChannel"; "c t 214,214,214"; "FiInletChannel"; "  "; "_zoom w -0.01,-1.11376,1.24563 0.01,-0.80376,1.24563"; "_box -0.01,-0.95376,1.24563 0.81376,-0.85376,1.60068"; "_box 0,-1.10376,1.09563 0.80376,-0.70376,1.60068"; "_subtract 0,-1.10376,1.09563  -0.01,-0.95376,1.24563 "; "rotate3d l  z 0,-0.95376,1.24563 90"; "_box -0.25,-1.10376,1.09563 0.15,-0.95376,1.60068"
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]
AC_FilterB = [
    "_cylinder -3.24171,-0.24208,-2.01319 0.05715 c -3.16471,-0.24208,-2.01319";
    "_subtract -3.23171,-0.30637,-2.01319  -3.16471,-0.29923,-2.01319 ";
    "_cylinder -3.29378,-0.24208,-2.01319 0.06429 c -3.23678,-0.24208,-2.01319";
    "_cylinder -3.30378,-0.24208,-2.01319 0.05715 c -3.22678,-0.24208,-2.01319";
    "_subtract -3.29378,-0.30637,-2.01319  -3.30378,-0.29923,-2.01319 ";
    "_cylinder -3.23678,-0.24208,-2.01319 0.05715 c -3.23171,-0.24208,-2.01319";
    "_cylinder -3.24678,-0.24208,-2.01319 0.0525 c -3.22171,-0.24208,-2.01319";
    "_subtract -3.23678,-0.29923,-2.01319  -3.24678,-0.29458,-2.01319 ";
    "_union -3.17471,-0.30637,-2.01319 -3.29378,-0.30637,-2.01319 -3.23171,-0.29923,-2.01319 ";
    "_zoom w -3.36078,-0.31637,-1.74889 -3.10265,-0.16778,-1.87748"
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]
AC_FilterC = [
    "_subtract -1.77948,-0.30637,0.76024  -1.71248,-0.29923,0.76024 ";
    "_cylinder -1.84154,-0.24208,0.76024 0.06429 c -1.78454,-0.24208,0.76024";
    "_cylinder -1.85154,-0.24208,0.76024 0.05715 c -1.77454,-0.24208,0.76024";
    "_subtract -1.84154,-0.30637,0.76024  -1.85154,-0.29923,0.76024 ";
    "_cylinder -1.78454,-0.24208,0.76024 0.05715 c -1.77948,-0.24208,0.76024";
    "_cylinder -1.79454,-0.24208,0.76024 0.0525 c -1.76948,-0.24208,0.76024";
    "_subtract -1.78454,-0.29923,0.76024  -1.79454,-0.29458,0.76024 ";
    "_union -1.72248,-0.30637,0.76024 -1.84154,-0.30637,0.76024 -1.77948,-0.29923,0.76024 ";
    "rotate3d l  y -1.77948,-0.24208,0.76024 90";
    "_zoom w -1.39024,-0.91376,0.82454 -1.13212,-0.76517,0.69595"
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]
AC_FilterD = [
    "-layer m FiSandDrainSecondary";
    "c t 0,255,255";
    "FiSandDrainSecondary";
    "  ";
    "_zoom w -4.69743,-1.19902,-2.13017 -4.53297,-1.12187,-2.18732";
    "_cylinder -4.6152,-1.16045,-2.15874 0.02858 c -4.5832,-1.16045,-2.15874";
    "_cylinder -4.65543,-1.16045,-2.15874 0.02858 c -4.62343,-1.16045,-2.15874";
    "_cylinder -4.62343,-1.16045,-2.15874 0.02413 c -4.6152,-1.16045,-2.15874";
    "_union -4.5832,-1.18902,-2.15874 -4.65543,-1.18902,-2.15874 -4.6152,-1.18458,-2.15874 ";
    "rotate3d l  z -4.6152,-1.16045,-2.15874 90"
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]
AC_ChemTanksA = [
    "-layer m CoagTanks"; "c t 132,132,132"; "CoagTanks"; "  "; "_-view o t"; "_zoom w -5.05463,9.86215,1.34687 -4.26263,10.65415,2.59107"; "_cylinder -4.65863,10.25815,2.58107 0.386 c -5.88283,10.25815,2.58107"; "rotate3d l  y -4.65863,10.25815,2.58107 90"; "-group c CoagTanks y "; "all "
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]
AC_ChemTanksB =  # error
AC_ChemTanksC =  # error
AC_DrainChannelA = [
    "-layer m DrainChannel"; "c t 214,214,214"; "DrainChannel"; "  "; "3dpoly"; "0.3,-1.125,-0.2024"; "0.3,-1.125,-0.26368"; "0.3,-0.725,-0.47496"; "0.3,-0.325,-0.26368"; "0.3,-0.325,-0.2024"
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]
AC_DrainChannelB =  # error
AC_DrainChannelC =  # error
# AC_LayoutA | AC_LayoutB | AC_LayoutC
