# AguaClara Design Tool
Country = 229
Language = 0
C_ChlorineDoseMax := 2*mg/L
C_ChlorineStock := 50*gm/L
Ti_ChlorineStock := 30 hr
Country := 0  # Needs to be redefined as zero until we create a database for all countries.
## References
# MathCAD dimension calculations:
# [reference: BasicClientInputs.xmcd]
# [reference: ExpertInputs.xmcd]
# [reference: MathFunctions.xmcd]
# [reference: PipeDatabase.xmcd]
# [reference: FluidsFunctions.xmcd]
# [reference: SedimentationTank.xmcd]
# [reference: Flocculator.xmcd]
# [reference: LFOM.xmcd]
# [reference: LinearCdc.xmcd]
# [reference: ChemStorageTanks.xmcd]
# [reference: EntranceTank.xmcd]
# [reference: StackedRapidSandFilter.xmcd]
# [reference: DrainChannel.xmcd]
# [reference: MaterialsList.xmcd]
# AutoCAD drawing programs:
# Translators:
# These are the codes that take MathCAD outputs and create AutoCAD scripts that are used to draw the plant (formerly Basics)
# [reference: MtoATranslators.xmcd]
# The wrapped MtoA translator contains the functions that the user will want to access. These functions will draw pieces with full functionality - specifying the location, dimension, and orientation of the object. Also, it contains layer control and subtraction capabilities for grouped objects.
# [reference: MtoATranslatorsWrapped.xmcd]
# Drawing functions:
# [reference: ChannelF.xmcd]
# [reference: PlumbingF.xmcd]
# [reference: TankF.xmcd]
# [reference: StairsF.xmcd]
# [reference: DrainChannelF.xmcd]
# AutoCAD Script Files:
# [reference: FlocculatorAC.xmcd]
# [reference: SedimentationTankAC.xmcd]
# [reference: EntranceTankAC.xmcd]
# [reference: ChemStockTanksACvlk24.xmcd]
# [reference: DrainChannelAC.xmcd]
# [reference: StackedRapidSandFilterAC.xmcd]
# [reference: CdcACvlk24.xmcd]
# [reference: OperatorAccessACvlk24.xmcd]
# [reference: MaterialsAC.xmcd]
# Layouts:
# This rearranges the plant to optimize the layout
# [reference: PlantLayoutsAC.xmcd]
# This file will execute at the very end to create multiple views of the entire plant in paperspace
# [reference: LayoutsAC.xmcd]
## All variables displayed must have the standard SI units. They may not have units attached by the user.
# General
Q_Plant = 0.032 m^3/s
Pi_VenaContractaOrifice = 0.63
T_PlantWall = 0.15 m
W_SedPlate = 1.067 m
T_ConcreteMin = 0.05 m
L_SedPlateSheet = 3 m
C_CoagStock = 240 kg/m^3
T_SedPlate = 0.002 m
Ti_CoagStock = 108000 s
T_SedWeir = 0.04 m
C_ChlorineStock = 50 kg/m^3
W_SedBay = 1.067 m
Ti_ChlorineStock = 108000 s
HL_ChannelMax = 0.05 m  # Eliminate FCM variable from design specs
H_PlantFreeboard = 0.1 m
EN_DrillSeries = 0
# Entrance Tank
V_EtUp = 0.008 m/s
W_EtCapture = 0.753158 m
H_EtOverflowChannel =  # error: This variable is undefined.
H_Et = 1.05976 m
H_EtTop = 0.3 m  # height of the top part of the entrance tank above the hoppers
W_Et = 0.786575 m
L_Et = 6.22193 m
ND_EtDrain = 0.0762 m
HL_Lfom = 0.2 m
ZW_Et = 2.51883 m
Z_EtTop = 2.61883 m
Z_Et = 1.55907 m  # elevation of top of slab.
ND_RMPipe = 0.3048 m
Z_EtHopper = 2.31883 m
H_EtHopper = 0.759762 m
N_EtHoppers =  # error
ND_EtFlowControl = 0.1524 m
L_EtHopper = 1.62032 m
AN_EtSlope = 0.785398
W_EtDC = 0.45622 m  # drain channel under entrance tank dimensions
L_EtDC = 6.52193 m
H_EtDC =  # error  # Give heights of the channel at the beginning and end and change the design specs to explain that it's sloped.
# Flow measurement
D_LfomOrifices = 0.01905 m
S_LfomRows = 0.02 m
H_LfomOrifice = [0.009525; 0.029525; 0.049525; 0.069525; 0.089525; 0.109525; 0.129525; 0.149525; 0.169525; 0.189525] m
Q_LfomScale = [0; 0.0032; 0.0064; 0.0096; 0.0128; 0.016; 0.0192; 0.0224; 0.0256; 0.0288; 0.032] m^3/s
N_LfomOrifices = [25; 25; 21; 2; 9; 7; 7; 7; 6; 5]
ND_Lfom = 0.3048 m
HL_Lfom = 0.2 m
# Rapid Mix
ED_Tee = 0.105909 m^2/s^3
Z_LfomOrifices = 2.32836 m  # elevation of the center of
Z_EtExit = 1.73563 m  # elevation of center of pipe exiting the entrance tank and heading toward the flocculator
W_DC = 1 m
# Maybe give the vertical distances below the bottom of the sed tank of the beginning and end of the channel? Calculate them, display, and add to the design specs.
H_DC =  # error
L_DC = 12.5886 m
# Plant Drain Channel
Z_CoagTank = 2.91883 m
Z_CoagTankOutlet = 3.01883 m
L_CdcFloatArm = 0.41275 m
Q_CdcMax = 6.4e-6 m^3/s
L_CdcScaleArm = 0.50165 m
C_CoagDoseMax = 0.06 kg/m^3
B_StockOutlet = 0.1 m
L_CoagCdcTube = 1.29663 m
D_CdcTube = 0.003175 m
N_CoagCdcTubes = 4
HL_Cdc = 0.2 m
L_CdcFloatArm = 0.41275 m
L_CdcScaleArm = 0.50165 m
# Coag Dose Controller
# Flocculator
H_Floc = 2.26595 m
Z_FlocTank = 0 m  # Look at Flocculator Positioning arrays
N_FlocValves = 2
W_FlocChannel = 0.6 m
Ti_Floc = 897.421 s  # Fill last channel with bafffles from last channel
H_FlocSlope = 0.04445 m  # Fix port width to be based on energy dissipation in that channel
ED_Floc = 0.01 m^2/s^3
# Adjust spacing after the number of baffles per channel is known.
V_Floc = 0.173613 m/s  # Check the residence time of the flocculator should be at least 20minutes
HW_FlocEnd = 1.92314 m
ND_FlocValve = 0.0762 m
CP_Floc = 75 m^(2/3)
Ti_FlocDrain = 1800 s
CP_FlocTotal = 113.382 m^(2/3)
N_FlocChannels = 4
G_Floc = 51.5107 1/s
L_FlocTank = 24.8877 m
HL_Floc = 0.242813 m
ED_FlocChannelFirst = 0.00692068 m^2/s^3
HW_FlocStart = 2.16595 m
S_FlocBaffle = [0.307197; 0.307197; 0.307197; 0.307197] m
B_FlocBaffle = [0.309197; 0.309197; 0.309197; 0.309197] m
N_FlocChannelBaffles = [19; 19; 19; 18]
W_FlocPort = [0.307197; 0.307197; 0.307197; 0.307197] m
S_FlocBaffleFirst = 0.307197 m
HL_FlocChannels = [0.0614715; 0.0614715; 0.0614715; 0.058398] m
L_FlocBaffleLower = 1.46234 m
L_FlocBaffleUpper = 1.75515 m
H_FlocPort = [0.6; 0.6; 0.6; 0.6] m
Ti_Floc = 897.421 s  # residence time of the flocculator
N_FlocBaffles = 75
ND_FlocValve = 3 in
EN_FlocBaffle = 1
# Sed Tanks
N_SedTanks = 3
L_Sed = 6.22193 m
N_SedBays = 2  # Number of bays of inlet manifolds in each sed tank
Q_SedBay = 0.00533333 m^3/s
V_SedUpBod = 0.001 m/s  # design constraints
V_SedCBod = 0.00012 m/s
V_SedUp = 0.000979146 m/s  # Actual values from this design
V_SedC =  # error
W_SedSideSlopes = 0.52515 m
AN_SedSlope = 0.872665
Ti_Sed = 1748.74 s
# Sedimentation Tank Sludge Drain:
N_SedSludgeOrifices = 48  # per cell
Ti_SludgeDrain = 1800 s  # Tank Drain time
W_SedSludge = 0.0924338 m  # Width of the sludge channel
H_SedSludge = 0.0924338 m  # Depth of the sludge channel
# Distance center to center between drain orifices
B_SedSludgeOrifices = 0.105269 m
W_SedDrainCover = 0.132434 m
D_SedSludgeOrifice = 0.00934548 m  # Diameter of drain orifices
N_SedSludgeOrifices = 48
ND_SedSludgePipe = 0.1016 m
# Sedimentation Tank Dimensions:
Z_SedSludge = 0.0924338 m  # Height from 0 of the top of the sludge drain
Z_SedSideSlopes = 0.784983 m
W_Sed = 2.134 m  # Total tank wall height
L_Sed = 6.22193 m  # Total tank length
H_Sed = 2.04329 m
# Sedimentation Tank Inlet Channel:
EN_InletChannelGeom = 1
HW_SedInletChannel = 0.38815 m
W_SedInletChannel = 0.578538 m
L_SedChannel = 6.702 m
H_SedInletChannel = 0.48815 m
HL_SedWeirInlet = 0.0187477 m
W_SedInletChannelPreWeir = 0.388538 m
H_SedWeirInlet = 0.369402 m
W_SedWeirInlet = 6.702 m
# Sedimentation Tank Effluent Launder:
N_SedLaunderOrifices = 49  # Number of orifices per launder
N_SedLaunderOrificesRow =  # error  # Number of orifices per row
Z_SedLaunder = 1.80015 m
Q_SedLaunderOrifices = 0.000108844 m^3/s
B_SedLaunderOrifices = 0.1 m  # Center to center launder spacing
# More Launder Dimensions
ND_SedLaunder = 0.1524 m
D_SedLaunderOrifice = 0.015875 m
L_SedLaunder = 5.08821 m
HL_SedLaunderOrifice = 0.0388453 m
# Sedimentation Tank Inlet Manifold:
ND_SedManifold = 0.2032 m
L_SedManifoldDiffuser = 0.156036 m
Z_SedManifoldPipe = 0.415767 m
ND_SedDiffuser = 0.0254 m
D_SedManifoldPort = 0.03175 m
B_SedManifoldPort = 0.0498125 m
N_SedManifoldPorts = 99
L_SedManifoldPipe = 5.09616 m
ED_SedInlet = 0.01 m^2/s^3
Q_SedManifoldPort = 5.38721e-5 m^3/s
# Exit Channel:
W_SedExitChannel = 0.3485 m
H_SedExitChannel = 0.48815 m
HW_SedExitChannel = 0.34815 m  # water height in exit channel from base of channel
H_SedWeirExit = 0.329148 m
# Lamella:
L_SedPlate = 0.6 m
B_SedPlate = 0.027 m  # center to center distance between lamella
S_SedPlate = 0.025 m  # spacing between lamella
N_SedPlates = 160  # Number of Sed Plates per Sedimentation Tank Bay.
N_SedModules = 20  # Number of modules per bay
N_SedModulePlates = 8  # Number of plates per module
AN_SedPlate = 1.0472
L_SedActive = 4.986 m
Z_SedLaunder = 1.80015 m
HW_Sed = 1.92314 m
H_Sed = 2.04329 m
# SRSF
H_Fi = 3.90707 m
L_Fi = 0.965881 m
W_Fi = 1.98922 m
B_FiManifoldBranch = 0.1 m
ND_FiTrunk = 0.1524 m
ND_FiManBranch = 0.0254 m
ND_FiBwTrunk = 0.2032 m
ND_FiBwManBranch = 0.0381 m
ND_FiExitWaste = 0.1016 m
ND_FiBwWeirDrain =  # error
ND_FiBwDrain =  # error  # For the box that holds keeps the end of the siphon submerged
ND_FiSandOutlet = 0.0508 m
Ti_FiSand = 855.138 s  # This is the time required to empty the filter of the sand.
ND_FiSiphonAirValve = 0.01905 m
ND_FiSiphon = 0.2032 m
Q_FiSiphonMax = 0.072768 m^3/s
B_FiSiphonManOrifices = 0.121557 m
N_FiSiphonManOrifices = 6
D_FiSiphonManOrifices = 0.0821369 m
Ti_FiBwInitiation = 86.5569 s
H_FiSand = 1.2 m
N_FiLayer = 6
H_FiLayer = 0.2 m
V_FiLayer = 0.00183333 m/s
HL_FiTerminal = 0.4 m
V_FiBw = 0.011 m/s
HL_FiBwInitiation = 1.588 m
HL_FiBwSS = 1.188 m
D_FiSand =  # error
N_Fi = 2
Q_Fi = 0.016 m^3/s
W_Slots = 0.0002032 m
B_FiBwManSlot = 0.0047625 m
L_FiBwManSlot = 0.00953357 m
B_FiManSlot = 0.003175 m
L_FiManSlot = 0.0126989 m
N_FiSlotRows = 2
Z_FiBottom = -2.14009 m
Z_FiTop = 1.76698 m
# Weirs
HL_FiWeir =  # error
L_FiWeir =  # error
Z_FiEntranceWeir = 1.66698 m
Z_FiBwWeir = -0.251513 m
Z_FiSiphonInlet = -0.351513 m  # This is the centerline elevation of the siphon orifices
Z_FiExitWeir = 1.03757 m
Z_FiExitBottom = 0.622602 m  # bottom of the filtered water box
Z_FiEntranceBottom = 0.622602 m  # bottom of the entrance box
Z_FiSiphonCoupling = 0.92803 m
Z_FiBwTop = -0.0517049 m
W_FiBwDrain =  # error
H_FiBwDrain =  # error
N_Launders =  # error
L_LaunderPipeTotal =  # error
N_LaunderCouplings =  # error
N_ValveCouplings = 6
N_SedPlatesTotal = 960
N_SedPlatesPerSheet = 5
N_SedPlateSheets = 192
N_Valves = 6
A_EtFloor = 7.08657 m^2
W_FlocWithWalls = 3 m
L_FlocWithWalls = 6.52193 m
Vol_FlocFloor = 3081.61 L
A_FlocFloor = 20.5441 m^2
Vol_SedSlopes =  # error
A_SedWalls =  # error
A_SedFloor = 45.6666 m^2
# Materials List
# Plant Summary Calculations:
HL_PlantTotal := Z_EtTop - H_PlantFreeboard - Z_FiExitWeir
HL_PlantTotal = 1.48127 m
## Make AC variables that are shorter than 598 lines
AC_CdcA :=
    AC_Cdc if last(AC_Cdc) < 598
    submatrix(AC_Cdc, 0, 598, 0, 0) otherwise
AC_CdcB :=
    submatrix(AC_Cdc, 599, last(AC_Cdc), 0, 0) if last(AC_Cdc) < 1197
    submatrix(AC_Cdc, 599, 1197, 0, 0) otherwise
AC_CdcC :=
    submatrix(AC_Cdc, 1198, last(AC_Cdc), 0, 0) if last(AC_Cdc) < 1796
    submatrix(AC_Cdc, 1198, 1796, 0, 0) otherwise
AC_SedTankA :=
    AC_SedTank if last(AC_SedTank) < 598
    submatrix(AC_SedTank, 0, 598, 0, 0) otherwise
AC_FilterA :=
    AC_Filter if last(AC_Filter) < 598
    submatrix(AC_Filter, 0, 598, 0, 0) otherwise
AC_SedTankB :=
    submatrix(AC_SedTank, 599, last(AC_SedTank), 0, 0) if last(AC_SedTank) < 1197
    submatrix(AC_SedTank, 599, 1197, 0, 0) otherwise
AC_FilterB :=
    submatrix(AC_Filter, 599, last(AC_Filter), 0, 0) if last(AC_Filter) < 1197
    submatrix(AC_Filter, 599, 1197, 0, 0) otherwise
AC_SedTankC :=
    submatrix(AC_SedTank, 1198, last(AC_SedTank), 0, 0) if last(AC_SedTank) < 1796
    submatrix(AC_SedTank, 1198, 1796, 0, 0) otherwise
AC_FilterC :=
    submatrix(AC_Filter, 1198, last(AC_Filter), 0, 0) if last(AC_Filter) < 1796
    submatrix(AC_Filter, 1198, 1796, 0, 0) otherwise
AC_ChemTanksA :=
    AC_ChemTanks if last(AC_ChemTanks) < 598
    submatrix(AC_ChemTanks, 0, 598, 0, 0) otherwise
AC_FilterD :=
    submatrix(AC_Filter, 1797, last(AC_Filter), 0, 0) if last(AC_Filter) < 2395
    submatrix(AC_Filter, 1797, 2395, 0, 0) otherwise
AC_FlocTankA :=
    AC_FlocTank if last(AC_FlocTank) < 598
    submatrix(AC_FlocTank, 0, 598, 0, 0) otherwise
AC_ChemTanksB :=
    submatrix(AC_ChemTanks, 599, last(AC_ChemTanks), 0, 0) if last(AC_ChemTanks) < 1197
    submatrix(AC_ChemTanks, 599, 1197, 0, 0) otherwise
AC_FlocTankB :=
    submatrix(AC_FlocTank, 599, last(AC_FlocTank), 0, 0) if last(AC_FlocTank) < 1197
    submatrix(AC_FlocTank, 599, 1197, 0, 0) otherwise
AC_ChemTanksC :=
    submatrix(AC_ChemTanks, 1198, last(AC_ChemTanks), 0, 0) if last(AC_ChemTanks) < 1796
    submatrix(AC_ChemTanks, 1198, 1796, 0, 0) otherwise
AC_FlocTankC :=
    submatrix(AC_FlocTank, 1198, last(AC_FlocTank), 0, 0) if last(AC_FlocTank) < 1796
    submatrix(AC_FlocTank, 1198, 1796, 0, 0) otherwise
AC_FlocTankD :=
    submatrix(AC_FlocTank, 1797, last(AC_Filter), 0, 0) if last(AC_FlocTank) < 2395
    submatrix(AC_FlocTank, 1797, 2395, 0, 0) otherwise
AC_DrainChannelA :=
    AC_DrainChannel if last(AC_DrainChannel) < 598
    submatrix(AC_DrainChannel, 0, 598, 0, 0) otherwise
AC_EntranceTankA :=
    AC_EntranceTank if last(AC_EntranceTank) < 598
    submatrix(AC_EntranceTank, 0, 598, 0, 0) otherwise
AC_DrainChannelB :=
    submatrix(AC_DrainChannel, 1198, last(AC_DrainChannel), 0, 0) if last(AC_DrainChannel) < 1197
    submatrix(AC_DrainChannel, 1198, 1796, 0, 0) otherwise
AC_EntranceTankB :=
    submatrix(AC_EntranceTank, 599, last(AC_EntranceTank), 0, 0) if last(AC_EntranceTank) < 1197
    submatrix(AC_EntranceTank, 599, 1197, 0, 0) otherwise
AC_DrainChannelC :=
    submatrix(AC_DrainChannel, 1198, last(AC_DrainChannel), 0, 0) if last(AC_DrainChannel) < 1796
    submatrix(AC_DrainChannel, 1198, 1796, 0, 0) otherwise
AC_EntranceTankC :=
    submatrix(AC_EntranceTank, 1198, last(AC_EntranceTank), 0, 0) if last(AC_EntranceTank) < 1796
    submatrix(AC_EntranceTank, 1198, 1796, 0, 0) otherwise
AC_OperatorAccessA :=
    AC_OperatorAccess if last(AC_OperatorAccess) < 598
    submatrix(AC_OperatorAccess, 0, 598, 0, 0) otherwise
AC_OperatorAccessB :=
    submatrix(AC_OperatorAccess, 599, last(AC_OperatorAccess), 0, 0) if last(AC_OperatorAccess) < 1197
    submatrix(AC_OperatorAccess, 599, 1197, 0, 0) otherwise
AC_OperatorAccessC :=
    submatrix(AC_OperatorAccess, 1198, last(AC_OperatorAccess), 0, 0) if last(AC_OperatorAccess) < 1796
    submatrix(AC_OperatorAccess, 1198, 1796, 0, 0) otherwise
AC_ZZMatApplyA :=
    AC_MatApply if last(AC_MatApply) < 598
    submatrix(AC_MatApply, 0, 598, 0, 0) otherwise
AC_ZZLayoutA :=
    AC_Layout if last(AC_Layout) < 598
    submatrix(AC_Layout, 0, 598, 0, 0) otherwise
AC_ZZMatApplyB :=
    submatrix(AC_MatApply, 1198, last(AC_MatApply), 0, 0) if last(AC_MatApply) < 1197
    submatrix(AC_MatApply, 1198, 1796, 0, 0) otherwise
AC_ZZLayoutB :=
    submatrix(AC_Layout, 1198, last(AC_Layout), 0, 0) if last(AC_Layout) < 1197
    submatrix(AC_Layout, 1198, 1796, 0, 0) otherwise
AC_ZZLayoutC :=
    submatrix(AC_Layout, 1198, last(AC_Layout), 0, 0) if last(AC_Layout) < 1796
    submatrix(AC_Layout, 1198, 1796, 0, 0) otherwise
AC_ZZMatApplyC :=
    submatrix(AC_MatApply, 1198, last(AC_MatApply), 0, 0) if last(AC_MatApply) < 1796
    submatrix(AC_MatApply, 1198, 1796, 0, 0) otherwise
## Display AC variables
AC_EntranceTankA = [
    "-layer m EtTankCon"; "c t 132,132,132"; "EtTankCon"; "  "; "_-view o t _zoom w 0.16,11.342,1.55907 -6.38193,12.44858,2.61883 _box 0,11.502,1.55907 -6.22193,12.28858,2.61883 _box 0.15,11.352,1.40907 -6.37193,12.43858,2.61883 _subtract 0.15,11.352,1.40907  0,11.502,1.55907 "; "-group c EtTankCon y "; "all "; "-layer s 0"; "  "; "-layer f EtTankCon"
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]
AC_EntranceTankB = [
    "  "; "-layer f EtRmPipePlu"; "  "; "-layer m EtRmTeePlu"; "c t 0,255,0"; "EtRmTeePlu"; "  "; "_cylinder -5.99572,11.18216,1.73563 0.16192 a -5.99572,10.92816,1.73563"; "_cylinder -5.74172,10.92816,1.73563 0.16192 a -6.24972,10.92816,1.73563"; "_zoom w -6.33572,10.74195,1.54942 -5.65572,11.26816,1.92185"
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]
AC_EntranceTankC =  # error
AC_FlocTankA = [
    "-layer m FlocTankCon"; "c t 132,132,132"; "FlocTankCon"; "  "; "_-view o t _zoom w 0.16,6.692,0 -6.38193,9.862,2.26595 _box 0,6.852,0 -6.22193,9.702,2.26595 _box 0.15,6.702,-0.15 -6.37193,9.852,2.26595 _subtract 0.15,6.702,-0.15  0,6.852,0 "; "_box -6.37193,7.452,0 0.15,7.602,2.26595"; "-array l  R 3 1 0.75"; "-group c FlocTankCon y "; "all "; "-layer s 0"
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]
AC_FlocTankB = [
    "all "; "-layer s 0"; "  "; "-layer f FlocDrainAdapterPlu"; "  "; "-layer m FlocDrainValvePlu"; "c t 0,127,255"; "FlocDrainValvePlu"; "  "; "-insert VAL-Scaled-Gate-Valve-Threaded"
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]
AC_FlocTankD =  # error
AC_FlocTankC =  # error
AC_OperatorAccessA = [
    "-layer m OpWalkwayCon"; "c t 132,132,132"; "OpWalkwayCon"; "  "; "_-view o f"; "_pline"; "-10.10658,2.93153"; "-9.80658,2.93153"; "-9.80658,2.73491"; "-9.50658,2.73491"
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]
AC_OperatorAccessC =  # error
AC_OperatorAccessB =  # error
AC_SedTankA = [
    "-layer m SedTankCon"; "c t 132,132,132"; "SedTankCon"; "  "; "_-view o r"; "_pline"; "2.184,0"; "1.64672,0"; "1.64672,0.09243"; "1.66672,0.09243"
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]
AC_SedTankB = [
    "-layer m SedSludgeAdapterPlu";
    "c t 255,0,0";
    "SedSludgeAdapterPlu";
    "  ";
    "_zoom w -6.46101,1.52621,0.09958 -6.68897,1.67479,-0.02901";
    "_cylinder -6.51799,1.6005,0.03528 0.06429 a -6.57499,1.6005,0.03528";
    "_cylinder -6.50799,1.6005,0.03528 0.05715 a -6.58499,1.6005,0.03528";
    "_subtract -6.51799,1.53621,0.03528  -6.50799,1.54335,0.03528 ";
    "_cylinder -6.57499,1.6005,0.03528 0.05715 a -6.62197,1.6005,0.03528";
    "_cylinder -6.56499,1.6005,0.03528 0.0525 a -6.63197,1.6005,0.03528"
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]
AC_SedTankC = [
    "-group c DeleteMe y "; "l "; "-layer t SedTankCon"; "  "; "_subtract"; "g SedTankCon"; " g DeleteMe "; "-layer f SedTankCon"; "  "; "_cylinder -5.68503,0.14208,0.14907 0.08414 a -5.87043,0.14208,0.14907"
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]
AC_ChemTanksA = [
    "-layer m CoagTanks"; "c t 132,132,132"; "CoagTanks"; "  "; "_-view o t"; "_zoom w -8.50358,11.30858,1.81653 -7.51358,12.29858,2.94153"; "_cylinder -8.00858,11.80358,2.93153 0.485 a -9.11358,11.80358,2.93153"; "rotate3d l  y -8.00858,11.80358,2.93153 90"; "-group c CoagTanks y "; "all "
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]
AC_ChemTanksB = [
    "_mirror -9.68488,12.01688,2.73658  -9.68488,11.99783 -9.67488,12.00783 n _union -9.65194,11.99529,2.73658 -9.67141,12.0113,2.73658 -9.68488,12.03077,2.73658 ";
    "rotate3d l  z -9.66583,11.99783,2.73658 90";
    "rotate3d l  y -9.66583,11.99783,2.73658 270";
    "_-view o t";
    "_zoom w -9.72782,11.24102,2.69364 -9.64194,11.3269,2.74142 _torus -9.68488,11.28396,2.71753 0.01905 0.01067 _box -9.7246,11.24424,2.69686 -9.68488,11.32368,2.73819 _subtract -9.65516,11.28396,2.71753  -9.7246,11.24424,2.69686 ";
    "_torus -9.68488,11.28396,2.71753 0.01905 0.00966 _subtract -9.65516,11.28396,2.71753  -9.71359,11.28396,2.71753  _box -9.69488,11.24424,2.69686 -9.64516,11.28396,2.73819 _subtract -9.68488,11.31368,2.71753  -9.69488,11.24424,2.69686 ";
    "_cylinder -9.68488,11.30301,2.71753 0.01389 a -9.68742,11.30301,2.71753 _cylinder -9.67488,11.30301,2.71753 0.01067 a -9.69742,11.30301,2.71753 _subtract -9.68488,11.28912,2.71753  -9.67488,11.29234,2.71753 ";
    "_mirror -9.68488,11.30301,2.71753  -9.68488,11.28396 -9.67488,11.29396 n _union -9.65194,11.28142,2.71753 -9.67141,11.29743,2.71753 -9.68488,11.3169,2.71753 ";
    "rotate3d l  z -9.66583,11.28396,2.71753 180";
    "_-view o t"
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]
AC_ChemTanksC =  # error
AC_DrainChannelA = [
    "-layer m EtDrainChannelCon"; "c t 132,132,132"; "EtDrainChannelCon"; "  "; "3dpoly"; "0.15,11.352,1.40907"; "0.15,11.352,1.03096"; "0.15,12.10822,1.03096"; "0.15,12.10822,1.40907"; "0.15,11.352,1.40907 "
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]
AC_DrainChannelB =  # error
AC_DrainChannelC =  # error
AC_ZPlantLayout = [
    "-layer t Floc*"; "t *DrainChannel*"; "  "; "mirror3d all  yz -3.11097,0 y  "; "-layer s 0"; "  "; "-layer f Floc*"; "f Sed*"; "f *DrainChannel*"; "  "
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]
AC_FilterA = [
    "-layer m FiInletchannelCon";
    "c t 132,132,132";
    "FiInletchannelCon";
    "  ";
    "_-view o t _zoom w -7.36193,5.26074,0.6226 -8.01847,8.93566,1.80601 _box -7.52193,5.42074,0.6226 -7.85847,8.77566,1.80601 _box -7.37193,5.27074,0.4726 -8.00847,8.92566,1.80601 _subtract -7.37193,5.27074,0.4726  -7.52193,5.42074,0.6226 ";
    "-group c FiInletchannelCon y ";
    "all ";
    "-layer s 0";
    "  ";
    "-layer f FiInletchannelCon"
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]
AC_FilterD = [
    "_cylinder -11.08544,7.19451,-0.35151 0.04107 a -11.22736,7.19451,-0.35151"; "rotate3d l  y -11.08544,7.19451,-0.35151 90"; "-group c DeleteMe y "; "all "; "-layer t FiSiphonPlu"; "  "; "_subtract"; "g FiSiphonPlu"; " g DeleteMe "; "-layer f FiSiphonPlu"
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]
AC_FilterB = [
    "_subtract -11.91593,8.71693,-2.11596  -11.92593,8.70798,-2.11596 ";
    "_zoom w -12.08786,8.72566,-2.11596 -11.79766,8.48912,-2.11596";
    "_cylinder -11.9072,8.60739,-2.11596 0.11827 a -12.06913,8.60739,-2.11596";
    "_cylinder -11.91593,8.60739,-2.11596 0.10954 a -12.07913,8.60739,-2.11596";
    "_subtract -11.9072,8.48912,-2.11596  -12.07913,8.55262,-2.11596 ";
    "rotate3d l  z -11.91593,8.60739,-2.11596 180";
    "-group c FiBwTrunkPlu y ";
    "all ";
    "-layer s 0";
    "  "
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]
AC_FilterC = [
    "_subtract";
    "g FiTankCon";
    " g DeleteMe ";
    "-layer f FiTankCon";
    "  ";
    "_cylinder -10.07313,8.60739,-0.91151 0.08414 a -10.91418,8.60739,-0.91151";
    "_cylinder -10.06313,8.60739,-0.91151 0.07725 a -10.92418,8.60739,-0.91151";
    "_zoom w -10.92418,8.51325,-0.91151 -10.90418,8.70153,-0.91151";
    "_subtract -10.91418,8.69153,-0.91151  -10.92418,8.68464,-0.91151 ";
    "_zoom w -10.97515,8.51325,0.43671 -9.15139,8.70153,0.60499"
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]
HW_Sed = 1.92314 m
# this variable is displayed to ensure that LabView can read AC.ZZEnd (error in LabView "read mathcad file" code that it misses the last variable)
AC_CdcA = [
    "-layer m Cdc"; "c t 125,0,160"; "Cdc"; "  "; "-insert CdcLeverArm.dwg"; "-5.95128,11.64408,2.64373 x 1 1  270"; "-insert CdcLeverArmBracket.dwg"; "-6.36403,11.61208,2.61883 x 1 1  270"; "-insert CdcCht.dwg"; "-7.29738,11.64408,2.73653 x 1 1  90"
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]
AC_CdcC =  # error
AC_CdcB =  # error
# AC_ZZMatApplyA | AC_ZZMatApplyB
AC_ZZMatApplyC
AC_ZZLayoutA = [
    "laythw"; "-layout t AguaClara 0"; "View"; "layout d Layout1"; " d Layout2"; "layout r View"; "TopView"; "layout s TopView"; ".ms"; "z o all "
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]
AC_ZZLayoutC =  # error
AC_ZZLayoutB =  # error
Q_Plant = 0.032 m^3/s
