# [reference: MasterProgram.xmcd]
# [reference: Operator Access v2 lxa3.xmcd]
AlumTank1_origin := [
    Et_Origin[0] - L_Et - S_TankBorder;
    Et_Origin[1] + 0.5*(R_AlumTank + T_ChemTankWall);
    Z_EtTop + H_AlumTankAboveHeadTank + HL_ChemDoserMin - B_StockOutlet
]
AlumTank1_originSS :=
    if EN_PlantDrains == 0
        [
            Et_Origin[0] + 2*R_AlumTank + T_ChemTankWall;
            Et_Origin[1] + 0.5*(R_AlumTank + T_ChemTankWall);
            Z_EtTop + H_AlumTankAboveHeadTank + HL_ChemDoserMin - B_StockOutlet
        ]
    otherwise
        [
            -L_Et - 3*R_AlumTank - 3*T_ChemTankWall - 2*S_TankBorder;
            Et_Origin[1] + 0.5*(R_AlumTank + T_ChemTankWall);
            Z_EtTop + H_AlumTankAboveHeadTank + HL_ChemDoserMin - B_StockOutlet
        ]
N_FlocChannels = 3
alumtankscript :=
    layernew ← layer_new("alumtanks", grey)
    viewtop ← viewtop1
    outertankwall ← cylinderC(AlumTank1_origin, R_AlumTank + T_ChemTankWall, H_AlumTank + T_ChemTankWall)
    innertankwall ← cylinderC([AlumTank1_origin[0]; AlumTank1_origin[1]; AlumTank1_origin[2] + T_ChemTankWall], R_AlumTank, H_AlumTank)
    viewtop ← viewtop1
    subtract ← subtractD([AlumTank1_origin[0] - (R_AlumTank + T_ChemTankWall); AlumTank1_origin[1]; AlumTank1_origin[2]], [AlumTank1_origin[0] - R_AlumTank; AlumTank1_origin[1]; AlumTank1_origin[2]])
    mirror ← Mirror3dAll("YZ", [AlumTank1_origin[0] + (R_AlumTank + T_ChemTankWall); 0 m; 0 m] + 0.5*S_BetweenTanks, "N")
    union ← union_allA
    layerset0 ← layer_set("0")
    layerfreeze ← layer_freeze("alumtanks")
    one ← stack(layernew, viewtop, outertankwall, innertankwall, viewtop, subtract, mirror, union, layerset0, layerfreeze)
    return one
AC_ChemTanks := stack(alumtankscript)
# [component: inputs AC_ChemTanks]
