# [reference: MasterProgram.xmcd]
# [reference: ChemStorageCylinders.xmcd]
# Dimensions are the inside dimensions of the tank.
Tankscript(tank_origin, R1, R2, L1, L2) :=
    Cylinder1 ← cylinderA(tank_origin, R1, L1)
    Cylinder2 ← cylinderA(tank_origin, R2, L2)
    subtract ← subtractD([tank_origin[0] + R2; tank_origin[1]; tank_origin[2]], [tank_origin[0] + R1; tank_origin[1]; tank_origin[2]])
    return concat(viewtop, Cylinder1, Cylinder2, subtract)  # the origin is the bottom right corner of the inside of the tank if looked at from top view
# Add layer and freeze layer~!~! so that the tank module will have a name in AutoCAD
# First Alum Tank: | Add these to expert inputs!
AlumTank1_origin := [
    Et_origin[0];
    Et_origin[1] - W_MpWalkway - W_AlumTank;
    Et_origin[2] + H_Et + H_DoserFrame + H_AlumTankAboveHeadTank
] = [2.11098; 5.11191; 2.88974] m
AlumTank1 := Tankscript(AlumTank1_origin, R_AlumTank, R_AlumTank - T_PlantWall, H_AlumTank, H_AlumTank + T_PlantWall)
# Second Alum Tank:
AlumTank2_origin := [
    Et_origin[0];
    Et_origin[1] - 2*W_AlumTank - 2*W_MpWalkway;
    Et_origin[2] + H_Et + H_DoserFrame + H_AlumTankAboveHeadTank
] = [2.11098; 3.32383; 2.88974] m
AlumTank2 := Tankscript(AlumTank2_origin, R_AlumTank, R_AlumTank - T_PlantWall, H_AlumTank, H_AlumTank + T_PlantWall)
AC_StockTanks := stack(AlumTank1, AlumTank2)
# [component: inputs AC_StockTanks]
# Learn About Layering from this Example!~:: (SedTank-WithPeices)
influentmanifoldscript :=
    viewtop ← viewtop1
    inletholeslayer ← layer_new("iccoupling", green)
    iccoupling ← couplingIDsocket(iccoupling_origin, OD_SedManifoldPipe, T_ChannelWall, EN_PipeSpec)
    layerset ← layer_set("0")
    layerfreezechimneycoupling ← layer_freeze("iccoupling")
    viewright ← viewrightside1
    manpipelayer ← layer_new("manifoldpipe", blue)
    manpipe ← Pipe(manifoldpipe_origin, ND_SedManifold, L_SedManifoldPipe - ElbowRadius(ND_SedManifold), EN_PipeSpec)
    cap ← cap([
        manifoldpipe_origin[0];
        manifoldpipe_origin[1];
        manifoldpipe_origin[2] + (L_SedManifoldPipe - ElbowRadius(ND_SedManifold))
    ], ID_SedManifoldPipe, EN_PipeSpec)
    cylinder3 ← cylinderC([-B_SedManifoldPort/2; manifoldpipe_origin[0]; manifoldpipe_origin[1]], D_SedManifoldPort/2, -OD_SedManifoldPipe/2 - zc)
    array1 ← arrayB([-B_SedManifoldPort/2 + D_SedManifoldPort/2; manifoldpipe_origin[0]; manifoldpipe_origin[1]], 1, N_SedManifoldPorts, -B_SedManifoldPort)
    subtract2 ← subtractH([manifoldpipe_origin[2]; manifoldpipe_origin[0] - outerradius(ND_SedManifold)], [manifoldpipe_origin[2] - 3*zc; manifoldpipe_origin[0] - outerradius(ND_SedManifold) + zc], [
        manifoldpipe_origin[2] + L_SedManifoldPipe;
        manifoldpipe_origin[0] + outerradius(ND_SedManifold) + zc
    ])
    freezemanpip ← layer_freeze("manifoldpipe")
    viewtop ← viewtop1
    layermanifoldelbow ← layer_new("manifoldelbow", green)
    elbow ← elbow(manifoldelbow_origin, ND_SedManifoldEntrance, EN_PipeSpec)
    viewright ← viewrightside1
    rotateelbow ← rotate_All(manifoldpipe_origin, -90)
    viewtop ← viewtop1
    mirrorelbow ← mirror_allyes([manifoldelbow_origin[0] + ElbowRadius(ND_SedManifold); manifoldelbow_origin[1]], [manifoldelbow_origin[0] + ElbowRadius(ND_SedManifold); (2*manifoldelbow_origin)[1]])
    moveelbow ← move_all([
        -L_Sed + W_InletChannelEst/2 + ElbowRadius(ND_SedManifold);
        manifoldelbow_origin[1];
        manifoldelbow_origin[2]
    ], [-L_Sed + W_InletChannelEst/2; manifoldelbow_origin[1]; manifoldelbow_origin[2]])
    layerchimneystops ← layer_new("chimney stops", grey)
    chimneystop ← chimneystop([iccoupling_origin[0]; iccoupling_origin[1]; H_Sed - H_InletChannel - H_SedSludge], ND_SedManifold, HW_InletChannel, 1 in, EN_PipeSpec)
    layerthawcoupling ← layer_thaw("iccoupling")
    layerthawmanifold ← layer_thaw("manifoldpipe")
    layerthawmanifoldelbow ← layer_thaw("manifoldelbow")
    arraybay3 ← concat("-array", sp, "ALL", sp, sp, "r", sp, stringit_nounits(N_SedBays), sp, "1", sp, stringit(-W_SedBay))
    arraybay4 ← concat("-array", sp, "ALL", sp, sp, "r", sp, stringit_nounits(N_SedBays), sp, "1", sp, stringit(-W_SedBay))
    layerset ← layer_set("0")
    layerfreezechimneycoupling ← layer_freeze("iccoupling")
    freezemanpipe ← layer_freeze("manifoldpipe")
    layerfreezeelbow ← layer_freeze("manifoldelbow")
    layerfreezechimneystops ← layer_freeze("chimney stops")
    one ← stack(viewtop, inletholeslayer, iccoupling, layerset, viewright, manpipelayer, layerfreezechimneycoupling, manpipe, cap, viewtop, cylinder3, array1, subtract2, layerset, freezemanpipe, viewtop, layermanifoldelbow, elbow, viewright, rotateelbow, viewtop, mirrorelbow, moveelbow, layerset, layerfreezeelbow, layerchimneystops, chimneystop, layerthawcoupling, layerthawmanifold, layerthawmanifoldelbow, layerset, layerfreezechimneycoupling, freezemanpipe, layerfreezeelbow, layerfreezechimneystops) if N_SedBays == 1
    one ← stack(viewtop, inletholeslayer, iccoupling, layerset, viewright, manpipelayer, layerfreezechimneycoupling, manpipe, cap, viewtop, cylinder3, array1, subtract2, layerset, freezemanpipe, viewtop, layermanifoldelbow, elbow, viewright, rotateelbow, viewtop, mirrorelbow, moveelbow, layerset, layerfreezeelbow, layerchimneystops, chimneystop, layerthawcoupling, layerthawmanifold, layerthawmanifoldelbow, arraybay4, layerset, layerfreezechimneycoupling, freezemanpipe, layerfreezeelbow, layerfreezechimneystops) if (N_SedBays > 1 and N_SedTanks ≥ 1)
    one ← stack(viewtop, inletholeslayer, iccoupling, layerset, viewright, manpipelayer, layerfreezechimneycoupling, manpipe, cap, viewtop, cylinder3, array1, subtract2, layerset, freezemanpipe, viewtop, layermanifoldelbow, elbow, viewright, rotateelbow, viewtop, mirrorelbow, moveelbow, layerset, layerfreezeelbow, layerchimneystops, chimneystop, layerthawcoupling, layerthawmanifold, layerthawmanifoldelbow, arraybay3, layerset, layerfreezechimneycoupling, freezemanpipe, layerfreezeelbow, layerfreezechimneystops) otherwise
    return one
