K_Drains := K_PipeEnt + K_GateValve + K_PipeExit
Q_DChannel := (π*(D_FlocValve/2)^2*(2*g*HW_FlocStart/K_Drains)^(1/2)) + ((N_FlocValves - 1)*(π*(D_FlocValve/2)^2)*(2*g*HW_FlocChannel/K_Drains)^(1/2)) + π*(D_SedDrainValve/2)^2*N_SedBays*(2*g*HW_Sed/K_Drains)^(1/2)
W_DC := .5 m
L_DC := (N_SedBays*N_SedTanks*W_SedBay) + (W_FlocChannel*N_FlocChannels) + ((N_SedBays + 1)*T_PlantWall) + N_FlocChannels*T_PlantWall + 2*W_InletChannel
H_DC := h_frectreal(Q_DChannel, W_DC, L_DC, Nu_Water, E_Pvc, 1)
DChannel_Origin := [
    Plant_Origin[0] + W_DC + 2*T_PlantWall;
    Plant_Origin[1] - 2*W_InletChannel;
    Plant_Origin[2] - H_DC - 2*T_PlantWall
]
p1 := [DChannel_Origin[0] - 2*T_PlantWall - W_InletChannel; DChannel_Origin[1]; DChannel_Origin[2] + H_DC]
p2 := [
    DChannel_Origin[0] - 2*T_PlantWall - W_InletChannel;
    DChannel_Origin[1];
    DChannel_Origin[2] - T_PlantWall
]
p3 := [
    DChannel_Origin[0] - T_PlantWall - W_InletChannel/2;
    DChannel_Origin[1];
    DChannel_Origin[2] - T_PlantWall - W_InletChannel/2
]
p4 := [DChannel_Origin[0]; DChannel_Origin[1]; DChannel_Origin[2] - T_PlantWall]
p5 := [DChannel_Origin[0]; DChannel_Origin[1]; DChannel_Origin[2] + H_DC]
p6 := [DChannel_Origin[0] - T_PlantWall; DChannel_Origin[1]; DChannel_Origin[2] + H_DC]
p7 := [DChannel_Origin[0] - T_PlantWall; DChannel_Origin[1]; DChannel_Origin[2] - T_PlantWall]
p8 := [
    DChannel_Origin[0] - T_PlantWall - W_InletChannel/2;
    DChannel_Origin[1];
    DChannel_Origin[2] - W_InletChannel/2
]
p9 := [
    DChannel_Origin[0] - T_PlantWall - W_InletChannel;
    DChannel_Origin[1];
    DChannel_Origin[2] - T_PlantWall
]
p10 := [DChannel_Origin[0] - T_PlantWall - W_InletChannel; DChannel_Origin[1]; DChannel_Origin[2] + H_DC]
p11 := p1
q1 := [
    DChannel_Origin[0] - 2*T_PlantWall - W_InletChannel;
    DChannel_Origin[1] + L_DC;
    DChannel_Origin[2] + H_DC
]
q2 := [
    DChannel_Origin[0] - 2*T_PlantWall - W_InletChannel;
    DChannel_Origin[1] + L_DC;
    DChannel_Origin[2] - T_PlantWall + H_DC
]
q3 := [
    DChannel_Origin[0] - T_PlantWall - W_InletChannel/2;
    DChannel_Origin[1] + L_DC;
    DChannel_Origin[2] - T_PlantWall - W_InletChannel/2 + H_DC
]
q4 := [DChannel_Origin[0]; DChannel_Origin[1] + L_DC; DChannel_Origin[2] - T_PlantWall + H_DC]
q5 := [DChannel_Origin[0]; DChannel_Origin[1] + L_DC; DChannel_Origin[2] + H_DC]
q6 := [DChannel_Origin[0] - T_PlantWall; DChannel_Origin[1] + L_DC; DChannel_Origin[2] + H_DC]
q7 := [
    DChannel_Origin[0] - T_PlantWall;
    DChannel_Origin[1] + L_DC;
    DChannel_Origin[2] - T_PlantWall + H_DC
]
q8 := [
    DChannel_Origin[0] - T_PlantWall - W_InletChannel/2;
    DChannel_Origin[1] + L_DC;
    DChannel_Origin[2] - W_InletChannel/2 + H_DC
]
q11 := q1
q9 := [
    DChannel_Origin[0] - T_PlantWall - W_InletChannel;
    DChannel_Origin[1] + L_DC;
    DChannel_Origin[2] - T_PlantWall + H_DC
]
q10 := [
    DChannel_Origin[0] - T_PlantWall - W_InletChannel;
    DChannel_Origin[1] + L_DC;
    DChannel_Origin[2] + H_DC
]
parray := [p1; p2; p3; p4; p5; p6; p7; p8; p9; p10; p11]
qarray := [q1; q2; q3; q4; q5; q6; q7; q8; q9; q10; q11]
DrainChannelScript :=
    DCLayer ← layer_new("DrainChannel", ltgrey)
    SedCrossSection ← Pline3D(parray)
    FlocCrossSection ← Pline3D(qarray)
    TopView ← viewtop1
    Loft ← Loft(p3, q3)
    Freeze ← FreezeLayer("DrainChannel")
    return stack(DCLayer, SedCrossSection, FlocCrossSection, TopView, Loft, Freeze)
Q_EtDChannel := ((N_EtHoppers - 1)*π*(innerdiameter(ND_EtDrain, EN_PipeSpec)/2)^2*(2*g*HW_Et/K_PipeExit)^(1/2))  # add in drain from first hopper later
H_EtDC := h_frectreal(Q_EtDChannel, W_DC, L_Et, Nu_Water, E_Pvc, 1)
EtDC_Origin :=
    (Et_Origin + [0 m; ConRadius(ND_EtDrain); 0 m]) if mod(N_FlocChannels, 2) == 0
    (Et_Origin + [-2*(Et_Origin[0] - FlocCoupling_Origin[0]); ConRadius(ND_EtDrain); 0 m]) otherwise  # entrance side of the ET centered on the drain
Z_EtDC := Z_Et - T_PlantWall
a1 := EtDC_Origin + [0 m; 1/2*W_DC; □]  # error: This placeholder is empty.
AC_DrainChannel := DrainChannelScript
# [component: inputs AC_DrainChannel]
