# [reference: MasterProgram.xmcd]
# Drain Channel
K_ValveGate := .11
K_Ent := 0.5
K_Exit := 1
K_Valve := K_Ent + K_ValveGate + K_Exit
V_Valve := sqrt(h_e*2*g/K_Valve)  # error: This value must be a scalar.
Ti_Drain := 15 min
A_FlocValve := π*(D_FlocValve/2)^2
A_SedDrainValve := π*(D_SedDrainValve/2)^2
Q_DChannel := (A_FlocValve*(2*g*HW_FlocStart/K_Valve)^(1/2)) + ((N_FlocValves - 1)*A_FlocValve*(2*g*HW_FlocChannel/K_Valve)^(1/2)) + (A_SedDrainValve*N_SedBays*(2*g*HW_Sed/K_Valve)^(1/2))
Q_DChannel = 432.555 L/s
Q_Plant = 0.15 m^3/s
N_SedBays = 4
N_SedTanks = 4
N_SedBays*W_SedBay = 4.24 m
Vol_DChannel := Q_DChannel/2*Ti_Drain = 194.65 m^3
N_FlocChannels*W_FlocChannel = 8.34605 m
f_rect(Q_DChannel, 2 m, 1 m, Nu_Water, 2 mm, open) =  # error: This value must be a scalar.
f_rect(Q, w, b, ν, ε, open) :=
    f ← 0.25/log(ε/(3.7*4*R_h(w, b, open)) + 5.74/Re_rect(Q, w, b, ν, open)^0.9)^2 if Re_rect(Q, w, b, ν, open) > Re_pipetransition
    f ← 64/Re_rect(Q, w, b, ν, open) otherwise
    return f
h_frect(Q, w, b, L, ν, ε, open) := f_rect(Q, w, b, ν, ε, open)*L/(4*R_h(w, b, open))*Q^2/(2*g*(w*b)^2)
h_frectreal(Q, w, b, L, ν, ε, open) :=
    h_temp ← 0 m
    h_tempprev ← h_frect(Q, w, b, L, ν, ε, open)
    error ← 1
    while error > 0.01
        (h_temp ← h_tempprev)
        h_tempprev ← (f_rect(Q, w, b, ν, ε, open)*L*Q^2*(2 + w/b)/(8*g*(w/b)^3))^(1/6)
        error ← 0 if h_tempprev == 0*m^3/s
        error ← |h_temp - h_tempprev|/mean(h_temp, h_tempprev) otherwise
    return h_tempprev
# This term needs to be updated using h.temp somehow.
Q_pipetotal(D, h_l, L, ν, ε, K) :=
    Q_tempprev ← Q_pipemajor(D, h_l, L, ν, ε) if K == 0
    otherwise
        Q_temp ← 0*m^3/s
        error ← 1
        Q_tempprev ← min(Q_pipemajor(D, h_l, L, ν, ε), Q_pipeminor(D, h_l, K))
        while error > 0.01
            (Q_temp ← Q_tempprev)
            h_fnew ← h_l*h_f(Q_temp, D, L, ν, ε)/(h_f(Q_temp, D, L, ν, ε) + h_e(Q_temp, D, K))
            Q_tempprev ← Q_pipemajor(D, h_fnew, L, ν, ε)
            error ← 0 if Q_tempprev == 0*m^3/s
            error ← |Q_temp - Q_tempprev|/mean(Q_temp, Q_tempprev) otherwise
    return Q_tempprev
