# Automated Design: AutoCAD: Entrance Tank
# References
# Inputs
Et_origin := [
    Plant_Origin[0] + W_MpWalkway + W_Et + 2*T_PlantWall;
    Plant_Origin[1] + (N_SedTanks*(W_Sed + T_PlantWall)) + (N_FlocChannels*(W_FlocChannel + T_PlantWall));
    Z_EtTop - H_Et
] = [2.41803; 2.57; 1.36052] m
Et_dim := [L_Et; W_Et; H_Et] = [1.11803; 1.11803; 0.849636] m
RMPipe_Origin := [Et_origin[0] - L_Et/2; Et_origin[1] + W_Et/2; Z_SedWeirExit - 2*D_RMPipe - SocketDepth(ND_RMPipe)] = [1.85902; 3.12902; 1.30352] m
L_RMPipeBelow := Z_SedWeirExit - 2*D_RMPipe - SocketDepth(ND_RMPipe) - (ConRadius(ND_RMPipe) + ElbowRadius(ND_RMPipe)) - Z_FlocTank = 0.973955 m
RMElbow1_Origin := [
    RMPipe_Origin[0] - ElbowRadius(ND_RMPipe);
    RMPipe_Origin[1];
    Z_FlocTank + ConRadius(ND_RMPipe) + ElbowRadius(ND_RMPipe)
] = [1.63042; 3.12902; 0.329565] m
EtPipe_Origin := [-RMPipe_Origin[1]; Z_FlocTank + ConRadius(ND_RMPipe); -RMPipe_Origin[0] + ElbowRadius(ND_RMPipe)]
L_EtPipe :=
    (RMPipe_Origin[0] + ConRadius(ND_RMPipe) - 2*ElbowRadius(ND_RMPipe)) if mod(N_FlocChannels, 2) == 1
    (W_Et/2 - ElbowRadius(ND_RMPipe) + 2*T_PlantWall + W_MpWalkway + L_Sed - ConRadius(ND_RMPipe) - ElbowRadius(ND_RMPipe)) otherwise
RMElbow2_Origin := [
    {
        (-L_Sed + ElbowRadius(ND_RMPipe) + ConRadius(ND_RMPipe)) if mod(N_FlocChannels, 2) == 0
        (ElbowRadius(ND_RMPipe) - ConRadius(ND_RMPipe)) otherwise
    };
    RMPipe_Origin[1] - ElbowRadius(ND_RMPipe);
    Z_FlocTank + ConRadius(ND_RMPipe)
]
L_RMPipe3 := RMPipe_Origin[1] - Et_origin[1] + T_PlantWall - (ElbowRadius(ND_RMPipe) + SocketDepth(ND_RMPipe))
RMPipeCap_Origin := RMPipe_Origin + [0; 0; 2*D_RMPipe + SocketDepth(ND_RMPipe) - CapHeight(ND_RMPipe)]
RMPipe3_Origin := [
    {
        (-L_Sed + ConRadius(ND_RMPipe)) if mod(N_FlocChannels, 2) == 0
        (-ConRadius(ND_RMPipe)) otherwise
    };
    Z_FlocTank + ConRadius(ND_RMPipe);
    -RMElbow2_Origin[1]
] = [-12.0254; 0.100965; -2.90042] m
RMCoupling2_Origin := [RMPipe3_Origin[0]; RMPipe3_Origin[1]; -Et_origin[1] + T_PlantWall] = [-12.0254; 0.100965; -2.42] m
# Scripts
EtTankScript :=
    layernewt ← layer_new("entrancetank", ltgrey)
    tank ← Tank(Et_origin, Et_dim, T_EtWall)
    layersett ← layer_set("0")
    layerfreezet ← layer_freeze("entrancetank")
    one ← stack(layernewt, tank, layersett, layerfreezet)
    layer3 ← layer_set("entrancetank")
    layerset3 ← layer_set("0")
    layerthaw3 ← layer_thaw("entrancetank")
    viewtop ← viewtop1
    layerfreeze3 ← layer_freeze("entrancetank")
    two ← stack(layer3, layerset3, layerthaw3, viewtop, layerfreeze3)
    three ← stack(one, two)
    return three
RMPipeScript :=
    layernew1 ← layer_new("RMPipe", blue)
    viewtop ← viewtop1
    RMPipe ← Pipe(RMPipe_Origin, ND_RMPipe, 2*D_RMPipe, EN_PipeSpec)
    layerset1 ← layer_set("0")
    layerfreeze1 ← layer_freeze("RMPipe")
    one ← stack(layernew1, viewtop, RMPipe, layerset1, layerfreeze1)
    return one
2*D_RMPipe =  # error: This variable is undefined.
RMPipeCapScript :=
    layernew ← layer_new("MicroMixOrifice", red)
    top ← viewtop1
    makecap ← cap(RMPipeCap_Origin, ND_RMPipe, EN_PipeSpec)
    orifice ← cylinderD(RMPipeCap_Origin + [0; 0; -1*m], D_RMMicroOrifice/2, RMPipeCap_Origin + [0; 0; 1*m])
    subtract ← subtractD(RMPipeCap_Origin + [outerradius(ND_RMPipe); 0; 0], RMPipeCap_Origin + [D_RMMicroOrifice/2; 0; -1*m])
    set ← layer_set("0")
    freeze2 ← layer_freeze("MicroMixOrifice")
    return stack(layernew, top, makecap, orifice, subtract, set, freeze2)
RMCoupling :=
    layernew1 ← layer_new("RMCoupling", green)
    viewtop ← viewtop1
    RMCoupling ← couplingIDpipe([RMPipe_Origin[0]; RMPipe_Origin[1]; RMPipe_Origin[2] + SocketDepth(ND_RMPipe)], D_RMPipe, T_PlantWall, EN_PipeSpec)
    layerset ← layer_set("0")
    layerfreeze ← layer_freeze("RMCoupling")
    one ← stack(layernew1, viewtop, RMCoupling, layerset, layerfreeze)
    return one
L_RMPipeBelow =  # error
RMPipeScriptBelowET :=
    if L_RMPipeBelow > 0 m
        layerthaw ← layer_thaw("RMPipe")
        layerset1 ← layer_set("RMPipe")
        viewtop ← viewtop1
        RMPipe ← Pipe([RMPipe_Origin[0]; RMPipe_Origin[1]; Z_FlocTank + ConRadius(ND_RMPipe) + ElbowRadius(ND_RMPipe)], ND_RMPipe, L_RMPipeBelow, EN_PipeSpec)
        layerset2 ← layer_set("0")
        layerfreeze1 ← layer_freeze("RMPipe")
        one ← stack(layerthaw, layerset1, viewtop, RMPipe, layerset2, layerfreeze1)
        return one
    return one
RMElbow1 :=
    layernew ← layer_new("RMElbow", green)
    viewfront ← viewfront1
    elbow ← elbow(RMElbow1_Origin, ND_RMPipe, EN_PipeSpec)
    viewleft ← viewleftside
    rotate ← rotate_All([-RMPipe_Origin[1]; RMElbow1_Origin[2]; -RMPipe_Origin[2]], 90)
    layerset ← layer_set("0")
    layerfreeze ← layer_freeze("RMElbow")
    one ← stack(layernew, viewfront, elbow, viewleft, rotate, layerset, layerfreeze)
    return one
EtPipeScript :=
    layerthaw ← layer_thaw("RMPipe")
    layerset1 ← layer_set("RMPipe")
    viewleft ← viewleftside
    pipe ← Pipe(EtPipe_Origin, ND_RMPipe, L_EtPipe, EN_PipeSpec)
    layerset ← layer_set("0")
    layerfreeze ← layer_freeze("RMPipe")
    one ← stack(layerthaw, layerset1, viewleft, pipe, layerset, layerfreeze)
    return one
L_EtPipe =  # error
RMElbow2 :=
    layernew ← layer_new("RMElbow2", green)
    viewtop ← viewtop1
    elbow ← elbow(RMElbow2_Origin, ND_RMPipe, EN_PipeSpec)
    rotate ← rotate_All(RMElbow2_Origin, 90)
    layerset2 ← layer_set("0")
    layerfreeze ← layer_freeze("RMElbow2")
    one ← stack(layernew, viewtop, elbow, rotate, layerset2, layerfreeze)
    return one
Pipe3Script :=
    layerthaw ← layer_thaw("RMPipe")
    layerset ← layer_set("RMPipe")
    viewfront ← viewfront1
    pipe ← Pipe(RMPipe3_Origin, ND_RMPipe, L_RMPipe3, EN_PipeSpec)
    layerset1 ← layer_set("0")
    layerfreeze ← layer_freeze("RMPipe")
    one ← stack(layerthaw, layerset, viewfront, pipe, layerset1, layerfreeze)
    return one
RMCoupling2 :=
    layernew ← layer_new("RMCoupling2", green)
    viewfront ← viewfront1
    RMCoupling ← couplingIDpipe(RMCoupling2_Origin, D_RMPipe, T_PlantWall, EN_PipeSpec)
    layerset ← layer_set("0")
    layerfreeze ← layer_freeze("RMCoupling2")
    one ← stack(layernew, viewfront, RMCoupling, layerset, layerfreeze)
    return one
AC_EntranceTank := stack(EtTankScript, RMPipeScript, RMPipeCapScript, RMCoupling, RMPipeScriptBelowET, RMElbow1, EtPipeScript, RMElbow2, Pipe3Script, RMCoupling2)
# [component: inputs AC_EntranceTank]
Z_SedWeirExit =  # error
