# Floc Hopper Draw Script
# [reference: MasterProgram.xmcd]
origin_box := [0; 0; 0]
dim_box := [L_FlocHopper; T_FlocHopper; H_FlocHopper] = [0.82; 0.04; 0.705593] m
dim_wedge := [(L_FlocHopper - W_FlocHopper)/2; T_FlocHopper; origin_box[2]] = [0.385; 0.04; 0] m
h_wedge := H_FlocHopper
FlocHopperScript :=
    layer1 ← layer_new("flochopper", green)
    viewtop ← viewtop1
    flochopper_box ← box(origin_box, dim_box)
    flochopper_wedge1 ← wedge(origin_box, dim_wedge, h_wedge)
    mirror_wedge ← mirrorD(dim_wedge, [origin_box[0] + L_FlocHopper/2; origin_box[1]], [origin_box[0] + L_FlocHopper/2; T_FlocHopper])
    zoomin ← zoom_win([origin_box[0]; origin_box[1]], [2*dim_box[0]; 2*dim_box[1]])
    subtract_wedge1 ← subtractD([dim_box[0]/2; dim_box[1]; dim_box[2]], [dim_wedge[0]; dim_wedge[1]/2; origin_box[2]])
    subtract_wedge2 ← subtractD([dim_box[0]/2; dim_box[1]], [dim_wedge[0] + W_FlocHopper; dim_wedge[1]/2])
    rotate_flochopper1 ← rotate_3d(dim_box, origin_box, "z", 90)
    rotate_flochopper ← rotate_3d([origin_box[0]; origin_box[1]; H_FlocHopper], [origin_box[0] + T_FlocHopper; origin_box[1]; origin_box[2]], "y", 90 - AN_FlocHopper)
    move_flochopper ← move_allD([0; T_PlantWall + (W_SedBayActual + W_SedBayDivider)*(N_SedBays - 1); 0])
    arraybay3 ← concat("-array", sp, "ALL", sp, sp, "r", sp, stringit_nounits(N_SedBays), sp, "1", sp, stringit(-W_SedBay - W_SedBayDivider/2))
    arraybay4 ← concat("-array", sp, "ALL", sp, sp, "r", sp, stringit_nounits(N_SedBays), sp, "1", sp, stringit(-((W_Sed - (N_SedBays - 1)*W_SedBayDivider)/N_SedBays + W_SedBayDivider)))
    layerset ← layer_set("0")
    layerfreeze ← layer_freeze("flochopper")
    one ← stack(layer1, viewtop, flochopper_box, flochopper_wedge1, mirror_wedge, zoomin, subtract_wedge1, subtract_wedge2, rotate_flochopper1, rotate_flochopper, layerset, layerfreeze) if N_SedBays == 1
    one ← stack(layer1, viewtop, flochopper_box, flochopper_wedge1, mirror_wedge, zoomin, subtract_wedge1, subtract_wedge2, rotate_flochopper1, rotate_flochopper, arraybay4, layerset, layerfreeze) if N_SedBays > 1 and N_SedTanks ≥ 1
    one ← stack(layer1, viewtop, flochopper_box, flochopper_wedge1, mirror_wedge, zoomin, subtract_wedge1, subtract_wedge2, rotate_flochopper1, rotate_flochopper, arraybay3, layerset, layerfreeze) otherwise
    return one
# [component: inputs FlocHopperScript]
