# Automated Design: AutoCAD: Flocculation Tank
# Dimensions
Floc_Origin := [
    Plant_Origin[0];
    Plant_Origin[1] + N_SedTanks*(W_Sed + T_PlantWall);
    Plant_Origin[2] + (HW_Sed - HW_FlocChannel)
]
ND_SpacerPipe := 3/4*in
TotalFloc_Dim := [
    L_FlocTank/N_FlocChannels;
    (N_FlocChannels*W_FlocChannel) + ((N_FlocChannels - 1)*T_PlantWall);
    H_Floc
]
Wall_Dim := [TotalFloc_Dim[0] + (2*T_PlantWall); T_PlantWall; TotalFloc_Dim[2]]
FlocPort_Dim :=
    for i ∈ 0 .. (N_FlocChannels - 2)
        FlocPort_Dim[0, i] ← [W_FlocPort[N_FlocChannels - 2 - i]; T_PlantWall; (-H_FlocPort)[i]]
    return FlocPort_Dim
# Floc ports connect the channels.
ChannelOpening_Dim := [
    W_SedInletChannelPreWeir;
    T_PlantWall;
    (H_Floc - H_Sed) + H_SedInletChannel + (HW_Sed - HW_FlocChannel)
] = [0.28415; 0.15; 0.551707] m
# normally want a 30deg slope, unless FlocModuleBaffle is too close
# set slope to be 5 cm away from nearest Baffle
FlocDrainSlope_Dim :=
    [sqrt(3)*H_FlocSlope; -D_FlocValve; -H_FlocSlope] if sqrt(3)*H_FlocSlope < W_FlocPort[0] + S_FlocPortGap - 5 cm
    [W_FlocPort[0] + S_FlocPortGap - 5 cm; -D_FlocValve; -H_FlocSlope] otherwise
Port_Dim := [T_FlocBaffle + 2*zc; L_BafflePort + L_Slot; L_BafflePort]
FlocCoupling_Origin := [
    {
        (Floc_Origin[0] - outerradius(ND_RMPipe) - S_Fitting) if mod(N_FlocChannels, 2) == 1
        (Floc_Origin[0] - L_Sed + outerradius(ND_RMPipe) + S_Fitting) otherwise
    };
    Floc_Origin[1] + N_FlocChannels*W_FlocChannel + T_PlantWall*(N_FlocChannels - 1) + SocketDepth(ND_RMPipe);
    Floc_Origin[2] + outerradius(ND_RMPipe) + S_Fitting
]
BaffleSlot1_Dim := [T_FlocBaffle; W_FlocChannel + 2*L_Slot; H_Floc - Z_FlocBaffles[0, 0]]
BaffleSlot1Last_Dim := [T_FlocBaffle; W_FlocChannel + 2*L_Slot; H_Floc - Z_FlocBaffles[0, N_FlocChannels - 1]]
BaffleSlot2_Dim := [T_FlocBaffle; W_FlocChannel + 2*L_Slot; H_Floc - Z_FlocBaffles[1, 0]]
BaffleSlot2Last_Dim := [T_FlocBaffle; W_FlocChannel + 2*L_Slot; H_Floc - Z_FlocBaffles[1, N_FlocChannels - 1]]
# Origin Points
Floc_Origin := [
    Plant_Origin[0];
    Plant_Origin[1] + N_SedTanks*(W_Sed + T_PlantWall);
    Plant_Origin[2] + (HW_Sed - HW_FlocChannel)
]
Wall_Origin := [Floc_Origin[0] - TotalFloc_Dim[0] - T_PlantWall; Floc_Origin[1] + W_FlocChannel; Floc_Origin[2]]
FlocPort_Origin :=
    for i ∈ 0 .. (N_FlocChannels - 2)
        if mod(i, 2) == 0
            FlocPort_Origin[0, i] ← [
                Floc_Origin[0] - W_FlocPort[N_FlocChannels - 2 - i];
                Floc_Origin[1] + (W_FlocChannel*(1 + i)) + (T_PlantWall*i);
                Floc_Origin[2] + H_FlocPort[i]
            ]
        otherwise
            FlocPort_Origin[0, i] ← [
                Floc_Origin[0] - TotalFloc_Dim[0];
                Floc_Origin[1] + (W_FlocChannel*(1 + i)) + (T_PlantWall*i);
                Floc_Origin[2] + H_FlocPort[i]
            ]
    return FlocPort_Origin
# The flocport origins were set to start at the top height of the ports themselves (added to the origin otherwise it disappears).  This changes the flocports to be at the bottom of the channel dividing walls instead of at the top (more structurally sound).
FlocPort_Origin =  # error: This variable is undefined.
# The Channel Opening was changed in the z-direction so that the bottom opening aligned with the bottom of the tank (for the same reason as the flocports).
ChannelOpening_Origin := [
    Floc_Origin[0] - TotalFloc_Dim[0];
    Floc_Origin[1] - T_PlantWall;
    Floc_Origin[2] + TotalFloc_Dim[2] - ChannelOpening_Dim[2]
] = [-3.88577; 5.2; 1.57965] m
# "L" origins are for the last channel only
LargeCap_Origin := [
    -CapDiameter(1.5 in)/2 + outerradius(1.5 in) + Floc_Origin[0] - L_Sed + X_FlocBaffles[0, 0];
    (Floc_Origin[1] + W_FlocChannel*N_FlocChannels + T_PlantWall*(N_FlocChannels - 1) - .05 m);
    Floc_Origin[2] + 4*S_ModulePipesV + S_FlocBaffle[last(S_FlocBaffle)]*Pi_FlocBaffle - .05 m
] = [-3.69731; 8.15; 1.53822] m
# Shifted LargeCap.Origin and LargeCapL.Origin (y and z values) to within 0.05m of each wall
# Matched L.Origin's to the rest of the Origins to account for now-equivalent FlocModuleBaffle spacings.
LargeCapL_Origin := [
    -CapDiameter(1.5 in)/2 + outerradius(1.5 in) + Floc_Origin[0] - L_Sed + X_FlocBaffles[0, 0] + B_FlocBaffle[0];
    Floc_Origin[1] + W_FlocChannel - .05 m;
    Floc_Origin[2] + 4*S_ModulePipesV + S_FlocBaffle[last(S_FlocBaffle)]*Pi_FlocBaffle - .05 m
] = [-3.52242; 5.9; 1.53822] m
FittedCap_Origin := LargeCap_Origin + [
    T_FlocBaffle + CapDiameter(0.5 in)/2 - outerradius(0.5 in) + CapDiameter(1.5 in)/2 - outerradius(1.5 in);
    0 m;
    0 m
]
FittedCapL_Origin := LargeCapL_Origin + [
    T_FlocBaffle + CapDiameter(0.5 in)/2 - outerradius(0.5 in) + CapDiameter(1.5 in)/2 - outerradius(1.5 in);
    0 m;
    0 m
]
LongPipe_Origin := FittedCap_Origin + [L_FlocModuleLong[0]; 0 m; 0 m]
LongPipeL_Origin := FittedCapL_Origin + [L_FlocModuleLong[0]; 0 m; 0 m]
ModuleCoupling_Origin := LongPipe_Origin + [CouplingLength(0.5 in) - 2*SocketDepth(0.5 in); 0 m; 0 m]
ModuleCouplingL_Origin := LongPipeL_Origin + [CouplingLength(0.5 in) - 2*SocketDepth(0.5 in); 0 m; 0 m]
ConnectorPipe_Origin := ModuleCoupling_Origin + [L_FlocModuleConnector[0]; 0 m; 0 m]
ConnectorPipeL_Origin := ModuleCouplingL_Origin + [L_FlocModuleConnector[0]; 0 m; 0 m]
FlocAdapter1_Origin :=
    [-L_Sed - CouplingLength(ND_FlocValve) - T_PlantWall; Y_FlocDrainValves[0]; Floc_Origin[2]] if EN_PlantDrains == 0
    otherwise
        [
            Plant_Origin[0] + max(CouplingLength(ND_FlocValve), T_PlantWall) + SocketDepth(ND_FlocValve);
            Y_FlocDrainValves[0];
            Floc_Origin[2]
        ]
FlocValve_Origin := FlocAdapter1_Origin + [
    MaleAdapterLength(ND_FlocValve) - SocketDepth(ND_FlocValve) - ValveSocket(ND_FlocValve) + ValveLength(ND_FlocValve);
    0 m;
    0 m
]
FlocAdapter2_Origin := FlocValve_Origin + [MaleAdapterLength(ND_FlocValve) - SocketDepth(ND_FlocValve) - ValveSocket(ND_FlocValve); 0 m; 0 m]
FlocDrainNipple_Origin := FlocAdapter2_Origin + [2*SocketDepth(ND_FlocValve); 0 m; 0 m]
# assumes drains are on right
BaffleSlot1_Origin := [Floc_Origin[0] - L_Sed; -L_Slot; Floc_Origin[2]] + [X_FlocBaffles[0, 0]; Y_FlocBaffles[0, 0]; Z_FlocBaffles[0, 0]]
BaffleSlot1Last_Origin := [Floc_Origin[0] - L_Sed; -L_Slot; Floc_Origin[2]] + [
    X_FlocBaffles[0, N_FlocChannels - 1];
    Y_FlocBaffles[0, N_FlocChannels - 1];
    Z_FlocBaffles[0, N_FlocChannels - 1]
]
BaffleSlot2_Origin := [Floc_Origin[0] - L_Sed; -L_Slot; Floc_Origin[2]] + [X_FlocBaffles[1, 0]; Y_FlocBaffles[0, 0]; Z_FlocBaffles[1, 0]]
BaffleSlot2Last_Origin := [Floc_Origin[0] - L_Sed; -L_Slot; Floc_Origin[2]] + [
    X_FlocBaffles[1, N_FlocChannels - 1];
    Y_FlocBaffles[0, N_FlocChannels - 1];
    Z_FlocBaffles[1, N_FlocChannels - 1]
]
BafflePort1V_Origin := [Floc_Origin[0] - L_Sed - zc; W_FlocChannel - L_BafflePort; Floc_Origin[2]] + [X_FlocBaffles[0, 0]; Y_FlocBaffles[0, 0]; Z_FlocBaffles[0, 0]]
BafflePort1VLast_Origin := [Floc_Origin[0] - L_Sed - zc; W_FlocChannel - L_BafflePort; Floc_Origin[2]] + [
    X_FlocBaffles[1, N_FlocChannels - 1];
    Y_FlocBaffles[0, N_FlocChannels - 1];
    Z_FlocBaffles[1, N_FlocChannels - 1]
]
BafflePort2V_Origin := [Floc_Origin[0] - L_Sed - zc; -L_Slot; Floc_Origin[2]] + [X_FlocBaffles[2, 0]; Y_FlocBaffles[0, 0]; Z_FlocBaffles[2, 0]]
BafflePort2VLast_Origin := [Floc_Origin[0] - L_Sed - zc; -L_Slot; Floc_Origin[2]] + [
    X_FlocBaffles[3, N_FlocChannels - 1];
    Y_FlocBaffles[0, N_FlocChannels - 1];
    Z_FlocBaffles[3, N_FlocChannels - 1]
]
# Flocculation Tank Script
FlocTankLayer := layer_new("FlocTank", grey)
DrawFlocTank := Tank(Floc_Origin, TotalFloc_Dim, T_PlantWall)
DrawFlocWall := BoxF(Wall_Origin, Wall_Origin + Wall_Dim, [0; 0; 0]*deg)
ArrayFlocWall := ArrayLast(N_FlocChannels - 1, 1, W_FlocChannel + T_PlantWall)
FlocChannelPorts :=
    Local ← FreezeLayer("FlocTank")
    for i ∈ 0 .. (N_FlocChannels - 2)
        Local ← stack(Local, BoxF(FlocPort_Origin[0, i], FlocPort_Origin[0, i] + FlocPort_Dim[0, i], [0; 0; 0]*deg))
ChannelOpening := BoxF(ChannelOpening_Origin, ChannelOpening_Origin + ChannelOpening_Dim, [0; 0; 0]*deg)
DrawBaffleSlot1 := BoxF(BaffleSlot1_Origin, BaffleSlot1_Origin + BaffleSlot1_Dim, [0; 0; 0]*deg)
DrawBaffleSlot1Last := BoxF(BaffleSlot1Last_Origin, BaffleSlot1Last_Origin + BaffleSlot1Last_Dim, [0; 0; 0]*deg)
DrawBaffleSlot2 := BoxF(BaffleSlot2_Origin, BaffleSlot2_Origin + BaffleSlot2_Dim, [0; 0; 0]*deg)
DrawBaffleSlot2Last := BoxF(BaffleSlot2Last_Origin, BaffleSlot2Last_Origin + BaffleSlot2Last_Dim, [0; 0; 0]*deg)
ArrayBaffleSlot1 := ArrayMultiple([BaffleSlot1_Origin], N_FlocChannels - 1, ceil(N_FlocChannelBaffles[0]/2), -W_FlocChannel - T_PlantWall, 2*B_FlocBaffle[0])
ArrayBaffleSlot2 := ArrayMultiple([BaffleSlot2_Origin], N_FlocChannels - 1, floor(N_FlocChannelBaffles[0]/2), -W_FlocChannel - T_PlantWall, 2*B_FlocBaffle[0])
ArrayBaffleSlot1Last := ArrayMultiple([BaffleSlot1Last_Origin], 1, ceil(N_FlocChannelBaffles[N_FlocChannels - 1]/2), -W_FlocChannel - T_PlantWall, 2*B_FlocBaffle[N_FlocChannels - 1])
ArrayBaffleSlot2Last := ArrayMultiple([BaffleSlot2Last_Origin], 1, floor(N_FlocChannelBaffles[N_FlocChannels - 1]/2), -W_FlocChannel - T_PlantWall, 2*B_FlocBaffle[N_FlocChannels - 1])
Wedge1 :=
    WedgeF([-L_Sed; Y_FlocDrainValves[0] + 0.5*D_FlocValve; Floc_Origin[2]], FlocDrainSlope_Dim + [-L_Sed; Y_FlocDrainValves[0] + 0.5*D_FlocValve; Floc_Origin[2]], [0; 0; 0]*deg) if EN_PlantDrains == 0
    WedgeF([Plant_Origin[0]; Y_FlocDrainValves[0] + 0.5*D_FlocValve; Floc_Origin[2]], [-FlocDrainSlope_Dim[0]; FlocDrainSlope_Dim[1]; FlocDrainSlope_Dim[2]] + [Plant_Origin[0]; Y_FlocDrainValves[0] + 0.5*D_FlocValve; Floc_Origin[2]], [0; 0; 0]*deg) otherwise
ArrayWedge := ArrayLast(last(Y_FlocDrainValves) + 1, 1, 2*W_FlocChannel + 2*T_PlantWall)
GroupFlocSubtractionPieces := GroupAll("DeleteMe")
SubtractFlocTankPieces := SubtractF(["FlocTank"], "DeleteMe")
FlocTankScript :=
    stack(FlocTankLayer, DrawFlocTank, DrawFlocWall, ArrayFlocWall, FlocChannelPorts, ChannelOpening, Wedge1, ArrayWedge, GroupFlocSubtractionPieces, SubtractFlocTankPieces) if L_Slot == 0
    stack(FlocTankLayer, DrawFlocTank, DrawFlocWall, ArrayFlocWall, FlocChannelPorts, ChannelOpening, DrawBaffleSlot1, DrawBaffleSlot2, DrawBaffleSlot1Last, DrawBaffleSlot2Last, ArrayBaffleSlot1, ArrayBaffleSlot2, ArrayBaffleSlot1Last, ArrayBaffleSlot2Last, sp, Wedge1, ArrayWedge, GroupFlocSubtractionPieces, SubtractFlocTankPieces) otherwise
FlocBaffleLayerV := layer_new("FlocModuleBaffle", ltpurple)
DrawLowerBaffleV := BoxF([Floc_Origin[0] - L_Sed; -L_Slot; Floc_Origin[2]] + [X_FlocBaffles[0, 0]; Y_FlocBaffles[0, 0]; Z_FlocBaffles[0, 0]], [Floc_Origin[0] - L_Sed; -L_Slot; Floc_Origin[2]] + [X_FlocBaffles[0, 0]; Y_FlocBaffles[0, 0]; Z_FlocBaffles[0, 0]] + [T_FlocBaffle; W_FlocChannel + 2*L_Slot; L_FlocBaffles[0, 0]], [0; 0; 0]*deg)
ArrayLowerBaffleV := ArrayLast(1, ceil(N_FlocChannelBaffles[0]/2), 2*B_FlocBaffle[0])
# Aligned FlocModuleBaffle spacing of last floc channel to the FlocModuleBaffle spacings of the other channels.
DrawUpperBaffleV := BoxF([Floc_Origin[0] - L_Sed; -L_Slot; Floc_Origin[2]] + [X_FlocBaffles[1, 0]; Y_FlocBaffles[0, 0]; Z_FlocBaffles[1, 0]], [Floc_Origin[0] - L_Sed; -L_Slot; Floc_Origin[2]] + [X_FlocBaffles[1, 0]; Y_FlocBaffles[0, 0]; Z_FlocBaffles[1, 0]] + [T_FlocBaffle; W_FlocChannel + 2*L_Slot; L_FlocBaffles[1, 0]], [0; 0; 0]*deg)
ArrayUpperBaffleV := ArrayLast(1, floor(N_FlocChannelBaffles[0]/2), 2*B_FlocBaffle[0])
ArrayBafflesChannelV := array_all(N_FlocChannels - 1, 1, -W_FlocChannel - T_PlantWall)
DrawLastLowerBaffleV := BoxF([Floc_Origin[0] - L_Sed; -L_Slot; Floc_Origin[2]] + [
    X_FlocBaffles[0, 0] + B_FlocBaffle[0];
    Y_FlocBaffles[0, N_FlocChannels - 1];
    Z_FlocBaffles[0, N_FlocChannels - 1]
], [Floc_Origin[0] - L_Sed; -L_Slot; Floc_Origin[2]] + [
    X_FlocBaffles[0, 0] + B_FlocBaffle[0];
    Y_FlocBaffles[0, N_FlocChannels - 1];
    Z_FlocBaffles[0, N_FlocChannels - 1]
] + [T_FlocBaffle; W_FlocChannel + 2*L_Slot; L_FlocBaffles[0, N_FlocChannels - 1]], [0; 0; 0]*deg)
ArrayLastLowerBaffleV := ArrayLast(1, floor(N_FlocChannelBaffles[0]/2), 2*B_FlocBaffle[0])
DrawLastUpperBaffleV := BoxF([Floc_Origin[0] - L_Sed; -L_Slot; Floc_Origin[2]] + [
    X_FlocBaffles[1, 0] + B_FlocBaffle[0];
    Y_FlocBaffles[0, N_FlocChannels - 1];
    Z_FlocBaffles[1, N_FlocChannels - 1]
], [Floc_Origin[0] - L_Sed; -L_Slot; Floc_Origin[2]] + [
    X_FlocBaffles[1, 0] + B_FlocBaffle[0];
    Y_FlocBaffles[0, N_FlocChannels - 1];
    Z_FlocBaffles[1, N_FlocChannels - 1]
] + [T_FlocBaffle; W_FlocChannel + 2*L_Slot; L_FlocBaffles[1, N_FlocChannels - 1]], [0; 0; 0]*deg)
ArrayLastUpperBaffleV := ArrayLast(1, floor(N_FlocChannelBaffles[0]/2), 2*B_FlocBaffle[0])
FreezeBafflesV := FreezeLayer("FlocModuleBaffle")
DrawBafflePort1V := BoxF(BafflePort1V_Origin, BafflePort1V_Origin + Port_Dim, [0; 0; 0]*deg)
DrawBafflePort1VLast := BoxF(BafflePort1VLast_Origin, BafflePort1VLast_Origin + Port_Dim, [0; 0; 0]*deg)
DrawBafflePort2V := BoxF(BafflePort2V_Origin, BafflePort2V_Origin + Port_Dim, [0; 0; 0]*deg)
DrawBafflePort2VLast := BoxF(BafflePort2VLast_Origin, BafflePort2VLast_Origin + Port_Dim, [0; 0; 0]*deg)
ArrayPort1V := ArrayMultiple([BafflePort1V_Origin], N_FlocChannels - 1, ceil(N_FlocChannelBaffles[0]/4), -W_FlocChannel - T_PlantWall, 4*B_FlocBaffle[0])
ArrayPort2V := ArrayMultiple([BafflePort2V_Origin], N_FlocChannels - 1, ceil((N_FlocChannelBaffles[0] - 2)/4), -W_FlocChannel - T_PlantWall, 4*B_FlocBaffle[0])
ArrayPort1VLast := ArrayMultiple([BafflePort1VLast_Origin], 1, ceil(N_FlocChannelBaffles[N_FlocChannels - 1]/4), -W_FlocChannel - T_PlantWall, 4*B_FlocBaffle[N_FlocChannels - 1])
ArrayPort2VLast := ArrayMultiple([BafflePort2VLast_Origin], 1, ceil((N_FlocChannelBaffles[N_FlocChannels - 1] - 3)/4), -W_FlocChannel - T_PlantWall, 4*B_FlocBaffle[N_FlocChannels - 1])
GroupBafflesV := GroupAll("DeleteMe")
SubtractBafflePortsV := SubtractF(["FlocModuleBaffle"], "DeleteMe")
FlocTankBaffleScriptV := stack(FlocBaffleLayerV, DrawLowerBaffleV, ArrayLowerBaffleV, DrawUpperBaffleV, ArrayUpperBaffleV, ArrayBafflesChannelV, DrawLastLowerBaffleV, ArrayLastLowerBaffleV, DrawLastUpperBaffleV, ArrayLastUpperBaffleV, FreezeBafflesV, DrawBafflePort1V, DrawBafflePort2V, DrawBafflePort1VLast, DrawBafflePort2VLast, ArrayPort1V, ArrayPort2V, ArrayPort1VLast, ArrayPort2VLast, GroupBafflesV, SubtractBafflePortsV)
ModulePipingLayer := layer_new("FlocModulePiping", purple)
ND_FlocModulesMain := 1/2*in
ND_FlocModulesLarge := 1.5 in
LargeCap := CapF(LargeCap_Origin, [0; 0]*deg, ND_FlocModulesLarge)
FittedCap := CapF(FittedCap_Origin, [180; 0]*deg, ND_FlocModulesMain)
LongPipe := PipeF(LongPipe_Origin, L_FlocModuleLong[0], [0; 0]*deg, ND_FlocModulesMain, PS_Modules)
ModuleCoupling := CouplingF(ModuleCoupling_Origin, [0; 0]*deg, ND_FlocModulesMain, PS_Modules)
ArrayGroup(nrow, ncol, dist, GroupName) := concat("-array", sp, "g", sp, GroupName, sp, sp, "R", sp, stringit_nounits(nrow), sp, stringit_nounits(ncol), sp, stringit(dist))
ConnectorPipe := PipeF(ConnectorPipe_Origin, S_FlocBaffle[0] - CouplingLength(ND_FlocModulesMain) + SocketDepth(ND_FlocModulesMain) - (CapDiameter(ND_FlocModulesLarge)/2 - outerradius(ND_FlocModulesLarge)), [0; 0]*deg, ND_FlocModulesMain, PS_Modules)
ArrayModulesX := array_all(1, N_FlocChannelModulesLong[0], B_FlocBaffle[0]*N_FlocChannelBafflesLong[0])
LeftPipe := PipeF([
    Floc_Origin[0] - X_FlocBaffles[rows(X_FlocBaffles) - 1, 0] - T_FlocBaffle - (CapDiameter(ND_FlocModulesLarge)/2 - outerradius(ND_FlocModulesLarge));
    LargeCap_Origin[1];
    LargeCap_Origin[2]
], L_Sed - X_FlocBaffles[rows(X_FlocBaffles) - 1, 0] - T_FlocBaffle - (CapDiameter(ND_FlocModulesLarge)/2 - outerradius(ND_FlocModulesLarge)), [0; 0]*deg, ND_FlocModulesMain, PS_Modules)
LastLargeCap := CapF([
    {
        (Floc_Origin[0] - X_FlocBaffles[N_FlocChannelBafflesShort[0] - 1, 0] - T_FlocBaffle - (CapDiameter(ND_FlocModulesLarge)/2 - outerradius(ND_FlocModulesLarge))) if N_FlocChannelBafflesShort[0] ≥ 1
        (Floc_Origin[0] - X_FlocBaffles[0, 0] - T_FlocBaffle - (CapDiameter(ND_FlocModulesLarge)/2 - outerradius(ND_FlocModulesLarge))) otherwise
    };
    LargeCap_Origin[1];
    LargeCap_Origin[2]
], [0; 0]*deg, ND_FlocModulesLarge)
LastFittedCap := CapF([
    {
        (Floc_Origin[0] - X_FlocBaffles[N_FlocChannelBafflesShort[0] - 1, 0] + (CapDiameter(ND_FlocModulesMain)/2 - outerradius(ND_FlocModulesMain))) if N_FlocChannelBafflesShort[0] ≥ 1
        (Floc_Origin[0] - X_FlocBaffles[0, 0] + (CapDiameter(ND_FlocModulesMain)/2 - outerradius(ND_FlocModulesMain))) otherwise
    };
    LargeCap_Origin[1];
    LargeCap_Origin[2]
], [180; 0]*deg, ND_FlocModulesMain)
RightPipe := PipeF([Floc_Origin[0]; LargeCap_Origin[1]; LargeCap_Origin[2]], {
    (X_FlocBaffles[N_FlocChannelBafflesShort[0] - 1, 0] - (CapDiameter(ND_FlocModulesMain)/2 - outerradius(ND_FlocModulesMain)) - Floc_Origin[0]) if N_FlocChannelBafflesShort[0] ≥ 1
    (X_FlocBaffles[0, 0] - (CapDiameter(ND_FlocModulesMain)/2 - outerradius(ND_FlocModulesMain)) - Floc_Origin[0]) otherwise
}, [0; 0]*deg, ND_FlocModulesMain, PS_Modules)
SpacerPipe := PipeF(LongPipe_Origin - [
    L_FlocModuleLong[0] - S_FlocBaffle[0] + (CapDiameter(ND_FlocModulesMain)/2 - outerradius(ND_FlocModulesMain));
    0;
    0
], S_FlocBaffle[0] - CapHeight(ND_FlocModulesMain), [0; 0]*deg, ND_SpacerPipe, PS_Modules)
ArrayModulesY := array_all(2, 1, -W_FlocChannel + .1 m)  # ArrayModulesY and ArrayModulesZ array new pipes to within 0.05m of each wall.
ArrayModulesZ := array_all(3, 1, (-S_ModulePipesV*4 + .1 m)/2)
GroupPiping := GroupAll("FlocModulePiping")
# Removed LeftPipe (end pipe) from ArrayChannelModules
ArrayChannelModules :=
    Local ← stack(ModulePipingLayer, LargeCap, FittedCap, LongPipe, ModuleCoupling, ConnectorPipe)
    if N_FlocChannelBafflesLong[0] - 2 > 0
        for i ∈ 1 .. (N_FlocChannelBafflesLong[0] - 2)
            Local ← stack(Local, PipeF(LongPipe_Origin - [T_FlocBaffle + (i - 1)*B_FlocBaffle[0] + SocketDepth(ND_FlocModulesMain); 0; 0], S_FlocBaffle[0], [0; 0]*deg, ND_SpacerPipe, PS_Modules))
    Local ← stack(Local, SpacerPipe, ArrayModulesX)
    Local ← stack(Local, PipeF([Floc_Origin[0]; LargeCap_Origin[1]; LargeCap_Origin[2]], X_FlocBaffles[0, 0], [0; 0]*deg, ND_SpacerPipe, PS_Modules)) if N_FlocChannelBafflesShort[0] > 1
    if N_FlocChannelBafflesShort[0] - 2 > 0
        for i ∈ 1 .. (N_FlocChannelBafflesShort[0] - 2)
            Local ← stack(Local, PipeF([
                Floc_Origin[0] - X_FlocBaffles[0, 0] - T_FlocBaffle - (i - 1)*B_FlocBaffle[0];
                LargeCap_Origin[1];
                LargeCap_Origin[2]
            ], S_FlocBaffle[0], [0; 0]*deg, ND_SpacerPipe, PS_Modules))
    if N_FlocChannelBafflesShort[0] - 2 > 0
        Local ← stack(Local, PipeF([
            Floc_Origin[0] - X_FlocBaffles[0, 0] - T_FlocBaffle - B_FlocBaffle[0]*(N_FlocChannelBafflesShort[0] - 2);
            LargeCap_Origin[1];
            LargeCap_Origin[2]
        ], S_FlocBaffle[0] - CapHeight(ND_FlocModulesMain), [0; 0]*deg, ND_SpacerPipe, PS_Modules))
    Local ← stack(Local, LastLargeCap, LastFittedCap, RightPipe, GroupPiping)
    Local ← stack(Local, MirrorGroup([Floc_Origin[0]; Floc_Origin[1]] - [L_Sed/2; 0 m], [Floc_Origin[0]; Floc_Origin[1]] - [L_Sed/2; zc], "FlocModulePiping", "y")) if mod(N_FlocChannels, 2) == 1
    Local ← stack(Local, MirrorGroup([Floc_Origin[0]; Floc_Origin[1]] - [L_Sed/2; 0 m], [Floc_Origin[0]; Floc_Origin[1]] - [L_Sed/2; zc], "FlocModulePiping", "n"), MoveLast(Floc_Origin, Floc_Origin - [0 m; (W_FlocChannel + T_PlantWall); 0 m])) if N_FlocChannels > 2
    if N_FlocChannels > 3
        for i ∈ 2 .. N_FlocChannels - 2
            Local ← stack(Local, MirrorLast([Floc_Origin[0]; Floc_Origin[1]] - [L_Sed/2; 0 m], [Floc_Origin[0]; Floc_Origin[1]] - [L_Sed/2; zc], "n"), MoveLast(Floc_Origin, Floc_Origin - [0 m; (W_FlocChannel + T_PlantWall); 0 m]))
    Local
LargeCapL := CapF(LargeCapL_Origin, [0; 0]*deg, ND_FlocModulesLarge)
ArrayModPieces := ArrayLast(1, N_FlocChannelModulesLong[last(N_FlocChannelModulesLong)], B_FlocBaffle[0]*N_FlocChannelBafflesLong[0])
# Matched the pipe lengths and arrays of the last channel to those of the other channels to account for now-equivalent FlocModuleBaffle spacings.
FittedCapL := CapF(FittedCapL_Origin, [180; 0]*deg, ND_FlocModulesMain)
LongPipeL := PipeF(LongPipeL_Origin, L_FlocModuleLong[0], [0; 0]*deg, ND_FlocModulesMain, PS_Modules)
SpacerPipeL := PipeF(LongPipeL_Origin - [
    L_FlocModuleLong[0] - S_FlocBaffle[0] + (CapDiameter(ND_FlocModulesMain)/2 - outerradius(ND_FlocModulesMain));
    0;
    0
], S_FlocBaffle[0] - CapHeight(ND_FlocModulesMain), [0; 0]*deg, ND_SpacerPipe, PS_Modules)
ModuleCouplingL := CouplingF(ModuleCouplingL_Origin, [0; 0]*deg, ND_FlocModulesMain, PS_Modules)
ConnectorPipe := PipeF(ConnectorPipe_Origin, S_FlocBaffle[0] - CouplingLength(ND_FlocModulesMain) + SocketDepth(ND_FlocModulesMain) - (CapDiameter(ND_FlocModulesLarge)/2 - outerradius(ND_FlocModulesLarge)), [0; 0]*deg, ND_FlocModulesMain, PS_Modules)
ConnectorPipeL := PipeF(ConnectorPipeL_Origin, S_FlocBaffle[0] - CouplingLength(ND_FlocModulesMain) + SocketDepth(ND_FlocModulesMain) - (CapDiameter(ND_FlocModulesLarge)/2 - outerradius(ND_FlocModulesLarge)), [0; 0]*deg, ND_FlocModulesMain, PS_Modules)
ArrayConPipe :=
    ArrayLast(1, N_FlocChannelModulesLong[last(N_FlocChannelModulesLong)], B_FlocBaffle[0]*N_FlocChannelBafflesLong[0]) if N_FlocChannelBafflesShort[0] > 1
    ArrayLast(1, N_FlocChannelModulesLong[last(N_FlocChannelModulesLong)] - 1, B_FlocBaffle[0]*N_FlocChannelBafflesLong[0]) otherwise
RightPipeL := PipeF([
    Floc_Origin[0] - X_FlocBaffles[0, 0] - T_FlocBaffle - (CapDiameter(ND_FlocModulesMain)/2 - outerradius(ND_FlocModulesMain));
    LargeCapL_Origin[1];
    LargeCapL_Origin[2]
], S_FlocBaffle[0] - 2*(CapDiameter(ND_FlocModulesMain)/2 - outerradius(ND_FlocModulesMain)), [0; 0]*deg, ND_FlocModulesMain, PS_Modules)
LeftPipeL := PipeF([
    Floc_Origin[0] - L_Sed + X_FlocBaffles[0, 0] + B_FlocBaffle[0] - (CapDiameter(ND_FlocModulesLarge)/2 - outerradius(ND_FlocModulesLarge));
    LargeCapL_Origin[1];
    LargeCapL_Origin[2]
], B_FlocBaffle[0] + X_FlocBaffles[0, 0] - (CapDiameter(ND_FlocModulesLarge)/2 - outerradius(ND_FlocModulesLarge)), [0; 0]*deg, ND_FlocModulesMain, PS_Modules)
FreezeModulePiping := FreezeLayer("FlocModulePiping")
FlocTankModules :=
    Local ← stack(ArrayChannelModules, LargeCapL, ArrayModPieces, FittedCapL, ArrayModPieces, LongPipeL, ArrayModPieces, ModuleCouplingL, ArrayModPieces, SpacerPipeL, ArrayModPieces)
    for i ∈ 1 .. (N_FlocChannelBafflesLong[0] - 2)
        Local ← stack(Local, PipeF(LongPipeL_Origin - [T_FlocBaffle + (i - 1)*B_FlocBaffle[0] + SocketDepth(ND_FlocModulesMain); 0; 0], S_FlocBaffle[0], [0; 0]*deg, ND_SpacerPipe, PS_Modules), ArrayModPieces) if N_FlocChannelBafflesLong[0] - 2 > 0
    if N_FlocChannelBafflesShort[0] > 1
        Local ← stack(Local, RightPipeL, CapF([
            Floc_Origin[0] - X_FlocBaffles[N_FlocChannelBafflesShort[0] - 2, 0] - T_FlocBaffle - (CapDiameter(ND_FlocModulesLarge)/2 - outerradius(ND_FlocModulesLarge));
            LargeCapL_Origin[1];
            LargeCapL_Origin[2]
        ], [0; 0]*deg, ND_FlocModulesLarge))
    if N_FlocChannelBafflesShort[0] > 1
        Local ← stack(Local, CapF([
            Floc_Origin[0] - X_FlocBaffles[N_FlocChannelBafflesShort[0] - 2, 0] + (CapDiameter(ND_FlocModulesMain)/2 - outerradius(ND_FlocModulesMain));
            LargeCapL_Origin[1];
            LargeCapL_Origin[2]
        ], [180; 0]*deg, ND_FlocModulesMain))
    if N_FlocChannelBafflesShort[0] > 1
        Local ← stack(Local, CapF([
            (Floc_Origin[0] - X_FlocBaffles[N_FlocChannelBafflesShort[0] - 2, 0]) + (CapDiameter(ND_FlocModulesLarge)/2 - outerradius(ND_FlocModulesLarge)) + S_FlocBaffle[0] + T_FlocBaffle;
            LargeCapL_Origin[1];
            LargeCapL_Origin[2]
        ], [180; 0]*deg, ND_FlocModulesLarge))
    if N_FlocChannelBafflesShort[0] > 1
        Local ← stack(Local, CapF([
            (Floc_Origin[0] - X_FlocBaffles[N_FlocChannelBafflesShort[0] - 2, 0]) - (CapDiameter(ND_FlocModulesMain)/2 - outerradius(ND_FlocModulesMain)) + S_FlocBaffle[0];
            LargeCapL_Origin[1];
            LargeCapL_Origin[2]
        ], [0; 0]*deg, ND_FlocModulesMain))
    Local ← stack(Local, ConnectorPipeL, ArrayConPipe, LeftPipeL, ArrayModulesY, viewfront1, ArrayModulesZ, viewtop1, FreezeModulePiping)
# Removed RightPipeL (end pipe) from FlocTankModules
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Y_FlocBaffles =  # error
FlocBaffleLayerH := layer_new("FlocModuleBaffle", ltpurple)
UpperBaffleH := BoxF([Floc_Origin[0] - L_Sed; -L_Slot; Floc_Origin[2]] + [X_FlocBaffles[0, 0]; Y_FlocBaffles[0, 0]; Z_FlocBaffles[0, 0]], [Floc_Origin[0] - L_Sed; -L_Slot; Floc_Origin[2]] + [X_FlocBaffles[0, 0]; Y_FlocBaffles[0, 0]; Z_FlocBaffles[0, 0]] + [T_FlocBaffle; L_FlocBaffles[0, 0]; H_Floc], [0; 0; 0]*deg)
LowerBaffleH :=
    "null" if EN_FlocHoriz ≠ 1
    BoxF([Floc_Origin[0] - L_Sed; -L_Slot; Floc_Origin[2]] + [X_FlocBaffles[1, 0]; Y_FlocBaffles[1, 0]; Z_FlocBaffles[0, 0]], [Floc_Origin[0] - L_Sed; -L_Slot; Floc_Origin[2]] + [X_FlocBaffles[1, 0]; Y_FlocBaffles[1, 0]; Z_FlocBaffles[0, 0]] + [T_FlocBaffle; L_FlocBaffles[0, 0]; H_Floc], [0; 0; 0]*deg) otherwise
ArrayBaffleH := array_all(1, N_FlocChannelBaffles[0]/2, 2*B_FlocBaffle[0])
ArrayBafflesChannelH := array_all(N_FlocChannels, 1, -W_FlocChannel - T_PlantWall)
FreezeFlocBafflesH := FreezeLayer("FlocModuleBaffle")
FlocTankBaffleScriptH := stack(FlocBaffleLayerH, UpperBaffleH, LowerBaffleH, ArrayBaffleH, ArrayBafflesChannelH, FreezeFlocBafflesH)
# This draws the valves on the far side (left side from top view) viewing from the right side
FlocTankDrainCouplingScript :=
    Local ← layer_new("FlocDrainCouplingPlumbing", green)
    for i ∈ 0 .. last(Y_FlocDrainValves)
        Local ←
            stack(Local, CouplingSUBF([-L_Sed - SocketDepth(ND_FlocValve); Y_FlocDrainValves[i]; Floc_Origin[2]], [0; 0]*deg, ND_FlocValve, PS_Default, ["FlocTank"])) if EN_PlantDrains == 0
            otherwise
                stack(Local, CouplingSUBF([
                    Plant_Origin[0] + CouplingLength(ND_FlocValve) - SocketDepth(ND_FlocValve);
                    Y_FlocDrainValves[i];
                    Floc_Origin[2]
                ], [0; 0]*deg, ND_FlocValve, PS_Default, ["FlocTank"]))
    return stack(Local, FreezeLayer("FlocDrainCouplingPlumbing"))
FlocTankDrainPipeScript :=
    Local ← layer_new("FlocDrainPipePlumbing", blue)
    for i ∈ 0 .. last(Y_FlocDrainValves)
        Local ←
            if EN_PlantDrains == 0
                stack(Local, PipeSUBF([
                    -L_Sed - CouplingLength(ND_FlocValve) + SocketDepth(ND_FlocValve);
                    Y_FlocDrainValves[i];
                    Floc_Origin[2]
                ], T_PlantWall + SocketDepth(ND_FlocValve), [0; 0]*deg, ND_FlocValve, PS_Default, ["FlocTank"]))
            otherwise
                stack(Local, PipeSUBF([
                    Plant_Origin[0] + max(T_PlantWall, CouplingLength(ND_FlocValve)) + SocketDepth(ND_FlocValve);
                    Y_FlocDrainValves[i];
                    Floc_Origin[2]
                ], max(T_PlantWall - CouplingLength(ND_FlocValve), 0 m) + 2*SocketDepth(ND_FlocValve), [0; 0]*deg, ND_FlocValve, PS_Default, ["FlocTank"]))
    return stack(Local, FreezeLayer("FlocDrainPipePlumbing"))
FlocDrainAdapterLayer := layer_new("FlocDrainAdapterPlumbing", red)
DrawFlocDrainAdapter1 :=
    MaleAdapterF([-L_Sed - CouplingLength(ND_FlocValve) - T_PlantWall; Y_FlocDrainValves[0]; Floc_Origin[2]], [0; 0]*deg, ND_FlocValve, PS_Default) if EN_PlantDrains == 0
    MaleAdapterF(FlocAdapter1_Origin, [180; 0]*deg, ND_FlocValve, PS_Default) otherwise
DrawFlocDrainAdapter2 := MaleAdapterF(FlocAdapter2_Origin, [0; 0]*deg, ND_FlocValve, PS_Default)
FlocTankDrainAdapterScript := stack(FlocDrainAdapterLayer, DrawFlocDrainAdapter1, DrawFlocDrainAdapter2, FreezeLayer("FlocDrainAdapterPlumbing"))
FlocDrainValveLayer := layer_new("FlocDrainValvePlumbing", blue3)
InsertFlocDrainValve := insertdwg("VAL-Scaled-Gate-Valve-Threaded", FlocValve_Origin, D_FlocScale, D_FlocScale, 0 deg)
FlocTankDrainValveScript := stack(FlocDrainValveLayer, InsertFlocDrainValve, FreezeLayer("FlocDrainValvePlumbing"))
# For this script to work, you need to modify the search path in AutoCAD everytime you want to test this on a different computer.  Go to tools->options the under search directory add a new file path.  Browse to find the Final Desgins Folder (or equivalent on a different sevrer).
# Iterates through the values of drain locations and inserts a valve
FlocDrainNippleLayer := layer_new("FlocDrainNipplePlumbing", blue)
DrawFlocDrainNipple := PipeF(FlocDrainNipple_Origin, 2*SocketDepth(ND_FlocValve), [0; 0]*deg, ND_FlocValve, PS_Default)
FlocDrainElbowLayer := layer_new("FlocDrainElbowPlumbing", green)
DrawFlocDrainElbow := ElbowF(FlocDrainNipple_Origin, [-90; 0; 225]*deg, ND_FlocValve, PS_Default)
FlocTankDrainRedirect := stack(FlocDrainNippleLayer, DrawFlocDrainNipple, FreezeLayer("FlocDrainNipplePlumbing"), FlocDrainElbowLayer, DrawFlocDrainElbow, FreezeLayer("FlocDrainElbowPlumbing"))
ThawFlocDrains := ThawMultiple(["FlocDrainAdapterPlumbing"; "FlocDrainValvePlumbing"; "FlocDrainNipplePlumbing"; "FlocDrainElbowPlumbing"])
ArrayFlocDrains := array_all(ceil(N_FlocChannels/2), 1, 2*(W_FlocChannel + T_PlantWall))
FreezeDrains := FreezeMultiple(["FlocDrainAdapterPlumbing"; "FlocDrainValvePlumbing"; "FlocDrainNipplePlumbing"; "FlocDrainElbowPlumbing"])
FlocDrainArray := stack(ThawFlocDrains, ArrayFlocDrains, FreezeDrains)
FlocRMLayer := layer_new("FlocRMCouplingPlumbing", green)
DrawFlocRMCoupling := CouplingSUBF(FlocCoupling_Origin, [270; 0]*deg, ND_RMPipe, PS_Default, ["FlocTank"])
FreezeFlocRMCoupling := FreezeLayer("FlocRMCouplingPlumbing")
FlocRMCouplingScript := stack(FlocRMLayer, DrawFlocRMCoupling, FreezeFlocRMCoupling)
AC_FlocTank :=
    stack(FlocTankScript, FlocTankBaffleScriptH, FlocTankDrainCouplingScript, FlocTankDrainPipeScript, FlocTankDrainAdapterScript, FlocTankDrainValveScript, FlocTankDrainRedirect, FlocRMCouplingScript) if EN_FlocHoriz == 1 and N_FlocChannels ≤ 2
    stack(FlocTankScript, FlocTankBaffleScriptH, FlocTankDrainCouplingScript, FlocTankDrainPipeScript, FlocTankDrainAdapterScript, FlocTankDrainValveScript, FlocTankDrainRedirect, FlocDrainArray, FlocRMCouplingScript) if EN_FlocHoriz == 1 and N_FlocChannels > 2
    stack(FlocTankScript, FlocTankBaffleScriptV, FlocTankModules, FlocTankDrainCouplingScript, FlocTankDrainPipeScript, FlocTankDrainAdapterScript, FlocTankDrainValveScript, FlocTankDrainRedirect, FlocRMCouplingScript) if EN_FlocHoriz == 0 and N_FlocChannels ≤ 2
    stack(FlocTankScript, FlocTankBaffleScriptV, FlocTankModules, FlocTankDrainCouplingScript, FlocTankDrainPipeScript, FlocTankDrainAdapterScript, FlocTankDrainValveScript, FlocTankDrainRedirect, FlocDrainArray, FlocRMCouplingScript) otherwise
