Q_Plant := 2*L/s
# [reference: ExpertInputs.xmcd]
# [reference: MathFunctions.xmcd]
# [reference: PipeDatabase.xmcd]
# [reference: FluidsFunctions.xmcd]
# [reference: SedimentationTankjem384.xmcd]
# [reference: Flocculator.xmcd]
# [reference: LFOM.xmcd]
# [reference: EntranceTank.xmcd]
# [reference: StackedRapidSandFilter.xmcd]
# [reference: LinearCdc.xmcd]
# [reference: ChemStorageTanks.xmcd]
# AutoCAD drawing programs:
# Translators:
# These are the codes that take MathCAD outputs and create AutoCAD scripts that are used to draw the plant (formerly Basics)
# [reference: MtoATranslators.xmcd]
# The wrapped MtoA translator contains the functions that the user will want to access. These functions will draw pieces with full functionality - specifying the location, dimension, and orientation of the object. Also, it contains layer control and subtraction capabilities for grouped objects.
# [reference: MtoATranslatorsWrapped.xmcd]
# Drawing functions:
# [reference: ChannelF.xmcd]
# [reference: PlumbingF.xmcd]
# [reference: TankF.xmcd]
# [reference: StairsF.xmcd]
# [reference: DrainChannelF.xmcd]
# Flocculator AutoCAD
# Dimensions
L_ChannelSlot := 5 cm
TotalFloc_Dim := [L_Floc; W_Floc; H_Floc] = [0.54; 1.98968; 1.96921] m
Wall_Dim := [TotalFloc_Dim[0] + 2*T_PlantWall; T_FlocChannelWall; TotalFloc_Dim[2]] = [0.84; 0.05; 1.96921] m
WallLF_Dim := [TotalFloc_Dim[0] + 2*L_ChannelSlot; T_FlocChannelWall; TotalFloc_Dim[2]]
FlocPort_Dim :=
    for i ∈ 0 .. (N_FlocChannels - 2)
        FlocPort_Dim[0, i] ← [W_FlocPort[N_FlocChannels - 2 - i]; T_FlocChannelWall + 2*zc; (-H_FlocPort)[i]]
    return FlocPort_Dim
# Floc ports connect the channels.
ChannelOpening_Dim := [W_SedInletChannelPreWeir; T_PlantWall; Z_FlocTank + H_Floc - Z_SedChannelBottom] = [0.28415; 0.15; 0.536463] m
ChannelSlot_Dim := [L_ChannelSlot; T_FlocChannelWall; H_Floc]
# normally want a 30deg slope, unless FlocModuleBaffle is too close
# set slope to be 5 cm away from nearest Baffle
FlocDrainSlope_Dim :=
    [sqrt(3)*H_FlocSlope; -D_FlocValve; H_FlocSlope] if sqrt(3)*H_FlocSlope < W_FlocPort[0] + S_FlocPortGap - 5 cm
    [W_FlocPort[0] + S_FlocPortGap - 5 cm; -D_FlocValve; H_FlocSlope] otherwise
Port_Dim := [T_FlocBaffle + 2*zc; L_BafflePort + L_Slot; L_BafflePort]
# Pipe Spacer Size
OD_PipeSpacerEstF := [FloorNearest(.6*W_FlocChannel, Pipesizes[:, 1]); CeilNearest(.6*W_FlocChannel, Pipesizes[:, 1])] = [2.375; 2.875] in
OD_PipeSpacerEstC := CeilNearest(.6*W_FlocChannel, Pipesizes[:, 1]) = 2.875 in
Index :=
    for i ∈ 0 .. 1
        I[i] ← index(OD_PipeSpacerEstF[i], Pipesizes[:, 1])
        Avail ← CountryPipes[I[i], Country]
        if Avail == 0
            while Avail == 0
                I[i] ← I[i] + 1
                Avail ← CountryPipes[I[i], Country]
    return I
    = [8; 10]
ND_SpacerPipeArray := [Pipesizes[Index[0], 0]; Pipesizes[Index[1], 0]] = [2; 3] in
OD_PipeSpacer := [outerdiameter(ND_SpacerPipeArray[0]); outerdiameter(ND_SpacerPipeArray[1])] = [2.375; 3.5] in
A_Percentage := OD_PipeSpacer/W_FlocChannel = [0.529831; 0.780803]
ND_SpacerPipe :=
    ND_SpacerPipeArray[index(RoundNearest(.6, A_Percentage), A_Percentage)] if Q_Plant ≤ Q_PlantMaxLF
    0.75 in otherwise
    = 2 in
# Number and Spacing of Obstacles
S_OverLap := L_FlocBaffles[0, 0] - Z_FlocBaffles[1, 0] = 1.24685 m
S_ObstacleEff := 10*outerdiameter(ND_SpacerPipe)/2 = 0.301625 m
N_ObstaclesEst := (S_OverLap - S_ObstacleEff)/(S_ObstacleEff + outerdiameter(ND_SpacerPipe)) = 2.61148
N_Obstacles :=
    floor(N_ObstaclesEst) if N_ObstaclesEst ≥ 2
    N_Obstacles ← 2 otherwise
    = 2
S_Obstacle := (S_OverLap - outerdiameter(ND_SpacerPipe)*N_Obstacles)/(N_Obstacles + 1) = 0.3754 m
# Origin Points
Floc_Origin := [Plant_Origin[0]; Plant_Origin[1] + N_SedTanks*(W_Sed + T_PlantWall); Plant_Origin[2] + Z_FlocTank] = [0; 1.2168; 0] m
Wall_Origin := [Floc_Origin[0] - TotalFloc_Dim[0] - T_PlantWall; Floc_Origin[1] + W_FlocChannel; Floc_Origin[2]] = [-0.69; 1.33066; 0] m
CouplingLength(ND_RMPipe) = 0.100012 m
Slot_Origin := [
    Floc_Origin[0] - TotalFloc_Dim[0] - L_ChannelSlot;
    Floc_Origin[1] + W_FlocChannelLast;
    Floc_Origin[2]
] = [-0.59; 1.56791; 0] m
FlocCoupling_Origin :=
    if Q_Plant > Q_PlantMaxLF
        [
            Floc_Origin[0] + ConRadius(ND_RMPipe) + S_Fitting - L_Floc;
            Floc_Origin[1] + N_FlocChannels*W_FlocChannel + T_FlocChannelWall*(N_FlocChannels - 1) + SocketDepth(ND_RMPipe) - L_FlocCouplingExt;
            Floc_Origin[2] + outerradius(ND_RMPipe) + S_Fitting
        ]
    otherwise
        [
            Floc_Origin[0] + ConRadius(ND_RMPipe) + S_Fitting - L_Floc;
            (Floc_Origin[1] + (N_FlocChannels - 1)*W_FlocChannel + W_FlocChannelLast + T_FlocChannelWall*(N_FlocChannels - 1) + T_PlantWall) - 2*SocketDepth(ND_RMPipe) + CouplingLength(ND_RMPipe) - L_FlocCouplingExt;
            Floc_Origin[2] + outerradius(ND_RMPipe) + S_Fitting
        ]
FlocPort_Origin :=
    for i ∈ 0 .. (N_FlocChannels - 2)
        if mod(i, 2) == 1
            FlocPort_Origin[0, i] ← [
                Floc_Origin[0] - TotalFloc_Dim[0];
                Floc_Origin[1] + (W_FlocChannel*(1 + i)) + T_FlocChannelWall*i - zc;
                Floc_Origin[2] + H_FlocPort[i]
            ]
        otherwise
            FlocPort_Origin[0, i] ← [
                Floc_Origin[0] - W_FlocPort[N_FlocChannels - 2 - i];
                Floc_Origin[1] + (W_FlocChannel*(1 + i)) + T_FlocChannelWall*i - zc;
                Floc_Origin[2] + H_FlocPort[i]
            ]
    return FlocPort_Origin
# The flocport origins were set to start at the top height of the ports themselves (added to the origin otherwise it disappears).  This changes the flocports to be at the bottom of the channel dividing walls instead of at the top (more structurally sound).
# The Channel Opening was changed in the z-direction so that the bottom opening aligned with the bottom of the tank (for the same reason as the flocports).
ChannelOpening_Origin := [Floc_Origin[0] - L_Sed; Floc_Origin[1] - T_PlantWall; Z_SedChannelBottom] = [-2.17497; 1.0668; 1.43275] m
X_FlocBaffles[0, 0] = 0.135 m
SpacerCap_Origin := [
    -CapThickness(ND_SpacerPipe) + Floc_Origin[0];
    Floc_Origin[1] + (W_FlocChannel*(N_FlocChannels - 1) + T_FlocChannelWall*(N_FlocChannels - 1)) - W_FlocChannel/2 + W_FlocChannelLast;
    Floc_Origin[2] + L_FlocBaffleLower - S_Obstacle - ((innerdiameter(ND_SpacerPipe, PS_Modules) - CapDiameter(ND_FlocModulesMain))/2)
] = [-0.00396875; 3.14955; 1.06149] m
FittedCap_Origin := [
    -CapThickness(ND_SpacerPipe) + Floc_Origin[0] - CapThickness(0.5 in);
    Floc_Origin[1] + (W_FlocChannel*(N_FlocChannels - 1) + T_FlocChannelWall*(N_FlocChannels - 1)) - W_FlocChannel/2 + W_FlocChannelLast;
    Floc_Origin[2] + L_FlocBaffleLower - S_Obstacle
] = [-0.00719138; 3.14955; 1.07395] m
SpacerCapLast_Origin := SpacerCap_Origin + [
    0 m;
    -(W_FlocChannel*(N_FlocChannels - 2) + T_FlocChannelWall*(N_FlocChannels - 1) + (W_FlocChannel + W_FlocChannelLast)/2);
    0 m
] = [-0.00396875; 1.39235; 1.06149] m
FittedCapLast_Origin := FittedCap_Origin + [
    0 m;
    -(W_FlocChannel*(N_FlocChannels - 2) + T_FlocChannelWall*(N_FlocChannels - 1) + (W_FlocChannel + W_FlocChannelLast)/2);
    0 m
] = [-0.00719138; 1.39235; 1.07395] m
LongPipe_Origin := FittedCap_Origin + [L_FlocModuleLong[0]; 0 m; 0 m]
# Matched L.Origin's to the rest of the Origins to account for now-equivalent FlocModuleBaffle spacings.
FlocAdapter1_Origin := [
    Plant_Origin[0] - L_Floc + FlocDrainSlope_Dim[0] + S_Fitting + FlocDrainSlope_Dim[1]/2;
    Floc_Origin[1] - CouplingLength(ND_FlocValve) - SocketDepth(ND_FlocValve);
    Floc_Origin[2]
]
FlocValve_Origin := FlocAdapter1_Origin + [0 m; -MaleAdapterLength(ND_FlocValve) + ValveSocket(ND_FlocValve) + SocketDepth(ND_FlocValve); 0 m] = [-0.46792; 1.06302; 0] m
FlocAdapter2_Origin := FlocValve_Origin + [
    -ValveLength(ND_FlocValve) + ValveSocket(ND_FlocValve) - MaleAdapterLength(ND_FlocValve) + SocketDepth(ND_FlocValve);
    0 m;
    0 m
]
FlocDrainNipple_Origin := FlocAdapter2_Origin
Z_FlocBaffles = [
    0, 0, 0, 0, 0, 0, 0, 0, 0, 0, 0;
    0.2025, 0.2025, 0.2025, 0.2025, 0.2025, 0.2025, 0.2025, 0.2025, 0.2025, 0.2025, 0.2025;
    0, 0, 0, 0, 0, 0, 0, 0, 0, 0, 0
] m
BaffleSlot1_Origin := [Floc_Origin[0] - L_Floc; -L_Slot; Floc_Origin[2]] + [X_FlocBaffles[0, 0]; Y_FlocBaffles[0, 0]; Z_FlocBaffles[0, 0]] = [-0.405; 3.20648; 0] m
BaffleSlot1Last_Origin := [Floc_Origin[0] - L_Floc; -L_Slot; Floc_Origin[2]] + [
    X_FlocBaffles[0, N_FlocChannels - 1];
    Y_FlocBaffles[0, N_FlocChannels - 1];
    Z_FlocBaffles[0, N_FlocChannels - 1]
] = [-0.411; 1.56791; 0] m
X_FlocBaffles[2, 0] = 0.409 m
BaffleSlot2_Origin := [Floc_Origin[0] - L_Floc; -L_Slot; Floc_Origin[2]] + [X_FlocBaffles[1, 0]; Y_FlocBaffles[0, 0]; Z_FlocBaffles[1, 0]] = [-0.268; 3.20648; 0.2025] m
BaffleSlot2Last_Origin := [Floc_Origin[0] - L_Floc; -L_Slot; Floc_Origin[2]] + [
    X_FlocBaffles[1, N_FlocChannels - 1];
    Y_FlocBaffles[0, N_FlocChannels - 1];
    Z_FlocBaffles[1, N_FlocChannels - 1]
]
BafflePort1V_Origin := [Floc_Origin[0] - L_Floc - zc; -W_FlocChannel; Floc_Origin[2]] + [X_FlocBaffles[0, 0]; Y_FlocBaffles[0, 0]; Z_FlocBaffles[0, 0]] = [-0.415; 3.09262; 0] m
BafflePort1VLast_Origin := [Floc_Origin[0] - zc - L_Floc; -L_BafflePort; Floc_Origin[2]] + [
    X_FlocBaffles[N_FlocChannelBaffles[N_FlocChannels - 1] - 1, N_FlocChannels - 1];
    Y_FlocBaffles[0, N_FlocChannels - 1];
    Z_FlocBaffles[2, N_FlocChannels - 1]
] = [-0.147; 1.51444; 0] m
BafflePort2V_Origin := [Floc_Origin[0] - L_Floc - zc; -L_BafflePort; Floc_Origin[2]] + [X_FlocBaffles[2, 0]; Y_FlocBaffles[0, 0]; Z_FlocBaffles[2, 0]] = [-0.141; 3.15301; 0] m
BafflePort2VLast_Origin := [Floc_Origin[0] - zc - L_Floc; -W_FlocChannelLast; Floc_Origin[2]] + [
    X_FlocBaffles[N_FlocChannelBaffles[N_FlocChannels - 1] - 3, N_FlocChannels - 1];
    Y_FlocBaffles[0, N_FlocChannels - 1];
    Z_FlocBaffles[2, N_FlocChannels - 1]
] = [-0.421; 1.2168; 0] m
# Flocculator Concrete
FlocTankLayer := layer_new("FlocTankCon", grey)
DrawFlocTank := Tank(Floc_Origin, TotalFloc_Dim, T_PlantWall)
DrawSlotWallThickness := BoxF(Floc_Origin + [T_PlantWall; -T_PlantWall; -T_PlantWall], Floc_Origin + [T_PlantWall; -T_PlantWall; -T_PlantWall] + [L_ChannelSlot; W_Floc + 2*T_PlantWall; H_Floc + T_PlantWall], [0; 0; 0]*deg)
MirrorSlotWallThickness := Mirror3dAll("yz", [-L_Floc/2; Floc_Origin[2]], "n")
DrawWallSubtraction := BoxF(Floc_Origin + [T_PlantWall + L_ChannelSlot; -T_PlantWall; -T_PlantWall], Floc_Origin + [L_ChannelSlot; W_Floc + T_PlantWall; H_Floc], [0; 0; 0]*deg)
# Wall between sedimentation tank and flocculator is shared
FreezeFlocTank := FreezeLayer("FlocTankCon")
Slot_Origin + ChannelSlot_Dim = [-0.54; 1.61791; 1.96921] m
DrawChannelSlot := BoxF(Slot_Origin, Slot_Origin + ChannelSlot_Dim, [0; 0; 0]*deg)
ArrayChannelSlot := ArrayLast(N_FlocChannels - 1, 1, W_FlocChannel + T_FlocChannelWall)
MirrorChannelSlot := Mirror3dAll("yz", [-L_Floc/2; FittedCap_Origin[2]], "n")
ChannelWallLayer := layer_new("FlocChannelCon", dkgrey)
DrawFlocWall := BoxF(Slot_Origin, Slot_Origin + WallLF_Dim, [0; 0; 0]*deg)
ArrayFlocWall := ArrayLast(N_FlocChannels - 1, 1, W_FlocChannel + T_FlocChannelWall)
FlocChannelPorts :=
    for i ∈ 0 .. (N_FlocChannels - 2)
        Local ← stack(Local, BoxF(FlocPort_Origin[0, i], FlocPort_Origin[0, i] + FlocPort_Dim[0, i], [0; 0; 0]*deg))
Y_FlocDrainValves[0] = 1.27373 m
FlocDrainSlope_Dim = [0.052243; -0.060325; 0.0301625] m
ChannelOpening := BoxF(ChannelOpening_Origin, ChannelOpening_Origin + ChannelOpening_Dim, [0; 0; 0]*deg)
Plant_Origin[0] - L_Floc + FlocDrainSlope_Dim[1] = -0.600325 m
Wedge1 := WedgeF([
    Plant_Origin[0] - L_Floc + FlocDrainSlope_Dim[0] + S_Fitting;
    Y_FlocDrainValves[0] + 0.5*D_FlocValve + FlocDrainSlope_Dim[1] - (W_FlocChannel + FlocDrainSlope_Dim[1])/2;
    Floc_Origin[2] - 0.5*D_FlocValve + FlocDrainSlope_Dim[2]
], [
    Plant_Origin[0] - L_Floc + (2*FlocDrainSlope_Dim)[0] + S_Fitting;
    Y_FlocDrainValves[0] + 0.5*D_FlocValve - (W_FlocChannel + FlocDrainSlope_Dim[1])/2;
    Floc_Origin[2] - 0.5*D_FlocValve
], [90; 0; 0]*deg)
FlocDrainSlope_Dim[1] = -0.060325 m
ArrayWedge := ArrayLast(last(Y_FlocDrainValves) + 1, 1, 2*W_FlocChannel + 2*T_FlocChannelWall)
GroupFlocSubtractionPieces := GroupAll("DeleteMe")
SubtractFlocTankPieces := SubtractF(["FlocTankCon"], "DeleteMe")
FlocTankScript := stack(FlocTankLayer, DrawFlocTank, DrawSlotWallThickness, MirrorSlotWallThickness, Union_All, FreezeFlocTank, DrawChannelSlot, ArrayChannelSlot, MirrorChannelSlot, FlocChannelPorts, ChannelOpening, Wedge1, DrawWallSubtraction, GroupFlocSubtractionPieces, SubtractFlocTankPieces, ChannelWallLayer, DrawFlocWall, ArrayFlocWall, FreezeLayer("FlocChannelCon"))
# [component: inputs FlocTankScript]
# Vertical Baffles
FlocBaffleLayerV := layer_new("FlocModBaffles", ltpurple)
DrawLowerBaffleV := BoxF([Floc_Origin[0] - L_Floc; L_Slot; Floc_Origin[2]] + [X_FlocBaffles[0, 0]; Y_FlocBaffles[0, 0]; Z_FlocBaffles[0, 0]], ([Floc_Origin[0] - L_Floc; L_Slot; Floc_Origin[2]] + [X_FlocBaffles[0, 0]; Y_FlocBaffles[0, 0]; Z_FlocBaffles[0, 0]]) + [T_FlocBaffle; -(W_FlocChannel + 2*L_Slot); L_FlocBaffles[0, 0]], [0; 0; 0]*deg)
ArrayLowerBaffleV := ArrayLast(1, ceil(N_FlocChannelBaffles[0]/2), 2*B_FlocBaffle[0])
# Aligned FlocModuleBaffle spacing of last floc channel to the FlocModuleBaffle spacings of the other channels.
DrawUpperBaffleV := BoxF([Floc_Origin[0] - L_Floc; L_Slot; Floc_Origin[2]] + [X_FlocBaffles[1, 0]; Y_FlocBaffles[0, 0]; Z_FlocBaffles[1, 0]], ([Floc_Origin[0] - L_Floc; L_Slot; Floc_Origin[2]] + [X_FlocBaffles[1, 0]; Y_FlocBaffles[0, 0]; Z_FlocBaffles[1, 0]]) + [T_FlocBaffle; -(W_FlocChannel + 2*L_Slot); L_FlocBaffles[1, 0]], [0; 0; 0]*deg)
ArrayUpperBaffleV := ArrayLast(1, floor(N_FlocChannelBaffles[0]/2), 2*B_FlocBaffle[0])
ArrayBafflesChannelV := array_all(N_FlocChannels - 1, 1, -(W_FlocChannel + T_FlocChannelWall))
DrawLastLowerBaffleV := BoxF([Floc_Origin[0] - L_Floc; -L_Slot; Floc_Origin[2]] + [
    X_FlocBaffles[N_FlocChannelBaffles[N_FlocChannels - 1] - 1, N_FlocChannels - 1];
    Y_FlocBaffles[0, N_FlocChannels - 1];
    Z_FlocBaffles[0, N_FlocChannels - 1]
], ([Floc_Origin[0] - L_Floc; -L_Slot; Floc_Origin[2]] + [
    X_FlocBaffles[N_FlocChannelBaffles[N_FlocChannels - 1] - 1, N_FlocChannels - 1];
    Y_FlocBaffles[0, N_FlocChannels - 1];
    Z_FlocBaffles[0, N_FlocChannels - 1]
]) + [-T_FlocBaffle; -(W_FlocChannelLast + 2*L_Slot); L_FlocBaffles[1, N_FlocChannels - 1]], [0; 0; 0]*deg)
N_FlocChannelBaffles[last(N_FlocChannelBaffles)] = 3
ArrayLastLowerBaffleV := ArrayLast(1, ceil(N_FlocChannelBaffles[last(N_FlocChannelBaffles)]/2), -(2*B_FlocBaffle[0]))
DrawLastUpperBaffleV := BoxF([Floc_Origin[0] - L_Floc; -L_Slot; Floc_Origin[2]] + [
    X_FlocBaffles[N_FlocChannelBaffles[N_FlocChannels - 1] - 2, N_FlocChannels - 1];
    Y_FlocBaffles[0, N_FlocChannels - 1];
    Z_FlocBaffles[1, N_FlocChannels - 1]
], ([Floc_Origin[0] - L_Floc; -L_Slot; Floc_Origin[2]] + [
    X_FlocBaffles[N_FlocChannelBaffles[N_FlocChannels - 1] - 2, N_FlocChannels - 1];
    Y_FlocBaffles[0, N_FlocChannels - 1];
    Z_FlocBaffles[1, N_FlocChannels - 1]
]) + [-T_FlocBaffle; -(W_FlocChannelLast + 2*L_Slot); L_FlocBaffles[0, N_FlocChannels - 1]], [0; 0; 0]*deg)
ArrayLastUpperBaffleV := ArrayLast(1, floor(N_FlocChannelBaffles[last(N_FlocChannelBaffles)]/2), -(2*B_FlocBaffle[0]))
FreezeBafflesV := FreezeLayer("FlocModBaffles")
DrawBafflePort1V := BoxF(BafflePort1V_Origin, BafflePort1V_Origin + Port_Dim, [0; 0; 0]*deg)
DrawBafflePort1VLast := BoxF(BafflePort1VLast_Origin, BafflePort1VLast_Origin + Port_Dim, [0; 0; 0]*deg)
DrawBafflePort2V := BoxF(BafflePort2V_Origin, BafflePort2V_Origin + Port_Dim, [0; 0; 0]*deg)
DrawBafflePort2VLast := BoxF(BafflePort2VLast_Origin, BafflePort2VLast_Origin + Port_Dim, [0; 0; 0]*deg)
ArrayBafflePort1Horiz := ArrayLast(1, ceil(N_FlocChannelBaffles[0]/4), 4*B_FlocBaffle[0])
ArrayBafflePort2Horiz := ArrayLast(1, ceil((N_FlocChannelBaffles[0] - 2)/4), 4*B_FlocBaffle[0])
ArrayBafflePortVert := array_all(N_FlocChannels - 1, 1, -W_FlocChannel - T_FlocChannelWall)
ArrayPort1VLast := ArrayMultiple([BafflePort1VLast_Origin], 1, ceil(N_FlocChannelBaffles[N_FlocChannels - 1]/4), -W_FlocChannel - T_FlocChannelWall, -(4*B_FlocBaffle[N_FlocChannels - 1]))
ArrayPort2VLast := ArrayMultiple([BafflePort2VLast_Origin], 1, ceil((N_FlocChannelBaffles[N_FlocChannels - 1] - 2)/4), -W_FlocChannel - T_FlocChannelWall, -(4*B_FlocBaffle[N_FlocChannels - 1]))
FlocCouplingBaffleCut := CylinderF(FlocCoupling_Origin, ConRadius(ND_RMPipe), SocketDepth(ND_RMPipe), [90; 0]*deg)
GroupBafflesV := GroupAll("DeleteMe")
SubtractBafflePortsV := SubtractF(["FlocModBaffles"], "DeleteMe")
MirrorBafflesV := MirrorAll([Floc_Origin[0]; Floc_Origin[1]] - [W_Floc/2; 0 m], [Floc_Origin[0]; Floc_Origin[1]] - [W_Floc/2; zc], "y")
FlocTankBaffleScriptV := stack(FlocBaffleLayerV, DrawLowerBaffleV, ArrayLowerBaffleV, DrawUpperBaffleV, ArrayUpperBaffleV, ArrayBafflesChannelV, DrawLastLowerBaffleV, ArrayLastLowerBaffleV, DrawLastUpperBaffleV, ArrayLastUpperBaffleV, FreezeBafflesV, DrawBafflePort1V, ArrayBafflePort1Horiz, DrawBafflePort2V, ArrayBafflePort2Horiz, ArrayBafflePortVert, DrawBafflePort1VLast, DrawBafflePort2VLast, ArrayPort1VLast, ArrayPort2VLast, GroupBafflesV, SubtractBafflePortsV)
# Module Piping for Low Flow
# FlocModCapLayer
FlocModCapLayer := layer_new("FlocModCapPlu", red)
FlocModCap :=
    for i ∈ 0 .. N_Obstacles - 1
        large ← CapF(SpacerCap_Origin + [0; 0; -i*(S_Obstacle + outerdiameter(ND_SpacerPipe))], [0; 0]*deg, ND_SpacerPipe)
        fitted ← CapF(FittedCap_Origin + [0; 0; -i*(S_Obstacle + outerdiameter(ND_SpacerPipe))], [0; 0]*deg, ND_FlocModulesMain)
        Script ← stack(Script, large, fitted)
    return Script
ArrayModCap := array_all(N_FlocChannels - 1, 1, -(W_FlocChannel + T_FlocChannelWall))
FlocModCapLast :=
    for i ∈ 0 .. N_Obstacles - 1
        largelast ← CapF(SpacerCapLast_Origin + [0; 0; -i*(S_Obstacle + outerdiameter(ND_SpacerPipe))], [0; 0]*deg, ND_SpacerPipe)
        fittedlast ← CapF(FittedCapLast_Origin + [0; 0; -i*(S_Obstacle + outerdiameter(ND_SpacerPipe))], [0; 0]*deg, ND_FlocModulesMain)
        Script ← stack(Script, largelast, fittedlast)
    return Script
MirrorFlocModCap := Mirror3dAll("yz", [-L_Floc/2; FittedCap_Origin[2]], "n")
ArrayModCap
FlocMod1CapFrz := FreezeLayer("FlocModCapPlu")
FlocModCapsScript := stack(FlocModCapLayer, FlocModCap, ArrayModCap, FlocModCapLast, MirrorFlocModCap, FlocMod1CapFrz)
# FlocModPipeLayer
FlocModPipeLayer := layer_new("FlocModPipePlu", blue)
FlocModLongPipe :=
    for i ∈ 0 .. N_Obstacles - 1
        x ← PipeF(FittedCap_Origin + [0; 0; -i*(S_Obstacle + outerdiameter(ND_SpacerPipe))], L_Floc - 2*(CapThickness(ND_FlocModulesMain) + CapThickness(ND_SpacerPipe)), [0; 0]*deg, ND_FlocModulesMain, PS_Modules)
        array ← ArrayLast(N_FlocChannels - 1, 1, -(W_FlocChannel + T_FlocChannelWall))
        Script ← stack(Script, x, array)
    return Script
FlocModLongPipeLast :=
    for i ∈ 0 .. N_Obstacles - 1
        x ← PipeF(FittedCapLast_Origin + [0; 0; -i*(S_Obstacle + outerdiameter(ND_SpacerPipe))], L_Floc - 2*(CapThickness(ND_FlocModulesMain) + CapThickness(ND_SpacerPipe)), [0; 0]*deg, ND_FlocModulesMain, PS_Modules)
        Script ← stack(Script, x)
    return Script
FlocModPipeFrz := FreezeLayer("FlocModPipePlu")
FlocModPipeScript := stack(FlocModPipeLayer, FlocModLongPipe, FlocModLongPipeLast, FlocModPipeFrz)
# FlocModSpacerLayer
FlocModSpacerLayer := layer_new("FlocModSpacerPlu", blue)
FlocModSpacer :=
    for i ∈ 0 .. N_Obstacles - 1
        first ← PipeF(SpacerCap_Origin - [
            L_Floc - CapThickness(ND_SpacerPipe) - S_FlocBaffle[0];
            0;
            i*(S_Obstacle + outerdiameter(ND_SpacerPipe))
        ], S_FlocBaffle[0] - CapThickness(ND_SpacerPipe), [0; 0]*deg, ND_SpacerPipe, PS_Modules)
        last ← PipeF(SpacerCap_Origin - [0; 0; i*(S_Obstacle + outerdiameter(ND_SpacerPipe))], L_Floc - (L_Floc/S_FlocBaffle[0] - 1)*B_FlocBaffle[0] - CapThickness(ND_SpacerPipe), [0; 0]*deg, ND_SpacerPipe, PS_Modules)
        mid ← PipeF(SpacerCap_Origin - [
            L_Floc - (L_Floc/S_FlocBaffle[0] - 1)*B_FlocBaffle[0] - CapThickness(ND_SpacerPipe) + T_FlocBaffle;
            0;
            i*(S_Obstacle + outerdiameter(ND_SpacerPipe))
        ], S_FlocBaffle[0], [0; 0]*deg, ND_SpacerPipe, PS_Modules)
        midarray ← ArrayLast(1, L_Floc/S_FlocBaffle[0] - 2, (-B_FlocBaffle)[0])
        Script ← stack(Script, first, last, mid, midarray)
    return Script
ArrayModSpacer := array_all(N_FlocChannels - 1, 1, -(W_FlocChannel + T_FlocChannelWall))
FlocModSpacerLast :=
    for i ∈ 0 .. N_Obstacles - 1
        first ← PipeF(SpacerCapLast_Origin - [0; 0; i*(S_Obstacle + outerdiameter(ND_SpacerPipe))], B_FlocBaffle[0] - CapThickness(ND_SpacerPipe), [0; 0]*deg, ND_SpacerPipe, PS_Modules)
        mid ← PipeF(SpacerCapLast_Origin - [
            B_FlocBaffle[0] - CapThickness(ND_SpacerPipe) + T_FlocBaffle;
            0;
            i*(S_Obstacle + outerdiameter(ND_SpacerPipe))
        ], S_FlocBaffle[0], [0; 0]*deg, ND_SpacerPipe, PS_Modules)
        arraymid ← ArrayLast(1, L_Floc/S_FlocBaffle[0] - 3, (-B_FlocBaffle)[0])
        last ← PipeF(SpacerCapLast_Origin - [
            2*B_FlocBaffle[0] - CapThickness(ND_SpacerPipe) + T_FlocBaffle;
            0;
            i*(S_Obstacle + outerdiameter(ND_SpacerPipe))
        ], (2*S_FlocBaffle)[0] - 2*CapThickness(ND_SpacerPipe), [0; 0]*deg, ND_SpacerPipe, PS_Modules)
        Script ← stack(Script, first, mid, arraymid, last)
    return Script
FlocModSpacerFrz := FreezeLayer("FlocModSpacerPlu")
FlocModSpacerScript := stack(FlocModSpacerLayer, FlocModSpacer, ArrayModSpacer, FlocModSpacerLast, FlocModSpacerFrz)
FlocModules := stack(FlocModCapsScript, FlocModPipeScript, FlocModSpacerScript)
# Channel Drains
FlocTankDrainCouplingScript :=
    Local ← layer_new("FlocDrainCouplingPlu", green)
    Local ← stack(Local, CouplingSUBF([
        (Plant_Origin[0] - L_Floc + FlocDrainSlope_Dim[0] + S_Fitting) + FlocDrainSlope_Dim[1]/2;
        Floc_Origin[1] - SocketDepth(ND_FlocValve);
        Floc_Origin[2]
    ], [90; 0]*deg, ND_FlocValve, PS_Default, ["FlocTankCon"]))
    return stack(Local, FreezeLayer("FlocDrainCouplingPlu"))
FlocTankDrainPipeScript :=
    Local ← layer_new("FlocDrainPipePlu", blue)
    Local ← stack(Local, PipeSUBF([
        Plant_Origin[0] - L_Floc + FlocDrainSlope_Dim[0] + S_Fitting + FlocDrainSlope_Dim[1]/2;
        Floc_Origin[1] - SocketDepth(ND_FlocValve);
        Floc_Origin[2]
    ], max(T_PlantWall - CouplingLength(ND_FlocValve), 0 m) + 2*SocketDepth(ND_FlocValve), [90; 0]*deg, ND_FlocValve, PS_Default, ["FlocTankCon"]))
    return stack(Local, FreezeLayer("FlocDrainPipePlu"))
FlocDrainAdapterLayer := layer_new("FlocDrainAdapterPlu", blue3)
DrawFlocDrainAdapter1 := MaleAdapterF(FlocAdapter1_Origin, [90; 0]*deg, ND_FlocValve, PS_Default)
FlocTankDrainAdapterScript := stack(FlocDrainAdapterLayer, DrawFlocDrainAdapter1, FreezeLayer("FlocDrainAdapterPlu"))
FlocDrainValveLayer := layer_new("FlocDrainValvePlu", blue3)
InsertFlocDrainValve := insertdwg("https://confluence.cornell.edu/download/attachments/173604905/Floc-Scaled-Gate-Valve-Threaded.dwg", FlocValve_Origin, D_FlocScale, D_FlocScale, 90 deg)
FlocTankDrainValveScript := stack(FlocDrainValveLayer, InsertFlocDrainValve, FreezeLayer("FlocDrainValvePlu"))
# For this script to work, you need to modify the search path in AutoCAD everytime you want to test this on a different computer.  Go to tools->options the under search directory add a new file path.  Browse to find the Final Desgins Folder (or equivalent on a different sevrer).
# Iterates through the values of drain locations and inserts a valve
# Rapid Mix Components
FlocRMLayer := layer_new("FlocRMCouplingPlu", green)
DrawFlocRMCoupling := CouplingSUBF(FlocCoupling_Origin, [270; 0]*deg, ND_RMPipe, PS_Default, ["FlocTankCon"])  # FlocModPipeFrz
FreezeFlocRMCoupling := FreezeLayer("FlocRMCouplingPlu")
# Orifice Plate
LayerRMOrificePlate := layer_new("FlocRmOrificePlate", red)
RMOrificePlate := CylinderF(FlocCoupling_Origin, outerradius(ND_RMPipe), T_RMOrificePlate, [90; 0; 0]*deg)
FreezeRMOrificePlate := FreezeLayer("FlocRmOrificePlate")
RMOrifice := CylinderF(FlocCoupling_Origin, D_RMOrifice/2, T_RMOrificePlate, [90; 0; 0]*deg)
SubtractRMOrifice := SubtractF(["FlocRmOrificePlate"], "DeleteMe")
RMOrificePlateScript := stack(LayerRMOrificePlate, RMOrificePlate, FreezeRMOrificePlate, RMOrifice, GroupDelete, SubtractRMOrifice)
FlocRMPlateHolderLayer := layer_new("FlocRmPlateHolder", red)
T_PlantWall - SocketDepth(ND_RMPipe) = 0.104 m
RMOrificePlateHolderStub := PipeF(FlocCoupling_Origin - [0; T_RMOrificePlate; 0], T_PlantWall - SocketDepth(ND_RMPipe), [90; 0; 0]*deg, ND_RMPipe, PS_Default)
FlocRmPlateHolderFrz := FreezeLayer("FlocRmPlateHolder")
# Orifice Plate Rod
D_RMOrificePlateRod := 3/8*in
OrificePlateRodLayer := layer_new("FlocOrificePlateRod", black)
OrificePlateRod := CylinderF(FlocCoupling_Origin - [0; T_RMOrificePlate + SocketDepth(ND_RMPipe) - L_FlocCouplingExt/2; -ConRadius(ND_RMPipe) - zc], D_RMOrificePlateRod, OuterDiameterFittingPVC(ND_RMPipe) + 2*zc, [0; 270; 0]*deg)
FreezeOrificePlateRod := FreezeLayer("FlocOrificePlateRod")
SubtractOrificePlateRodCoupling := SubtractF(["FlocRMCouplingPlu"], "DeleteMe")
SubtractOrificePlateRodPipe := SubtractF(["FlocRmPlateHolder"], "DeleteMe")
OrificePlateRodScript := stack(OrificePlateRod, GroupDelete, SubtractOrificePlateRodCoupling, OrificePlateRod, GroupDelete, SubtractOrificePlateRodPipe, OrificePlateRodLayer, OrificePlateRod, FreezeOrificePlateRod)
FlocRMScript := stack(FlocRMLayer, DrawFlocRMCoupling, FreezeFlocRMCoupling, RMOrificePlateScript, FlocRMPlateHolderLayer, RMOrificePlateHolderStub, FlocRmPlateHolderFrz, OrificePlateRodScript)
ThawAll := ThawMultiple(["Floc*"])
MoveFloc := MoveAll(Floc_Origin, Floc_Origin + [
    -W_SedBay - 2*T_PlantWall;
    -(L_Sed - W_Floc) + CouplingLength(ND_RMPipe) - T_PlantWall - T_FlocChannelWall;
    0 m
]) = "_move all  0,1.2168,0 -1.3668,0.93152,0"
FreezeAll := FreezeMultiple(["Floc*"])
AC_FlocTank := stack(FlocTankScript, FlocTankBaffleScriptV, FlocModules, FlocTankDrainCouplingScript, FlocTankDrainPipeScript, FlocTankDrainAdapterScript, FlocTankDrainValveScript, FlocRMScript, ThawAll, MoveFloc, FreezeAll)
