Q_Plant := 0.8*L/s
# [reference: ExpertInputs.xmcd]
# [reference: MathFunctions.xmcd]
# [reference: PipeDatabase.xmcd]
# [reference: MaterialsDatabase.xmcd]
# [reference: FluidsFunctions.xmcd]
# [reference: CdcFunctions.xmcd]
# [reference: SedimentationTankjem384.xmcd]
# [reference: Flocculator.xmcd]
# [reference: LFOM.xmcd]
# [reference: EntranceTank.xmcd]
# [reference: LFStackedRapidSandFilter.xmcd]
# [reference: LinearCdc.xmcd]
# [reference: ChemStorageTanks.xmcd]
# AutoCAD drawing programs:
# Translators:
# These are the codes that take MathCAD outputs and create AutoCAD scripts that are used to draw the plant (formerly Basics)
# [reference: MtoATranslators.xmcd]
# The wrapped MtoA translator contains the functions that the user will want to access. These functions will draw pieces with full functionality - specifying the location, dimension, and orientation of the object. Also, it contains layer control and subtraction capabilities for grouped objects.
# [reference: MtoATranslatorsWrapped.xmcd]
# Drawing functions:
# [reference: ChannelF.xmcd]
# [reference: PlumbingF.xmcd]
# [reference: TankF.xmcd]
# [reference: StairsF.xmcd]
# [reference: DrainChannelF.xmcd]
# AutoCAD Script Files:
# [reference: FlocculatorACLow.xmcd]
# [reference: SedimentationTankACLow_jem384.xmcd]
# [reference: EntranceTankACLow.xmcd]
# [reference: ChemStockTanksAC.xmcd]
# Low Flow Stacked Rapid Sand Filter
# Dimesions and Origins
# Dimensions
L_FiBodyPipe := 6 ft
ND_FiPipe := 12 in
S_FiInletMan := 40 cm
ND_FiManTrunk := 1 in
ND_FiManBranch := .5 in
ND_FiManPipe := 2 in
ND_BallValve := 2 in
ND_FiBW := 3/2*in
ND_BedTester := 1/2*in
ND_BedTesterOuter := 1 in
PS_Fi := 2
H_FiManCap := CapHeight(ND_FiManTrunk)/2
T_FiLayer := 20 cm
H_FiSand := T_FiLayer*N_FiLayer
L_FiManCouplingOffset := 0.5*innerdiameter(ND_FiPipe, PS_Fi) - ConRadius(ND_FiManTrunk)/tan(asin(2*ConRadius(ND_FiManTrunk)/innerdiameter(ND_FiPipe, PS_Fi))) = 0.00130423 m
L_FiManCapOffset := 0.5*innerdiameter(ND_FiPipe, PS_Fi) - ConRadius(ND_FiManBranch)/tan(asin(2*ConRadius(ND_FiManBranch)/innerdiameter(ND_FiPipe, PS_Fi)))
S_FiManBranchEnds := L_FiManCouplingOffset + CouplingLength(ND_FiManTrunk) + outerdiameter(ND_FiManBranch)/2 = 0.0715048 m
L_FiManTrunk := innerdiameter(ND_FiPipe, PS_Fi) - CouplingLength(ND_FiManTrunk) - CapThickness(ND_FiManTrunk) - (2*L_FiManCouplingOffset)
N_FiManBranch := 3  # number of branches on either side
# distance from inner end of filter body to center of nearest branch
S_FiManBranch := (innerdiameter(ND_FiPipe, PS_Fi) - 2*S_FiManBranchEnds)/(N_FiManBranch - 1) = 0.0801078 m
# cut coupling down
CapThickness(ND_FiManBranch)
L_FiManBranch :=
    for i ∈ 0 .. N_FiManBranch - 1
        L[i] ←
            0.5*innerdiameter(ND_FiPipe, PS_Fi)*sin(acos((0.5*innerdiameter(ND_FiPipe, PS_Fi) - S_FiManBranchEnds + ConRadius(ND_FiManBranch) - S_FiManBranch*i)/(0.5*innerdiameter(ND_FiPipe, PS_Fi)))) - (0.5*innerdiameter(ND_FiManTrunk, PS_FiBranch) + CapThickness(ND_FiManBranch)) if i < N_FiManBranch/2
            (0.5*innerdiameter(ND_FiPipe, PS_Fi) - innerdiameter(ND_FiManTrunk, PS_FiBranch) - L_FiManCapOffset - CapThickness(ND_FiManBranch)) if i + 0.5 == N_FiManBranch/2
            L[N_FiManBranch - 1 - i] otherwise
    L
L_FiInBushingtoBodyPipe := 2*SocketDepth(ND_FiManTrunk) + (outerradius(ND_FiManPipe) - innerdiameter(ND_FiManPipe, PS_FiBranch)/2)
L_FiInBushingtoElbowPipe := 2*SocketDepth(ND_FiManPipe)
L_ElbowtoValvePipe := 2*SocketDepth(ND_FiManPipe)
L_ElbowtoValvePipeOut := 2*SocketDepth(ND_FiManTrunk)
L_FiCheckValve := .1651 m
L_BottomPipe := L_FiCheckValve + 2*SocketDepth(ND_FiManPipe) + (ElbowRadius(ND_FiManPipe) - ShortTeeLength(ND_FiManPipe))
L_ValvetoTeePipe := L_ElbowtoValvePipe + (ElbowRadius(ND_FiManPipe) - ShortTeeLength(ND_FiManPipe))
L_TeetoTeeVertPipe := 2*T_FiLayer - TeeLength(ND_FiManPipe)
L_ElbowtoTeeVertPipe := 2*T_FiLayer - ElbowRadius(ND_FiManPipe) - ShortTeeLength(ND_FiManPipe)
L_HydDisPipe := L_FiBodyPipe  # Need to check what this height should be
L_BallValve := .1625 m
L_TeetoCapVertPipe := T_FiLayer - ShortTeeLength(ND_FiManPipe)
L_BWOut := 2*SocketDepth(ND_FiBW)
L_BedTester := 170 cm
# Origins
L_FiManBranch = [4.03195; 4.76802; 4.03195] in
FiPipe_Origin := [0 m; 0 m; 0 m]
FiManCoupling_Origin := [
    L_FiManCouplingOffset - 0.5*innerdiameter(ND_FiPipe, PS_Fi) + CouplingLength(ND_FiManTrunk) - SocketDepth(ND_FiManTrunk);
    0;
    T_Flange + ConRadius(ND_FiManTrunk)
] + FiPipe_Origin
FiManCouplingOut_Origin := [
    -L_FiManCouplingOffset + 0.5*innerdiameter(ND_FiPipe, PS_Fi) - CouplingLength(ND_FiManTrunk) + SocketDepth(ND_FiManTrunk);
    0;
    T_Flange + ConRadius(ND_FiManTrunk) + T_FiLayer
] + FiPipe_Origin = [0.117776; 0; 0.229844] m
FiManInletPipe_Origin := [L_FiManTrunk; 0 m; 0 m] + FiManCoupling_Origin
FiBranch_Origin(i) := [
    FiPipe_Origin[0] + innerdiameter(ND_FiPipe, PS_Fi)/2 - S_FiManBranchEnds - S_FiManBranch*i;
    FiPipe_Origin[1] + innerdiameter(ND_FiManTrunk, PS_FiBranch)/2;
    FiManInletPipe_Origin[2]
]
FiInManElbow_Origin := FiManCoupling_Origin - [
    (CouplingLength(ND_FiManTrunk) - 2*SocketDepth(ND_FiManTrunk)) + L_FiInBushingtoBodyPipe + 2*SocketDepth(ND_FiManPipe);
    0 m;
    0 m
]
FiInManChkValve_Origin := FiInManElbow_Origin - [
    ElbowRadius(ND_FiManPipe);
    -ElbowRadius(ND_FiManPipe) - SocketDepth(ND_FiManPipe) - L_FiCheckValve/2;
    -2*T_FiLayer
]
FiInManElbowToTeeVertPipe_Origin := FiInManChkValve_Origin - [
    0 m;
    -ElbowRadius(ND_FiManPipe) - L_FiCheckValve/2 - SocketDepth(ND_FiManPipe);
    -4*T_FiLayer + ElbowRadius(ND_FiManPipe)
]
FiInManBallValveVert_Origin := FiManCoupling_Origin - [
    CouplingLength(ND_FiManTrunk) - 2*SocketDepth(ND_FiManTrunk) + L_FiInBushingtoBodyPipe + 2*SocketDepth(ND_FiManPipe) + ElbowRadius(ND_FiManPipe);
    -2*ElbowRadius(ND_FiManPipe) - L_FiCheckValve - 2*SocketDepth(ND_FiManPipe);
    -T_FiLayer + L_BallValve/2
]
# Calculations
# Slot Design
# slotted manifold design and areas
L_slotter(ND_body, X_fromc) := sqrt(ND_body^2 - X_fromc^2)
L_slotsPipe := innerdiameter(ND_FiPipe, PS_Fi) + 4*L_slotter(innerdiameter(ND_FiPipe, PS_Fi)/2, 11.5 cm) + 4*L_slotter(innerdiameter(ND_FiPipe, PS_Fi)/2, 23 cm) - 10*2.5*in = (0.063424 + 0.691822i) m
N_slots := 16/in
W_slots := 0.2 mm
L_slots := 0.9 in
A_slots := L_slotsPipe*N_slots*W_slots*L_slots = (0.000182661 + 0.00199245i) m^2
D_slots := sqrt(4*A_slots/π) = (0.0372832 + 0.0340215i) m
# Filtration Head Loss
K_ballValve := 0.05
K_tee90 := 1
K_bushing := 0.20
K_checkValve := 2.5
H_FiSandFluidizedSafe := Pi_FiFluidized*H_FiSand + T_FiLayer
HL_FiOutPipe := h_l(Q_Plant, innerdiameter(ND_RMPipe, PS_Default), H_FiSandFluidizedSafe, K_ballValve + 2*K_El90, Nu_Water, 0) + HL_Manifold(Q_Plant, innerdiameter(ND_RMPipe, PS_Fi), H_FiSandFluidizedSafe, 0, Nu_Water, 0, 3) = 1.84812 cm
HL_FiSlottedOut := HL_Manifold(Q_Plant/3, innerdiameter(ND_FiManTrunk, PS_Fi), L_FiManTrunk, K_checkValve + K_bushing, Nu_Water, 0, N_FiManBranch) + h_orifice(D_slots*sqrt(ε_FiSand), Pi_VenaContractaOrifice, Q_Plant/3) = (0.386883 - 0.259317i) cm
HL_SandBed := h_lKozeny(20 cm, D_FiSand60, Q_Plant/(6*A_circle(innerdiameter(ND_FiPipe, PS_Fi))), ε_FiSand, Nu_Water) = 5.60163 cm
HL_FiSlottedIn := HL_Manifold(Q_Plant/4, innerdiameter(ND_FiManTrunk, PS_Fi), innerdiameter(ND_FiPipe, PS_Fi), K_checkValve + K_bushing, Nu_Water, 0, N_FiManBranch) + h_orifice(D_slots*sqrt(ε_FiSand), Pi_VenaContractaOrifice, Q_Plant/4) = (0.250916 - 0.145866i) cm
HL_FiInPipe := h_l(Q_Plant, innerdiameter(ND_RMPipe, PS_Fi), L_FiBodyPipe, K_ballValve + 2*K_tee90, Nu_Water, 0) + HL_Manifold(Q_Plant, innerdiameter(ND_RMPipe, PS_Fi), L_FiBodyPipe, 0, Nu_Water, 0, 4) = 2.35383 cm
HL_Filtration := HL_FiOutPipe + HL_FiSlottedOut + HL_SandBed + HL_FiSlottedIn + HL_FiInPipe = (10.4414 - 0.405183i) cm
# Filter Body
LayerFiBody := layer_new("FiBodyPlu", blue3)
DrawFiBody := PipeF(FiPipe_Origin, L_FiBodyPipe, [0; 90]*deg, ND_FiPipe, PS_Fi)
FreezeFiBody := FreezeLayer("FiBodyPlu")
FiBodyPipe := stack(LayerFiBody, DrawFiBody, FreezeFiBody)
# Manifold Branches
# Piping
FiManTrunkLyr := layer_new("FiManTrunkPlu", blue3)
FiManTrunk := PipeF(FiManInletPipe_Origin, L_FiManTrunk, [0; 0]*deg, ND_FiManTrunk, PS_FiBranch)
FiManTrunkFrz := FreezeLayer("FiManTrunkPlu")
FiManPlu :=
    Local ← layer_new("FiManBranchPlu", blue3)
    for i ∈ 0 .. N_FiManBranch - 1
        Local ← stack(Local, PipeF(FiBranch_Origin(i), L_FiManBranch[i], [270; 0]*deg, ND_FiManBranch, PS_FiBranch))
    Local
FiManTrunkOrifice := CylinderF(FiBranch_Origin(0) + [0; ConRadius(ND_FiManTrunk); 0], outerdiameter(ND_FiManBranch)/2, 2*ConRadius(ND_FiManTrunk), [90; 0]*deg)
ArrayTrunkOrifice := ArrayLast(1, N_FiManBranch, -S_FiManBranch)
SubtractFiOrifices := SubtractF(["FiManTrunkPlu"], "DeleteMe")
FiManPlu :=
    Local ← layer_new("FiManBranchPlu", blue3)
    for i ∈ 0 .. N_FiManBranch - 1
        Local ← stack(Local, PipeF(FiBranch_Origin(i), L_FiManBranch[i], [270; 0]*deg, ND_FiManBranch, PS_FiBranch))
    Local
FiManFreeze := FreezeLayer("FiMan*Plu")
DrawFiManPipes := stack(FiManTrunkLyr, FiManTrunk, FiManTrunkFrz, FiManTrunkOrifice, ArrayTrunkOrifice, GroupDelete, SubtractFiOrifices, FiManPlu, FiManFreeze)
FiManBranchCaps :=
    Local ← layer_new("FiManCapsPlu", red)
    for i ∈ 0 .. N_FiManBranch - 1
        Local ← stack(Local, CutCapF(FiBranch_Origin(i) + [0; L_FiManBranch[i]; 0], H_FiManCap, [90; 0]*deg, ND_FiManBranch))
    Local
FiManTrunkCap := CutCapF(FiManInletPipe_Origin, H_FiManCap, [0; 0]*deg, ND_FiManTrunk)
FiManCapFrz := FreezeLayer("FiManCapsPlu")
ThawFiManPlu := ThawMultiple(["FiManBranchPlu"; "FiManCapsPlu"])
MirrorFiMan := MirrorAll([FiPipe_Origin[0]; FiPipe_Origin[1]], [FiPipe_Origin[0] + zc; FiPipe_Origin[1]], "n")
FiManPluFrz := FreezeMultiple(["FiMan*"])
FiManCouplingLyr := layer_new("FiManCouplingPlu", green)
a
FiManCoupling := CouplingF(FiManCoupling_Origin, [0; 0]*deg, ND_FiManTrunk, PS_FiBranch)
FiManCouplingFrz := FreezeLayer("FiManCouplingPlu")
DrawFiManFittings := stack(FiManBranchCaps, FiManTrunkCap, FiManCapFrz, ThawFiManPlu, MirrorFiMan, FiManPluFrz, FiManCouplingLyr, FiManCoupling, FiManCouplingFrz)
FiManBranchCaps :=
    Local ← layer_new("FiManCapsPlu", red)
    for i ∈ 0 .. N_FiManBranch - 1
        Local ← stack(Local, CutCapF(FiBranch_Origin(i) + [0; L_FiManBranch[i]; 0], H_FiManCap, [90; 0]*deg, ND_FiManBranch))
    Local
FiManTrunkCap := CutCapF(FiManInletPipe_Origin, H_FiManCap, [0; 0]*deg, ND_FiManTrunk)
FiManCapFrz := FreezeLayer("FiManCapsPlu")
ThawFiManPlu := ThawMultiple(["FiManBranchPlu"; "FiManCapsPlu"])
MirrorFiMan := MirrorAll([FiPipe_Origin[0]; FiPipe_Origin[1]], [FiPipe_Origin[0] + zc; FiPipe_Origin[1]], "n")
FiManPluFrz := FreezeMultiple(["FiMan*"])
FiManCouplingLyr := layer_new("FiManCouplingPlu", green)
FiManCoupling := CouplingF(FiManCoupling_Origin, [0; 0]*deg, ND_FiManTrunk, PS_FiBranch)
FiManCouplingFrz := FreezeLayer("FiManCouplingPlu")
DrawFiManFittings := stack(FiManBranchCaps, FiManTrunkCap, FiManCapFrz, ThawFiManPlu, MirrorFiMan, FiManPluFrz, FiManCouplingLyr, FiManCoupling, FiManCouplingFrz)
MirrorFiManSet :=
    Local ← stack(ThawMultiple(["FiMan*"]), view("f"), array_all(N_FiLayer + 1, 1, T_FiLayer), view("f"))
    for i ∈ 0 .. N_FiLayer/2 - 1
        ManWin[i, 0] ← [
            -ConRadius(ND_FiPipe) + FiPipe_Origin[0];
            T_FiLayer*(2*i + 1) - 1.05*ConRadius(ND_FiManTrunk) + FiManInletPipe_Origin[2];
            0
        ]
        ManWin[i, 1] ← [
            ConRadius(ND_FiPipe) + FiPipe_Origin[0];
            T_FiLayer*(2*i + 1) + 1.05*ConRadius(ND_FiManTrunk) + FiManInletPipe_Origin[2];
            0
        ]
    SelectMans ← SelectWindow(ManWin)
    MirrorMans ← MirrorSelection([FiPipe_Origin[0]; FiPipe_Origin[2]], [FiPipe_Origin[0]; FiPipe_Origin[2] + zc], "y")
    Local ← stack(Local, SelectMans, MirrorMans)
    Local
FrzFiMan := FreezeMultiple(["FiMan*"])
ArrayFiManifolds := stack(MirrorFiManSet, view("t"), FrzFiMan)
FiManInt := stack(DrawFiManPipes, DrawFiManFittings, ArrayFiManifolds)
# Filter Caps
# Top Cap Ring
D_FiTopRingOuter := 14 in
Dist_CentToRodTop := 6.6739 in
Dist_CentToStuds := 5.6525 in
D_FiTopRingInner := 10 in
D_FiRodHoles := 5/16*in
H_FiCap := 3/8*in
LayerCaps := layer_new("FiCap", grey)
DrawTopRingOuter := CylinderF(FiPipe_Origin + [0 m; 0 m; L_FiBodyPipe], D_FiTopRingOuter/2, H_FiCap, [0; 90]*deg)
FreezeCapLayer := FreezeLayer("FiCap")
DrawTopRingInner := CylinderF(FiPipe_Origin + [0 m; 0 m; L_FiBodyPipe], D_FiTopRingInner/2, H_FiCap, [0; 90]*deg)
DrawRodHolesTop := CylinderF(FiPipe_Origin + [Dist_CentToRodTop; 0 m; L_FiBodyPipe], D_FiRodHoles/2, H_FiCap, [0; 90]*deg)
ArrayRodHolesTop := ArrayLastPolar(FiPipe_Origin + [0 m; 0 m; L_FiBodyPipe], 6, 360 deg)
DrawStudHoles := CylinderF(FiPipe_Origin + [Dist_CentToStuds; 0 m; L_FiBodyPipe], D_FiRodHoles/2, H_FiCap, [0; 90]*deg)
ArrayStudHoles := ArrayLastPolar(FiPipe_Origin + [0 m; 0 m; L_FiBodyPipe], 6, 360 deg)
SubtractFromCapLayer := SubtractF(["FiCap"], "DeleteMe")
FiTopCapRing := stack(LayerCaps, DrawTopRingOuter, FreezeCapLayer, DrawTopRingInner, DrawRodHolesTop, ArrayRodHolesTop, DrawStudHoles, ArrayStudHoles, GroupDelete, SubtractFromCapLayer, FreezeCapLayer)
# Access Cap
D_AccessCap := 12 in
D_FiBWHole := outerdiameter(ND_FiBW)
D_BedTestHole := outerdiameter(1 in)
D_ClearanceHole := .266 in
SelectLayerCaps := SelectLayer("FiCap")
DrawAccessCap := CylinderF(FiPipe_Origin + [0 m; 0 m; L_FiBodyPipe + H_FiCap], D_AccessCap/2, H_FiCap, [0; 90]*deg)
DrawBWHole := CylinderF(FiPipe_Origin + [0 m; 0 m; L_FiBodyPipe + H_FiCap], D_FiBWHole/2, H_FiCap, [0; 90]*deg)
DrawBedTestHole := CylinderF(FiPipe_Origin + [
    -D_BedTestHole/2 - 2*outerdiameter(ND_FiManBranch)/3;
    D_FiTopRingInner/2 - 3*D_BedTestHole/4;
    L_FiBodyPipe + H_FiCap
], D_BedTestHole/2, H_FiCap, [0; 90]*deg)
DrawClearanceHole := CylinderF(FiPipe_Origin + [Dist_CentToStuds; 0 m; L_FiBodyPipe + H_FiCap], D_FiRodHoles/2, H_FiCap, [0; 90]*deg)
ArrayClearanceHoles := ArrayLastPolar(FiPipe_Origin + [0 m; 0 m; L_FiBodyPipe + H_FiCap], 6, 360 deg)
FiAccessCap := stack(SelectLayerCaps, DrawAccessCap, FreezeCapLayer, DrawBWHole, DrawBedTestHole, DrawClearanceHole, ArrayClearanceHoles, GroupDelete, SubtractFromCapLayer, FreezeCapLayer)
# Bottom Cap
D_BottomCap := 14.5 in
Dist_CentToRodBottom := 6.684 in
DrawBottomCap := CylinderF(FiPipe_Origin + [0 m; 0 m; -H_FiCap], D_BottomCap/2, H_FiCap, [0; 90]*deg)
DrawRodHolesBottom := CylinderF(FiPipe_Origin + [Dist_CentToRodBottom; 0 m; -H_FiCap], D_FiRodHoles/2, H_FiCap, [0; 90]*deg)
ArrayRodHolesBottom := ArrayLastPolar(FiPipe_Origin + [0 m; 0 m; -H_FiCap], 6, 360 deg)
FiBottomCap := stack(SelectLayerCaps, DrawBottomCap, FreezeCapLayer, DrawRodHolesBottom, ArrayRodHolesBottom, GroupDelete, SubtractFromCapLayer)
FiCap := stack(FiTopCapRing, FiAccessCap, FiBottomCap)
# Inlet Manifold
FiInletPluLayer := layer_new("FiInletPlu", yellow)
DrawBushingtoBodyPipe := PipeF(FiManCoupling_Origin - [CouplingLength(ND_FiManTrunk) - 2*SocketDepth(ND_FiManTrunk); 0 m; 0 m], L_FiInBushingtoBodyPipe, [0; 0]*deg, ND_FiManTrunk, PS_FiBranch)
FreezeLayerInlet := FreezeLayer("FiInletPlu")
FiBushingLayer := layer_new("FiBushingPlu", green)
DrawBushings := bushingReducerF(FiManCoupling_Origin - [
    CouplingLength(ND_FiManTrunk) - 2*SocketDepth(ND_FiManTrunk) + L_FiInBushingtoBodyPipe + SocketDepth(ND_FiManPipe);
    0 m;
    0 m
], [0; 0; 0]*deg, ND_FiManPipe, ND_FiManTrunk, PS_FiBranch)
FreezeLayerBushing := FreezeLayer("FiBushingPlu")
ND_FiManTrunk = 1 in
SelectInletPluLayer := SelectLayer("FiInletPlu")
DrawBushingtoElbowPipe := PipeF(FiInManElbow_Origin + [L_FiInBushingtoElbowPipe; 0 m; 0 m], L_FiInBushingtoElbowPipe, [0; 0]*deg, ND_FiManPipe, PS_FiBranch)
FiElbowLayer := layer_new("FiElbowPlu", green)
DrawInletManElbows := ElbowF(FiInManElbow_Origin, [-90; 180; 0]*deg, ND_FiManPipe, PS_FiBranch)
FreezeLayerElbow := FreezeLayer("FiElbowPlu")
FiValveLayer := layer_new("FiChkValve", grey)
FiValvePlu := layer_new("FiValvePlu", yellow)
DrawElbowtoValvePlu := PipeF(FiInManElbow_Origin - [ElbowRadius(ND_FiManPipe); -ElbowRadius(ND_FiManPipe); -2*T_FiLayer], L_ElbowtoValvePipe, [-90; 0]*deg, ND_FiManPipe, PS_FiBranch)
FreezeValvePlu := FreezeLayer("FiValvePlu")
DrawInManCheckValves := insertdwg("https://confluence.cornell.edu/download/attachments/173604905/Check+Valve+Scaled.dwg", FiInManChkValve_Origin, ND_FiManPipe/(1 in), ND_FiManPipe/(1 in), 90 deg)
FreezeLayerValve := FreezeLayer("FiChkValve")
ArrayInletSet := stack(ThawMultiple(["FiElbowPlu"; "FiInletPlu"; "FiBushingPlu"]), view("f"), array_all(N_FiManBranch + 1, 1, 2*T_FiLayer), view("f"), FreezeMultiple(["FiElbowPlu"; "FiInletPlu"; "FiBushingPlu"]))
ArrayValve := stack(ThawMultiple(["FiValvePlu"; "FiChkValve"]), view("f"), array_all(N_FiManBranch, 1, 2*T_FiLayer), view("f"), FreezeMultiple(["FiValvePlu"; "FiChkValve"]))
FiInBottomPluLayer := layer_new("FiInBottomPlu", yellow)
DrawBottomInPipe := PipeF(FiInManChkValve_Origin - [0 m; SocketDepth(ND_FiManPipe) + L_FiCheckValve/2; 2*T_FiLayer], L_BottomPipe, [-90; 0]*deg, ND_FiManPipe, PS_FiBranch)
DrawTeeConnector := PipeF(FiInManChkValve_Origin - [
    0 m;
    -L_BottomPipe - TeeLength(ND_FiManPipe) + SocketDepth(ND_FiManPipe) + L_FiCheckValve/2;
    2*T_FiLayer
], L_ElbowtoValvePipe, [-90; 0]*deg, ND_FiManPipe, PS_FiBranch)
Dist_Cad := 1.0319 m
DrawTeetoDrainValvePipe := PipeF(FiInManChkValve_Origin - [
    0 m;
    -L_BottomPipe + SocketDepth(ND_FiManPipe) + L_FiCheckValve/2 - 2*TeeLength(ND_FiManPipe) + L_ElbowtoValvePipe;
    2*T_FiLayer
], L_ElbowtoValvePipe, [-90; 0]*deg, ND_FiManPipe, PS_FiBranch)
DrawValvetoFittingPluTop := PipeF(FiInManChkValve_Origin - [0 m; -L_FiCheckValve/2 + SocketDepth(ND_FiManPipe); -4*T_FiLayer], L_ElbowtoValvePipe, [-90; 0]*deg, ND_FiManPipe, PS_FiBranch)
DrawValvetoFittingPlu3 := PipeF(FiInManChkValve_Origin - [0 m; -L_FiCheckValve/2 + SocketDepth(ND_FiManPipe); -2*T_FiLayer], L_ValvetoTeePipe, [-90; 0]*deg, ND_FiManPipe, PS_FiBranch)
DrawValvetoFittingPlu2 := PipeF(FiInManChkValve_Origin - [0 m; -L_FiCheckValve/2 + SocketDepth(ND_FiManPipe); 0 m], L_ValvetoTeePipe, [-90; 0]*deg, ND_FiManPipe, PS_FiBranch)
FrzInBottomPlu := FreezeLayer("FiInBottomPlu")
Dist_Valve := 3.25 in
Dist_Valve/Dist_Cad = 0.0799981
FiInFittingsLayer := layer_new("FiInFittings", green)
DrawTopInManElbow := ElbowF(FiInManChkValve_Origin - [0 m; -L_FiCheckValve/2 - SocketDepth(ND_FiManPipe); -4*T_FiLayer], [0; -90; 0]*deg, ND_FiManPipe, PS_FiBranch)
DrawInManTee3 := TeeF(FiInManChkValve_Origin - [
    0 m;
    -L_FiCheckValve/2 - SocketDepth(ND_FiManPipe) - (ElbowRadius(ND_FiManPipe) - ShortTeeLength(ND_FiManPipe));
    -2*T_FiLayer
], [90; 90; 90]*deg, ND_FiManPipe, PS_FiBranch)
DrawInManTee2 := TeeF(FiInManChkValve_Origin - [
    0 m;
    -L_FiCheckValve/2 - SocketDepth(ND_FiManPipe) - (ElbowRadius(ND_FiManPipe) - ShortTeeLength(ND_FiManPipe));
    0 m
], [90; 90; 90]*deg, ND_FiManPipe, PS_FiBranch)
DrawInManTeeBottom1 := TeeF(FiInManChkValve_Origin - [
    0 m;
    -L_BottomPipe - TeeLength(ND_FiManPipe)/2 + L_FiCheckValve/2 + SocketDepth(ND_FiManPipe);
    2*T_FiLayer - ShortTeeLength(ND_FiManPipe)
], [0; 90; 90]*deg, ND_FiManPipe, PS_FiBranch)
DrawInManTeeBottom2 := TeeF(FiInManChkValve_Origin - [
    0 m;
    -L_BottomPipe - 3*TeeLength(ND_FiManPipe)/2 + L_FiCheckValve/2 - SocketDepth(ND_FiManPipe);
    2*T_FiLayer - ShortTeeLength(ND_FiManPipe)
], [0; 90; 90]*deg, ND_FiManPipe, PS_FiBranch)
FrzInFittings := FreezeLayer("FiInFittings")
FiInVertPluLayer := layer_new("FiInVertPlu", yellow)
DrawElbowtoTeeVertPipe := PipeF(FiInManElbowToTeeVertPipe_Origin, L_ElbowtoTeeVertPipe, [0; -90]*deg, ND_FiManPipe, PS_FiBranch)
DrawTeetoTeeVertPipes := PipeF(FiInManElbowToTeeVertPipe_Origin - [0 m; 0 m; 2*T_FiLayer + ShortTeeLength(ND_FiManPipe) - ElbowRadius(ND_FiManPipe)], L_TeetoTeeVertPipe, [0; -90]*deg, ND_FiManPipe, PS_FiBranch)
L_TeetoValvePipe := 2*SocketDepth(ND_FiManPipe)
DrawTeetoValveVertPipe := PipeF(FiInManElbowToTeeVertPipe_Origin - [0 m; 0 m; 4*T_FiLayer + ShortTeeLength(ND_FiManPipe) - ElbowRadius(ND_FiManPipe)], L_TeetoValvePipe, [0; -90]*deg, ND_FiManPipe, PS_FiBranch)
DrawValvetoTeeVertPipe := PipeF(FiInManElbowToTeeVertPipe_Origin - [
    0 m;
    0 m;
    6*T_FiLayer - ShortTeeLength(ND_FiManPipe) - L_TeetoValvePipe - ElbowRadius(ND_FiManPipe)
], L_TeetoValvePipe, [0; -90]*deg, ND_FiManPipe, PS_FiBranch)
DrawHydDisPipe := PipeF(FiInManElbowToTeeVertPipe_Origin - [
    0 m;
    ElbowRadius(ND_FiManPipe) - L_BottomPipe - 3*TeeLength(ND_FiManPipe)/2 + L_FiCheckValve;
    -ShortTeeLength(ND_FiManPipe) - L_HydDisPipe + 6*T_FiLayer - ElbowRadius(ND_FiManPipe)
], L_HydDisPipe, [0; -90]*deg, ND_FiManPipe, PS_FiBranch)
FrzVertPluLyr := FreezeLayer("FiInVertPlu")
FiManCoupling_Origin - [
    CouplingLength(ND_FiManTrunk) - 2*SocketDepth(ND_FiManTrunk) + L_FiInBushingtoBodyPipe + SocketDepth(ND_FiManPipe) + L_FiInBushingtoElbowPipe + ElbowRadius(ND_FiManPipe);
    -2*ElbowRadius(ND_FiManPipe) - L_FiCheckValve - 2*SocketDepth(ND_FiManPipe);
    -T_FiLayer + L_BallValve/2
]
FiBallValveLayer := layer_new("FiBallValve", grey)
DrawInManBallValve := insertdwg("https://confluence.cornell.edu/download/attachments/173604905/PvcBallValve+Scaled.dwg", FiInManBallValveVert_Origin, ND_FiManPipe/(2 in), ND_FiManPipe/(2 in), 90 deg)
DrawDrainValve := insertdwg("https://confluence.cornell.edu/download/attachments/173604905/PvcBallValve+Scaled.dwg", FiInManBallValveVert_Origin - [0 m; -3*TeeLength(ND_FiManPipe)/2 - 3*SocketDepth(ND_FiManPipe); T_FiLayer - L_BallValve/2], ND_FiManPipe/(2 in), ND_FiManPipe/(2 in), 90 deg)
RotateDrainValve := Rotate3DLast(FiInManBallValveVert_Origin - [0 m; -3*TeeLength(ND_FiManPipe)/2 - 3*SocketDepth(ND_FiManPipe); T_FiLayer - L_BallValve/2], "x", -90 deg)
FrzBallValveLyr := FreezeLayer("FiBallValve")
FiInletManifold := stack(FiInletPluLayer, DrawBushingtoBodyPipe, FreezeLayerInlet, FiBushingLayer, DrawBushings, FreezeLayerBushing, SelectInletPluLayer, DrawBushingtoElbowPipe, FreezeLayerInlet, FiElbowLayer, DrawInletManElbows, FreezeLayerElbow, FiValvePlu, DrawElbowtoValvePlu, FreezeValvePlu, FiValveLayer, DrawInManCheckValves, FreezeLayerValve, FiInBottomPluLayer, DrawBottomInPipe, DrawTeeConnector, DrawTeetoDrainValvePipe, DrawValvetoFittingPluTop, DrawValvetoFittingPluTop, DrawValvetoFittingPlu3, DrawValvetoFittingPlu2, FrzInBottomPlu, FiInFittingsLayer, DrawTopInManElbow, DrawInManTee3, DrawInManTee2, DrawInManTeeBottom1, DrawInManTeeBottom2, FrzInFittings, FiInVertPluLayer, DrawTeetoTeeVertPipes, DrawElbowtoTeeVertPipe, DrawTeetoValveVertPipe, DrawValvetoTeeVertPipe, DrawHydDisPipe, FrzVertPluLyr, FiBallValveLayer, DrawInManBallValve, DrawDrainValve, RotateDrainValve, FrzBallValveLyr)
# Outlet Manifold
FiOutletPluLayer := layer_new("FiOutletPlu", yellow)
DrawBodytoValvePipe := PipeF(FiManCouplingOut_Origin + [CouplingLength(ND_FiManTrunk) - 2*SocketDepth(ND_FiManTrunk) + L_FiInBushingtoBodyPipe; 0 m; 0 m], L_FiInBushingtoBodyPipe, [0; 0]*deg, ND_FiManTrunk, PS_FiBranch)
FreezeLayerOutlet := FreezeLayer("FiOutletPlu")
FiFittingsOutLayer := layer_new("FiFittingsOutPlu", green)
DrawOutletManElbows := ElbowF(FiManCouplingOut_Origin + [CouplingLength(ND_FiManTrunk) - 2*SocketDepth(ND_FiManTrunk) + L_FiInBushingtoBodyPipe; 0 m; 0 m], [90; 180; 0]*deg, ND_FiManTrunk, PS_FiBranch)
DrawOutletBushings := bushingReducerF(FiManCouplingOut_Origin + [
    CouplingLength(ND_FiManTrunk) - 2*SocketDepth(ND_FiManTrunk) + L_FiInBushingtoBodyPipe + ElbowRadius(ND_FiManTrunk);
    -ElbowRadius(ND_FiManTrunk) - L_ElbowtoValvePipeOut - L_FiCheckValve*ND_FiManTrunk/(2 in) + SocketDepth(ND_FiManPipe);
    0 m
], [-90; 0; 0]*deg, ND_FiManPipe, ND_FiManTrunk, PS_FiBranch)
RotateBushing := Rotate3DLast(FiManCouplingOut_Origin + [
    CouplingLength(ND_FiManTrunk) - 2*SocketDepth(ND_FiManTrunk) + L_FiInBushingtoBodyPipe + ElbowRadius(ND_FiManTrunk);
    -ElbowRadius(ND_FiManTrunk) - L_ElbowtoValvePipeOut - L_FiCheckValve*ND_FiManTrunk/(2 in);
    0 m
], "z", 180 deg)
DrawOutletTees := TeeF(FiManCouplingOut_Origin + [
    CouplingLength(ND_FiManTrunk) - 2*SocketDepth(ND_FiManTrunk) + L_FiInBushingtoBodyPipe + ElbowRadius(ND_FiManTrunk);
    -ElbowRadius(ND_FiManTrunk) - L_ElbowtoValvePipeOut - L_FiCheckValve*ND_FiManTrunk/(2 in) - L_ElbowtoValvePipe;
    0 m
], [90; -90; 90]*deg, ND_FiManPipe, PS_FiBranch)
FreezeLayerFittingsOut := FreezeLayer("FiFittingsOutPlu")
FiValveOutPlu := layer_new("FiValvePluOut", yellow)
DrawElbowtoValveOutPlu := PipeF(FiManCouplingOut_Origin + [
    CouplingLength(ND_FiManTrunk) - 2*SocketDepth(ND_FiManTrunk) + L_FiInBushingtoBodyPipe + ElbowRadius(ND_FiManTrunk);
    -ElbowRadius(ND_FiManTrunk) - L_ElbowtoValvePipeOut;
    0 m
], L_ElbowtoValvePipeOut, [-90; 0]*deg, ND_FiManTrunk, PS_FiBranch)
DrawValvetoBushingOutPlu := PipeF(FiManCouplingOut_Origin + [
    CouplingLength(ND_FiManTrunk) - 2*SocketDepth(ND_FiManTrunk) + L_FiInBushingtoBodyPipe + ElbowRadius(ND_FiManTrunk);
    -ElbowRadius(ND_FiManTrunk) - L_ElbowtoValvePipeOut - L_FiCheckValve*ND_FiManTrunk/(2 in);
    0 m
], L_ElbowtoValvePipeOut, [-90; 0]*deg, ND_FiManTrunk, PS_FiBranch)
DrawBushingtoTeeOutPlu := PipeF(FiManCouplingOut_Origin + [
    CouplingLength(ND_FiManTrunk) - 2*SocketDepth(ND_FiManTrunk) + L_FiInBushingtoBodyPipe + ElbowRadius(ND_FiManTrunk);
    -ElbowRadius(ND_FiManTrunk) - L_ElbowtoValvePipeOut - L_FiCheckValve*ND_FiManTrunk/(2 in) - L_ElbowtoValvePipe;
    0 m
], L_ElbowtoValvePipe, [-90; 0]*deg, ND_FiManPipe, PS_FiBranch)
FreezeValveOutPlu := FreezeLayer("FiValvePluOut")
FiValveOutLayer := layer_new("FiChkValveOut", grey)
DrawOutManCheckValves := insertdwg("https://confluence.cornell.edu/download/attachments/173604905/Check+Valve+Scaled.dwg", FiManCouplingOut_Origin + [
    CouplingLength(ND_FiManTrunk) - 2*SocketDepth(ND_FiManTrunk) + L_FiInBushingtoBodyPipe + ElbowRadius(ND_FiManTrunk);
    -ElbowRadius(ND_FiManTrunk) - L_FiCheckValve*ND_FiManTrunk/(2 in)/2 - SocketDepth(ND_FiManTrunk);
    0 m
], ND_FiManTrunk/(1 in), ND_FiManTrunk/(1 in), 90 deg)
FreezeLayerValveOut := FreezeLayer("FiChkValveOut")
FiOutTeetoTeePluLayer := layer_new("FiOutTeetoTeePlu", yellow)
DrawTeetoTeeVertPipe := PipeF(FiManCouplingOut_Origin + [
    CouplingLength(ND_FiManTrunk) - 2*SocketDepth(ND_FiManTrunk) + L_FiInBushingtoBodyPipe + ElbowRadius(ND_FiManTrunk);
    -ElbowRadius(ND_FiManTrunk) - L_ElbowtoValvePipeOut - L_FiCheckValve*ND_FiManTrunk/(2 in) - L_ElbowtoValvePipe - ShortTeeLength(ND_FiManPipe);
    ShortTeeLength(ND_FiManPipe)
], L_TeetoTeeVertPipe, [0; 90]*deg, ND_FiManPipe, PS_FiBranch)
FrzOutAryVertPlu := FreezeLayer("FiOutTeetoTeePlu")
FiOutVertPluLayer := layer_new("FiOutVertPlu", yellow)
DrawTeetoCapVertPipe := PipeF(FiManCouplingOut_Origin + [
    CouplingLength(ND_FiManTrunk) - 2*SocketDepth(ND_FiManTrunk) + L_FiInBushingtoBodyPipe + ElbowRadius(ND_FiManTrunk);
    -ElbowRadius(ND_FiManTrunk) - L_ElbowtoValvePipeOut - L_FiCheckValve*ND_FiManTrunk/(2 in) - L_ElbowtoValvePipe - ShortTeeLength(ND_FiManPipe);
    -ShortTeeLength(ND_FiManPipe)
], L_TeetoCapVertPipe, [0; -90]*deg, ND_FiManPipe, PS_FiBranch)
DrawTeetoValveVertPipe := PipeF(FiManCouplingOut_Origin + [
    CouplingLength(ND_FiManTrunk) - 2*SocketDepth(ND_FiManTrunk) + L_FiInBushingtoBodyPipe + ElbowRadius(ND_FiManTrunk);
    -ElbowRadius(ND_FiManTrunk) - L_ElbowtoValvePipeOut - L_FiCheckValve*ND_FiManTrunk/(2 in) - L_ElbowtoValvePipe - ShortTeeLength(ND_FiManPipe);
    ShortTeeLength(ND_FiManPipe) + 4*T_FiLayer
], L_ElbowtoValvePipeOut, [0; 90]*deg, ND_FiManPipe, PS_FiBranch)
DrawValvetoTeeVertPipe := PipeF(FiManCouplingOut_Origin + [
    CouplingLength(ND_FiManTrunk) - 2*SocketDepth(ND_FiManTrunk) + L_FiInBushingtoBodyPipe + ElbowRadius(ND_FiManTrunk);
    -ElbowRadius(ND_FiManTrunk) - L_ElbowtoValvePipeOut - L_FiCheckValve*ND_FiManTrunk/(2 in) - L_ElbowtoValvePipe - ShortTeeLength(ND_FiManPipe);
    ShortTeeLength(ND_FiManPipe) + 4*T_FiLayer + L_BallValve
], L_ElbowtoValvePipe, [0; 90]*deg, ND_FiManPipe, PS_FiBranch)
FrzOutVertPluLyr := FreezeLayer("FiOutVertPlu")
FiOutCapLayer := layer_new("FiOutCap", red)
DrawOutCap := CapF(FiManCouplingOut_Origin + [
    CouplingLength(ND_FiManTrunk) - 2*SocketDepth(ND_FiManTrunk) + L_FiInBushingtoBodyPipe + ElbowRadius(ND_FiManTrunk);
    -ElbowRadius(ND_FiManTrunk) - L_ElbowtoValvePipeOut - L_FiCheckValve*ND_FiManTrunk/(2 in) - L_ElbowtoValvePipe - ShortTeeLength(ND_FiManPipe);
    -T_FiLayer
], [0; 90]*deg, ND_FiManPipe)
FrzOutCapLayer := FreezeLayer("FiOutCap")
FiValveOutLyr := layer_new("FiOutValve", grey)
DrawValveOut := insertdwg("https://confluence.cornell.edu/download/attachments/173604905/PvcBallValve+Scaled.dwg", FiManCouplingOut_Origin + [
    CouplingLength(ND_FiManTrunk) - 2*SocketDepth(ND_FiManTrunk) + L_FiInBushingtoBodyPipe + ElbowRadius(ND_FiManTrunk);
    -ElbowRadius(ND_FiManTrunk) - L_ElbowtoValvePipeOut - L_FiCheckValve*ND_FiManTrunk/(2 in) - L_ElbowtoValvePipe - ShortTeeLength(ND_FiManPipe);
    ShortTeeLength(ND_FiManPipe) + 4*T_FiLayer + SocketDepth(ND_FiManPipe)
], ND_FiManPipe/(2 in), ND_FiManPipe/(2 in), 90 deg)
FrzValveOut := FreezeLayer("FiOutValve")
FiTeeOutLyr := layer_new("FiOutTee", green)
DrawTopTeeOutlet := TeeF(FiManCouplingOut_Origin + [
    CouplingLength(ND_FiManTrunk) - 2*SocketDepth(ND_FiManTrunk) + L_FiInBushingtoBodyPipe + ElbowRadius(ND_FiManTrunk) + ShortTeeLength(ND_FiManPipe);
    -ElbowRadius(ND_FiManTrunk) - L_ElbowtoValvePipeOut - L_FiCheckValve*ND_FiManTrunk/(2 in) - L_ElbowtoValvePipe - ShortTeeLength(ND_FiManPipe);
    ShortTeeLength(ND_FiManPipe) + 4*T_FiLayer + L_BallValve + 2*SocketDepth(ND_FiManPipe) + ShortTeeLength(ND_FiManPipe)
], [90; 180; 90]*deg, ND_FiManPipe, PS_FiBranch)
FrzTeeOut := FreezeLayer("FiOutTee")
ArrayOutVertPipe := stack(ThawMultiple(["FiOutTeetoTeePlu"]), view("f"), array_all(N_FiManBranch - 1, 1, 2*T_FiLayer), view("f"), FreezeMultiple(["FiOutTeetoTeePlu"]))
ArrayOutletSet := stack(ThawMultiple(["FiOutletPlu"; "FiFittingsOutPlu"; "FiValvePluOut"; "FiChkValveOut"]), view("f"), array_all(N_FiManBranch, 1, 2*T_FiLayer), view("f"), FreezeMultiple(["FiOutletPlu"; "FiFittingsOutPlu"; "FiValvePluOut"; "FiChkValveOut"]))
FiOutletManifold := stack(FiOutletPluLayer, DrawBodytoValvePipe, FreezeLayerOutlet, FiFittingsOutLayer, DrawOutletManElbows, DrawOutletBushings, RotateBushing, DrawOutletTees, FreezeLayerFittingsOut, FiValveOutPlu, DrawElbowtoValveOutPlu, DrawValvetoBushingOutPlu, DrawBushingtoTeeOutPlu, FreezeValveOutPlu, FiValveOutLayer, DrawOutManCheckValves, FreezeLayerValveOut, FiOutTeetoTeePluLayer, DrawTeetoTeeVertPipe, FrzOutAryVertPlu, FiOutVertPluLayer, DrawTeetoCapVertPipe, DrawTeetoValveVertPipe, DrawValvetoTeeVertPipe, FrzOutVertPluLyr, FiOutCapLayer, DrawOutCap, FrzOutCapLayer, FiValveOutLyr, DrawValveOut, FrzValveOut, FiTeeOutLyr, DrawTopTeeOutlet, FrzTeeOut)
# Backwash Plumbing
L_BWHoriz := (outerdiameter(ND_FiPipe)/2 - ElbowRadius(ND_FiBW) + CouplingLength(ND_FiManTrunk) + outerdiameter(ND_FiManPipe)/2 + ShortTeeLength(ND_FiManPipe) + 2*SocketDepth(ND_FiManPipe) - L_BallValve*ND_FiBW/(2 in))/2 + SocketDepth(ND_FiBW)
L_BWOutlet := L_BWOut + L_FiBodyPipe
FiBWPluLyr := layer_new("FiBWPlu", yellow)
DrawBWPipeOut := PipeF(FiPipe_Origin + [0 m; 0 m; L_FiBodyPipe + H_FiCap], L_BWOut, [0; 90]*deg, ND_FiBW, PS_FiBranch)
DrawBWPipeHoriz1 := PipeF(FiPipe_Origin + [ElbowRadius(ND_FiBW); 0 m; L_FiBodyPipe + H_FiCap + L_BWOut + ElbowRadius(ND_FiBW)], L_BWHoriz, [180; 0]*deg, ND_FiBW, PS_FiBranch)
DrawBWPipeHoriz2 := PipeF(FiPipe_Origin + [
    ElbowRadius(ND_FiBW) + L_BWHoriz + L_BallValve*ND_FiBW/(2 in) - 2*SocketDepth(ND_FiBW);
    0 m;
    L_FiBodyPipe + H_FiCap + L_BWOut + ElbowRadius(ND_FiBW)
], L_BWHoriz, [180; 0]*deg, ND_FiBW, PS_FiBranch)
DrawBWPipeOutlet := PipeF(FiPipe_Origin + [
    2*ElbowRadius(ND_FiBW) + 2*L_BWHoriz + L_BallValve*ND_FiBW/(2 in) - 2*SocketDepth(ND_FiBW);
    0 m;
    L_FiBodyPipe + H_FiCap + L_BWOut
], L_BWOutlet, [0; -90]*deg, ND_FiBW, PS_FiBranch)
FrzFiBWPluLyr := FreezeLayer("FiBWPlu")
FiBWFittingsLyr := layer_new("FiBWFittings", green)
DrawBWElbowOut := ElbowF(FiPipe_Origin + [ElbowRadius(ND_FiBW); 0 m; L_FiBodyPipe + H_FiCap + L_BWOut + ElbowRadius(ND_FiBW)], [90; 0; 90]*deg, ND_FiBW, PS_FiBranch)
DrawBWElbowDown := ElbowF(FiPipe_Origin + [
    ElbowRadius(ND_FiBW) + 2*L_BWHoriz + L_BallValve*ND_FiBW/(2 in) - 2*SocketDepth(ND_FiBW);
    0 m;
    L_FiBodyPipe + H_FiCap + L_BWOut + ElbowRadius(ND_FiBW)
], [-90; 0; -90]*deg, ND_FiBW, PS_FiBranch)
FrzBWFittingsLyr := FreezeLayer("FiBWFittings")
FiBWValveLyr := layer_new("FiBWValve", grey)
DrawBWValve := insertdwg("https://confluence.cornell.edu/download/attachments/173604905/PvcBallValve+Scaled.dwg", FiPipe_Origin + [
    ElbowRadius(ND_FiBW) + L_BWHoriz - SocketDepth(ND_FiBW);
    0 m;
    L_FiBodyPipe + H_FiCap + L_BWOut + ElbowRadius(ND_FiBW)
], ND_FiBW/(2 in), ND_FiBW/(2 in), 0 deg)
RotateBWValve := Rotate3DLast(FiPipe_Origin + [
    ElbowRadius(ND_FiBW) + L_BWHoriz - SocketDepth(ND_FiBW);
    0 m;
    L_FiBodyPipe + H_FiCap + L_BWOut + ElbowRadius(ND_FiBW)
], "y", 90 deg)
FrzBWValveLyr := FreezeLayer("FiBWValve")
FiBW := stack(FiBWPluLyr, DrawBWPipeOut, DrawBWPipeHoriz1, DrawBWPipeHoriz2, DrawBWPipeOutlet, FrzFiBWPluLyr, FiBWFittingsLyr, DrawBWElbowOut, DrawBWElbowDown, FrzBWFittingsLyr, FiBWValveLyr, DrawBWValve, RotateBWValve, FrzBWValveLyr)
# Bed Tester
FiBedTestLayer := layer_new("FiBedTesterPlu", yellow)
DrawBedTesterPlu := PipeF(FiPipe_Origin + [
    -D_BedTestHole/2 - 2*outerdiameter(ND_FiManBranch)/3;
    D_FiTopRingInner/2 - 3*D_BedTestHole/4;
    L_FiBodyPipe + H_FiCap + 5 in
], L_BedTester, [0; -90]*deg, ND_BedTester, PS_FiBranch)
DrawBedTest
FrzBedTestLyr := FreezeLayer("FiBedTesterPlu")
FiBedTestCapLyr := layer_new("FiBedTestCap", red)
DrawBedTesterCap := CapF(FiPipe_Origin + [
    -D_BedTestHole/2 - 2*outerdiameter(ND_FiManBranch)/3;
    D_FiTopRingInner/2 - 3*D_BedTestHole/4;
    L_FiBodyPipe + H_FiCap + 5 in
], [0; -90]*deg, ND_BedTester)
FrzBedTestCapLyr := FreezeLayer("FiBedTestCap")
FiBedTestFittingLyr := layer_new("FiBedTestFittings", green)
DrawBedTestReducer := bushingReducerF(FiPipe_Origin + [
    -D_BedTestHole/2 - 2*outerdiameter(ND_FiManBranch)/3;
    D_FiTopRingInner/2 - 3*D_BedTestHole/4;
    L_FiBodyPipe + H_FiCap
], [0; 0; 0]*deg, ND_BedTesterOuter, ND_BedTester, PS_FiBranch)
FrzBedTestFittings := FreezeLayer("FiBedTestFittings")
FiBedTester := stack(FiBedTestLayer, DrawBedTesterPlu, FrzBedTestLyr, FiBedTestCapLyr, DrawBedTesterCap, FrzBedTestCapLyr)
Array := stack(ArrayInletSet, ArrayValve, ArrayOutletSet, ArrayOutVertPipe)
# [component: inputs stack(FiBodyPipe, FiManInt, FiCap, FiInletManifold, FiOutletManifold, FiBW, FiBedTester, Array)]
