# Automated Design: AutoCAD: Basics
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# Colors
grey := [132; 132; 132]
ltgrey := [214; 214; 214]
dkgrey := [91; 91; 91]
blue := [0; 255; 255]
blue2 := [0; 191; 255]
blue3 := [0; 127; 255]
green := [0; 255; 0]
purple := [127; 0; 255]
ltpurple := [125; 0; 160]
red := [255; 0; 0]
yellow := [255; 255; 0]
# Using Numbers in Code
sp := " "
zc := .01 m
zc_point := [0; .1; 0]*m
stringit(x) := num2str(round(x/m, 5))
stringit_nounits(x) := num2str(round(x, 5))
point(pointarray) :=
    temp ← ""
    for i ∈ 0 .. (rows(pointarray) - 1)
        temp ← concat(temp, stringit(pointarray[i]))
        temp ← concat(temp, ",") if i < (rows(pointarray) - 1)
    temp
point_nounits(pointarray) :=
    temp ← ""
    for i ∈ 0 .. (rows(pointarray) - 1)
        temp ← concat(temp, stringit_nounits(pointarray[i]))
        temp ← concat(temp, ",") if i < (rows(pointarray) - 1)
    temp
# Views
viewtop1 := concat("_-view", sp, "o", sp, "t")
viewtop := concat("_-view", sp, "o", sp, "t", sp)
viewfront := concat("_-view", sp, "o", sp, "f", sp)
viewfront1 := concat("_-view", sp, "o", sp, "f")
viewrightside := concat("_-view", sp, "o", sp, "r", sp)
viewrightside1 := concat("_-view", sp, "o", sp, "r")
viewse := concat("-view", sp, "se")
viewleftside := concat("_-view", sp, "o", sp, "l")
# Cylinders
cylinderA(p1, R1, L) := concat("_cylinder", sp, point(p1[:, 0]), sp, stringit(R1), sp, stringit(L), sp)
cylinderB(p1, R1, p2) :=
    concat("_cylinder", sp, point(p1[:, 0]), sp, stringit(R1), sp, "c", sp, point(p2[:, 0]), sp) if acad_version == 2004 or 2006
    concat("_cylinder", sp, point(p1[:, 0]), sp, stringit(R1), sp, "a", sp, point(p2[:, 0]), sp) if acad_version == 2007
    concat("_cylinder", sp, point(p1[:, 0]), sp, stringit(R1), sp, "a", sp, point(p2[:, 0]), sp) if acad_version == 2008
    concat("_cylinder", sp, point(p1[:, 0]), sp, stringit(R1), sp, "f", sp, point(p2[:, 0]), sp) otherwise  # error: This variable is undefined.
cylinderC(p1, R1, L) := concat("_cylinder", sp, point(p1[:, 0]), sp, stringit(R1), sp, stringit(L))
cylinderD(p1, R1, p2) :=
    concat("_cylinder", sp, point(p1[:, 0]), sp, stringit(R1), sp, "c", sp, point(p2[:, 0])) if acad_version == 2004 or 2006
    concat("_cylinder", sp, point(p1[:, 0]), sp, stringit(R1), sp, "a", sp, point(p2[:, 0])) if acad_version == 2007
    concat("_cylinder", sp, point(p1[:, 0]), sp, stringit(R1), sp, "a", sp, point(p2[:, 0])) otherwise  # error: This variable is undefined.
# Unions
unionA(p1, p2) := concat("_union", sp, point(p1[:, 0]), sp, point(p2[:, 0]), sp, sp)
unionB(p1, p2, p3, p4) := concat("_union", sp, point(p1[:, 0]), sp, point(p2[:, 0]), sp, point(p3[:, 0]), sp, point(p4[:, 0]), sp, sp)
unionC(p1, p2) := concat("_union", sp, point(p1[:, 0]), sp, point(p2[:, 0]), sp)
union_all := concat("_union", sp, "all", sp, sp)
union_allA := concat("_union", sp, "all", sp)
UnionMultiple(PointArray) :=
    one ← concat("_union", sp)
    for i ∈ 0 .. last(PointArray)
        one ← concat(one, point(PointArray[i][:, 0]), sp)
    return one
# Subtractions
subtractA(p1, p2) := concat("_subtract", sp, point(p1[:, 0]), sp, sp, point(p2[:, 0]), sp, sp)
subtractB(p1, p2, p3) := concat("_subtract", sp, point(p1[:, 0]), sp, point(p2[:, 0]), sp, sp, point(p3[:, 0]), sp, sp)
subtractC(p1, p2, p3) := concat("_subtract", sp, point(p1[:, 0]), sp, sp, point(p2[:, 0]), sp, point(p3[:, 0]), sp)
subtractD(p1, p2) := concat("_subtract", sp, point(p1[:, 0]), sp, sp, point(p2[:, 0]), sp)
subtractDall(p1) := concat("_subtract", sp, point(p1[:, 0]), sp, sp, "all", sp)
subtractH(p1, p2, p3) := concat("_subtract", sp, point(p1[:, 0]), sp, sp, point(p2[:, 0]), sp, point(p3[:, 0]), sp)
subtractJ(p1, p2, p3, p4) := concat("_subtract", sp, point(p1[:, 0]), sp, point(p2[:, 0]), sp, point(p3[:, 0]), sp, sp, point(p4[:, 0]), sp)
subtractK(p1, p2, p3) := concat("_subtract", sp, point(p1[:, 0]), sp, point(p2[:, 0]), sp, sp, point(p3[:, 0]), sp)
# Mirrors
mirror(p1, p2, p3) := concat("_mirror", sp, point(p1[:, 0]), sp, sp, point(p2[:, 0]), sp, point(p3[:, 0]), sp)
mirrorA(p1, p2, p3) := concat("_mirror", sp, point(p1[:, 0]), sp, sp, point(p2[:, 0]), sp, point(p3[:, 0]), sp, sp)
mirrorB(p1, p2, p3, p4) := concat("_mirror", sp, p1[:, 0], sp, point(p2[:, 0]), sp, sp, point(p3[:, 0]), sp, point(p4[:, 0]), sp, sp)
mirrorC(p1, p2, p3, p4) := concat("_mirror", sp, point(p1[:, 0]), sp, point(p2[:, 0]), sp, sp, point(p3[:, 0]), sp, point(p4[:, 0]), sp)
mirrorD(p1, p2, p3) := concat("_mirror", sp, point(p1[:, 0]), sp, sp, point(p2[:, 0]), sp, point(p3[:, 0]), sp, "n")
mirror3d(p1, p2) := concat("_mirror3d", sp, point(p1[:, 0]), sp, sp, "zx", sp, point(p2[:, 0]), sp, "n")
mirror3d_all(p2) := concat("_mirror3d", sp, "all", sp, sp, "zx", sp, point(p2[:, 0]), sp, "n")
mirror3dyz(p1, p2) := concat("_mirror3d", sp, point(p1[:, 0]), sp, sp, "yz", sp, point(p2[:, 0]), sp, "n")
mirror_all(p1, p2) := concat("_mirror", sp, "all", sp, sp, point(p1[:, 0]), sp, point(p2[:, 0]), sp)
mirror_allyes(p1, p2) := concat("_mirror", sp, "all", sp, sp, point(p1[:, 0]), sp, point(p2[:, 0]), sp, "y")
# Torus
torus(p1, R1, R2) := concat("_torus", sp, point(p1[:, 0]), sp, stringit(R1), sp, stringit(R2), sp)
# Box
box(p1, p2) := concat("_box", sp, point(p1[:, 0]), sp, point(p2[:, 0]))
boxA(p1, p2) := concat("_box", sp, point(p1[:, 0]), sp, point(p2[:, 0]), sp)
# Zoom
zoom := concat("_zoom", sp, "e", sp)
zoomA := concat("_zoom", sp, "e")
zoom_win(p1, p2) := concat("_zoom", sp, "w", sp, point(p1[:, 0]), sp, point(p2[:, 0]))
zoom_wina(p1, p2) := concat("_zoom", sp, "w", sp, point(p1[:, 0]), sp, point(p2[:, 0]), sp)
# Union
bigunion_elbow(p1, p2, p3, R1, R2) := concat("_union", sp, point(p1[:, 0]), sp, "1", sp, "@", stringit(R1 + R2), "<45", sp, point(p2[:, 0]), sp, point(p3[:, 0]), sp)
bigunion(p1, p2, p3, p4) := concat("_union", sp, point(p1[:, 0]), sp, point(p2[:, 0]), sp, point(p3[:, 0]), sp, point(p4[:, 0]), sp, sp)
bigunionA(p1, p2, p3, p4) := concat("_union", sp, point(p1[:, 0]), sp, point(p2[:, 0]), sp, point(p3[:, 0]), sp, point(p4[:, 0]), sp)
# Copy
copyA(p1, p2, p3, p4) := concat("_copy", sp, point(p1[:, 0]), sp, sp, point(p2[:, 0]), sp, point(p3[:, 0]), sp, point(p4[:, 0]), sp)
copyB(p1, p2, p3) := concat("_copy", sp, point(p1[:, 0]), sp, sp, point(p2[:, 0]), sp, point(p3[:, 0]), sp)
copyC(p1, p2, p3, p4) := concat("_copy", sp, point(p1[:, 0]), sp, sp, point(p2[:, 0]), sp, "@", point(p3[:, 0]), sp, "@", point(p4[:, 0]), sp)
copyD(p1, p2, p3, p4, p5) := concat("_copy", sp, point(p1[:, 0]), sp, sp, point(p2[:, 0]), sp, "@", point(p3[:, 0]), sp, "@", point(p4[:, 0]), sp, "@", point(p5[:, 0]), sp)
copyDa(p1, p2, p3, p4, p5) := concat("_copy", sp, point(p1[:, 0]), sp, sp, point(p2[:, 0]), sp, point(p3[:, 0]), sp, point(p4[:, 0]), sp, point(p5[:, 0]), sp)
copyE(p1, p2, p3, p4, p5, p6) := concat("_copy", sp, point(p1[:, 0]), sp, sp, point(p2[:, 0]), sp, "@", point(p3[:, 0]), sp, "@", point(p4[:, 0]), sp, "@", point(p5[:, 0]), sp, "@", point(p6[:, 0]), sp)
copyF(p1, p2, p3) := concat("_copy", sp, point(p1[:, 0]), sp, sp, point(p2[:, 0]), sp, "@", point(p3[:, 0]), sp)
copyG(p1, p2, p3, p4) := concat("_copy", sp, point(p1[:, 0]), sp, point(p2[:, 0]), sp, sp, point(p3[:, 0]), sp, point(p4[:, 0]), sp)
copy_all(p1, p2) := concat("_copy", sp, "all", sp, sp, point(p1[:, 0]), sp, "@", point(p2[:, 0]), sp)
# Move
move(p1, p2, p3) := concat("_move", sp, point(p1[:, 0]), sp, sp, point(p2[:, 0]), sp, "@", point(p3[:, 0]))
move_all(p1, p2) := concat("_move", sp, "all", sp, sp, point(p1[:, 0]), sp, point(p2[:, 0]))
move_allD(p1) := concat("_move", sp, "all", sp, sp, "d", sp, point(p1[:, 0]))
# Array
array(p1, nrow, ncol, distorifice) := concat("-array", sp, point(p1[:, 0]), sp, sp, "R", sp, stringit_nounits(nrow), sp, stringit_nounits(ncol), sp, stringit(distorifice), sp)
arrayA(p1, p2, nitem, angle) := concat("-array", sp, point(p1[:, 0]), sp, sp, "P", sp, point(p2[:, 0]), sp, stringit_nounits(nitem), sp, stringit_nounits(angle), sp, "Y")
arrayB(p1, nrow, ncol, distorifice) := concat("-array", sp, point(p1[:, 0]), sp, sp, "R", sp, stringit_nounits(nrow), sp, stringit_nounits(ncol), sp, stringit(distorifice))
array2D(p1, p2, nrow, ncol, drow, dcol) := concat("-array", sp, point(p1[:, 0]), sp, point(p2[:, 0]), sp, sp, "R", sp, stringit_nounits(nrow), sp, stringit_nounits(ncol), sp, stringit(drow), sp, stringit(dcol))
array_all(nrow, ncol, dist) := concat("-array", sp, "all", sp, sp, "R", sp, stringit_nounits(nrow), sp, stringit_nounits(ncol), sp, stringit(dist))
# Rotate
rotate_3d(p1, p2, axis, ϕ) := concat("_rotate3d", sp, point(p1[:, 0]), sp, sp, axis, sp, point(p2[:, 0]), sp, stringit_nounits(ϕ))
rotate_3dA(p1, p2, p3, axis, ϕ) := concat("_rotate3d", sp, point(p1[:, 0]), sp, point(p2[:, 0]), sp, sp, axis, sp, point(p3[:, 0]), sp, stringit_nounits(ϕ))
rotate_3d1(p1, p2, axis, ϕ) := concat("_rotate3d", sp, point(p1[:, 0]), sp, sp, axis, sp, point(p2[:, 0]), sp, stringit_nounits(ϕ), sp)
rotate(p1, ϕ) := concat("_rotate", sp, point(p1[:, 0]), sp, sp, point(p1[:, 0]), sp, stringit_nounits(ϕ))
rotate_All(p1, ϕ) := concat("_rotate", sp, "all", sp, sp, point(p1[:, 0]), sp, stringit_nounits(ϕ))
rotate_3dAll(p1, axis, ϕ) := concat("_rotate3d", sp, "all", sp, sp, axis, sp, point(p1[:, 0]), sp, num2str(90 - ϕ/deg))
RotateGroup(GroupName, axis, p1, ϕ) := concat("_rotate3d", sp, "g", sp, GroupName, sp, sp, axis, sp, point(p1[:, 0]), sp, num2str(ϕ/deg))
Rotate3DLast(RotationPoint, axis, ϕ) := concat("rotate3d", sp, "l", sp, sp, axis, sp, point(RotationPoint[:, 0]), sp, stringit_nounits(ϕ/deg))
# Group
# The GroupName argument must be given with quotes around it!
# This will only work if the group already exists!
GroupAll(GroupName) :=
    one ← concat("-group", sp, "c", sp, GroupName, sp, "y", sp)
    two ← concat("all", sp)
    three ← stack(one, two)
    three
Group(GroupName, p1) :=
    one ← concat("-group", sp, "c", sp, GroupName, sp)
    two ← concat(point(p1[:, 0]), sp)
    return stack(one, two)
ExplodeGroup(GroupName) := concat("-group", sp, "e", sp, GroupName, sp)
CopyGroup(GroupName, BasePoint, ArrayOfCopyPoints) :=
    one ← concat("_copy", sp, "g", sp, GroupName, sp, sp, point(BasePoint[:, 0]), sp)
    for i ∈ 0 .. last(ArrayOfCopyPoints)
        one ← stack(one, point(ArrayOfCopyPoints[i][:, 0]), sp)
    one ← stack(one, concat("e", sp))
    return one
GroupAdd(GroupName, ArrayOfGroupsToAdd) :=
    one ← concat("-group", sp, "a", sp, GroupName, sp)
    for i ∈ 0 .. last(ArrayOfGroupsToAdd)
        one ← stack(one, "g", sp, ArrayOfGroupsToAdd[i], sp)
    one ← stack(one, sp)
    return one
SelectionStyle(type) := concat("_pickstyle", sp, stringit_nounits(type))
# type = 1 sets to group selection
# type = 0 sets to individual selection
GroupLast(GroupName) :=
    one ← concat("-group", sp, "c", sp, GroupName, sp, "y", sp)
    two ← concat("l", sp)
    three ← stack(one, two)
    three
# Layer
layer_new(title, color) :=
    one ← concat("-layer", sp, "m", sp, title)
    two ← concat("c", sp, "t", sp, point_nounits(color[:, 0]))
    three ← concat(title)
    four ← concat(sp, sp)
    tot ← stack(one, two, three, four)
    return tot
layer_set(title) :=
    one ← concat("-layer", sp, "s", sp, title)
    two ← concat(sp, sp)
    tot ← stack(one, two)
    return tot
layer_new1(title, color) :=
    one ← concat("-layer", sp, "m", sp, title)
    two ← concat("c", sp, "c", sp, point_nounits(color[:, 0]))
    three ← concat(title)
    four ← concat(sp, sp)
    tot ← stack(one, two, three, four)
    return tot
layer_freeze(title) :=
    one ← concat("-layer", sp, "f", sp, title)
    two ← concat(sp, sp)
    tot ← stack(one, two)
    return tot
layer_thaw(title) :=
    one ← concat("-layer", sp, "t", sp, title)
    two ← concat(sp, sp)
    tot ← stack(one, two)
    return tot
# Wrapped Functions
SelectLayer(LayerName) := stack(layer_thaw(LayerName), layer_set(LayerName))
FreezeLayer(LayerName) := stack(GroupAll(LayerName), layer_set("0"), layer_freeze(LayerName))
SubtractF(GroupsToSubtractFrom, GroupToSubtract) :=
    for i ∈ 0 .. last(GroupsToSubtractFrom)
        local ← stack(local, layer_thaw(GroupsToSubtractFrom[i]))
    local ← stack(local, "_subtract")
    for i ∈ 0 .. last(GroupsToSubtractFrom)
        local ← stack(local, concat("g", sp, GroupsToSubtractFrom[i]))
    local ← stack(local, concat(sp, "g", sp, GroupToSubtract, sp))
    for i ∈ 0 .. last(GroupsToSubtractFrom)
        local ← stack(local, layer_freeze(GroupsToSubtractFrom[i]))
    local
# GroupsToSubtractFrom must be defined as an array, even if it only has one value!! The group names must be entered with quotes around them.
# Pline
pline(p1, p2, p3) := concat("_pline", sp, point(p1[:, 0]), sp, point(p2[:, 0]), sp, point(p3[:, 0]), sp, point(p1[:, 0]), sp)
pline10(p1, p2, p3, p4, p5, p6, p7, p8, p9) := concat("_pline", sp, point(p1[:, 0]), sp, point(p2[:, 0]), sp, point(p3[:, 0]), sp, point(p4[:, 0]), sp, point(p5[:, 0]), sp, point(p6[:, 0]), sp, point(p7[:, 0]), sp, point(p8[:, 0]), sp, point(p9[:, 0]), sp, point(p1[:, 0]), sp)
Pline(PointArray) :=
    one ← concat("_pline")
    for i ∈ 0 .. last(PointArray)
        one ← stack(one, point(PointArray[i][:, 0]))
    return stack(one, "")
# Extrude
extrudeA(p1, L, ataper) := concat("_extrude", sp, point(p1[:, 0]), sp, sp, stringit(L), sp, stringit(0), sp, sp)
extrude(p1, L) :=
    concat("_extrude", sp, point(p1[:, 0]), sp, sp, stringit(L), sp) if acad_version == 2006
    concat("_extrude", sp, point(p1[:, 0]), sp, sp, stringit(L)) if acad_version == 2008
    concat("_extrude", sp, point(p1[:, 0]), sp, sp, stringit(L)) otherwise  # error: This variable is undefined.
# Erase
EraseAll := concat("_.erase", sp, "all", sp, sp)
# Block
block(title, bp, ip) :=
    one ← concat("-block", sp, title)
    two ← concat(point(bp[:, 0]), sp, "all", sp)
    three ← concat("-insert", sp, title)
    four ← concat(point(ip[:, 0]), sp)
    five ← concat(sp)
    tot ← stack(one, two, three, four, five)
    return tot
# Rectangle
rectangle(rectangle_dim) := concat("_rectangle", sp, point(rectangle_dim[:, 0]), sp, point(rectangle_dim[:, 1]))
# Slice
slice(p1, p2, kp) := concat("_slice", sp, point(p1[:, 0]), sp, sp, "o", sp, point(p2[:, 0]), sp, point(kp[:, 0]))
slice_both(p1, p2, kp) := concat("_slice", sp, point(p1[:, 0]), sp, sp, "o", sp, point(p2[:, 0]), sp, "b")
# Explode
explode(p1) := concat("_explode", sp, point(p1[:, 0]), sp)
# Erase
erase(p1) := concat("_erase", sp, point(p1[:, 0]), sp)
erase_all := concat("_erase", sp, "all", sp)
# Wedge
wedge(p1, p2, h) := concat("_wedge", sp, point(p1[:, 0]), sp, point(p2[:, 0]), sp, stringit(h))
wedge3d(p1, p2) := concat("_wedge", sp, point(p1[:, 0]), sp, point(p2[:, 0]))
# Miscellaneous
cleanscreen := concat("_CleanScreenON")
textbox(size, p1, p2, disclaimer) :=
    setsize ← concat("textsize", sp, stringit(size))
    one ← concat("-mtext", sp, point(p1[:, 0]), sp, point(p2[:, 0]), sp, disclaimer)
    two ← concat("")
    total ← stack(setsize, one, two)
    return total
# Insert Block
insertdwg(filepath, insertionpoint, scalefactor, AN_rotation) := stack(concat("-insert", sp, filepath), concat(point(insertionpoint[:, 0]), sp, stringit_nounits(scalefactor), sp, stringit_nounits(scalefactor), sp, stringit_nounits(AN_rotation)))
# Note: This is preliminary.  This uses a 4 in valve and scales it according to the needs of the plant being drawn.
# Wrapped Shapes
BoxF(OriginPoint, FarCorner, AngleVector, LayerName) :=
    LayerSelect ← SelectLayer(LayerName)
    Zoom ← zoom_win([OriginPoint[0] - zc; OriginPoint[1] - zc; OriginPoint[2]], [OriginPoint[0] + zc; OriginPoint[1] + zc; OriginPoint[2]])
    Box ← box(OriginPoint, FarCorner)
    Select ← SelectionStyle(0)
    RotateZ ← rotate_3d([(OriginPoint[0] - FarCorner[0])/2; (OriginPoint[1] - FarCorner[1])/2; OriginPoint[2]], [
        (OriginPoint[0] - FarCorner[0])/2;
        (OriginPoint[1] - FarCorner[1])/2;
        (OriginPoint[2] - FarCorner[2])/2
    ], "z", AngleVector[0])
    RotateY ← rotate_3d([(OriginPoint[0] - FarCorner[0])/2; (OriginPoint[1] - FarCorner[1])/2; OriginPoint[2]], [
        (OriginPoint[0] - FarCorner[0])/2;
        (OriginPoint[1] - FarCorner[1])/2;
        (OriginPoint[2] - FarCorner[2])/2
    ], "y", AngleVector[1])
    Select1 ← SelectionStyle(1)
    Freeze ← FreezeLayer(LayerName)
    Draw ←
        stack(LayerSelect, Zoom, Box, Freeze) if AngleVector[0] == 0 and AngleVector[1] == 0
        stack(LayerSelect, Zoom, Box, Select, RotateZ, Select1, Freeze) if AngleVector[0] ≠ 0 and AngleVector[1] == 0
        stack(LayerSelect, Zoom, Box, Select, RotateY, Select1, Freeze) if AngleVector[0] == 0 and AngleVector[1] ≠ 0
        stack(LayerSelect, Zoom, Box, Select, RotateZ, RotateY, Select1, Freeze) otherwise
    return Draw
BoxSUBF(OriginPoint, FarCorner, AngleVector, LayerName, SubtractionLayers) :=
    Set ← layer_set("0")
    Zoom ← zoom_win([OriginPoint[0] - zc; OriginPoint[1] - zc; OriginPoint[2]], [OriginPoint[0] + zc; OriginPoint[1] + zc; OriginPoint[2]])
    Box ← box(OriginPoint, FarCorner)
    Select ← SelectionStyle(0)
    RotateZ ← rotate_3d([(OriginPoint[0] - FarCorner[0])/2; (OriginPoint[1] - FarCorner[1])/2; OriginPoint[2]], [
        (OriginPoint[0] - FarCorner[0])/2;
        (OriginPoint[1] - FarCorner[1])/2;
        (OriginPoint[2] - FarCorner[2])/2
    ], "z", AngleVector[0])
    RotateY ← rotate_3d([(OriginPoint[0] - FarCorner[0])/2; (OriginPoint[1] - FarCorner[1])/2; OriginPoint[2]], [
        (OriginPoint[0] - FarCorner[0])/2;
        (OriginPoint[1] - FarCorner[1])/2;
        (OriginPoint[2] - FarCorner[2])/2
    ], "y", AngleVector[1])
    Select1 ← SelectionStyle(1)
    Group ← GroupAll("DeleteMe")
    Shape ←
        stack(Set, Zoom, Box, Group) if AngleVector[0] == 0 and AngleVector[1] == 0
        stack(Set, Zoom, Box, Select, RotateZ, Select1, Group) if AngleVector[0] ≠ 0 and AngleVector[1] == 0
        stack(Set, Zoom, Box, Select, RotateY, Select1, Group) if AngleVector[0] == 0 and AngleVector[1] ≠ 0
        stack(Set, Zoom, Box, Select, RotateZ, RotateY, Select1, Group) otherwise
    LayerSelect ← SelectLayer(LayerName)
    Local ← stack(Shape, LayerSelect)
    for i ∈ 0 .. last(SubtractionLayers)
        Local ← stack(Local, layer_thaw(SubtractionLayers[i]))
    Local ← stack(Local, SubtractF(SubtractionLayers, "DeleteMe"))
    for i ∈ 0 .. last(SubtractionLayers)
        Local ← stack(Local, layer_freeze(SubtractionLayers[i]))
    Box ← box(OriginPoint, FarCorner)
    Freeze ← FreezeLayer(LayerName)
    return stack(Local, Box, Freeze)
