# [reference: EtFlocSedFi.xmcd]
# Mathcad to AutoCAD translators:
# The wrapped MtoA translator contains the functions that the user will want to access. These functions will draw pieces with full functionality - specifying the location, dimension, and orientation of the object. Also, it contains layer control and subtraction capabilities for grouped objects.
# Layers
PVCLayer := layer_new("PVC", ltgrey)
SteelLayer := layer_new("Steel", grey)
SelectPVCLayer := SelectLayer("PVC")
SelectSteelLayer := SelectLayer("Steel")
PVCFrz := FreezeLayer("PVC")
SteelFrz := FreezeLayer("Steel")
ThawPVC := ThawMultiple(["PVC"])
ThawSteel := ThawMultiple(["Steel"])
vscurrentXray := vscurrent("x")
UHoleLayer := layer_new("UHole", grey)
SelectUHoleLayer := SelectLayer("Uhole")
UHoleFrz := FreezeLayer("UHole")
ThawUHole := ThawMultiple(["UHole"])
# Dimensions
D_ManifoldPipe := 2 in = 5.08 cm
W_Body := 10 cm
D_SteelLoop := .5 in = 1.27 cm
T_Body := 5 cm
H_Body := 20 cm
# Unclear Dimensions
L_Pin := 8 cm
L_TopOfPinToTop := 1 cm
D_Pin := 1 cm
L_SafetySpace := 1 cm
# Assume the heights of the center of the pie fits and those of the center of the pin and Uholes are identical.
H_LBracket2 := 5 cm  # H.Extend is the extend height for top and bottom body from center body.
T_LBracket := 2 cm
W_LBracket2 := 4 cm
W_LBracket1 := 2 cm
H_Body - L_TopOfPinToTop - D_Pin - H_LBracket2 - L_SafetySpace
H_LBracket1 := H_Body - L_SafetySpace = 0.19 m
H_Extend := 10 cm
# Body
Body_Origin := [0 m; 0 m; 0 m]
Body_FarCorner := Body_Origin + [W_Body; H_Body; -T_Body]
BodyBox := Box(Body_Origin, Body_FarCorner)
# Extend Body
TopBody_Origin := [0 m; 0.2 cm + H_Body; 0 m]
TopBody_FarCorner := TopBody_Origin + [W_Body; -0.2 cm - L_TopOfPinToTop - D_Pin/2 + H_Extend; -T_Body]
TopBodyBox := Box(TopBody_Origin, TopBody_FarCorner)
BottomBody_Origin := [0 m; -0.2 cm; 0 m]
BottomBody_FarCorner := Body_Origin + [W_Body; 0.2 cm - L_TopOfPinToTop - D_Pin/2 + (-H_Extend); -T_Body]
BottomBodyBox := Box(BottomBody_Origin, BottomBody_FarCorner)
# Cutting Out Where the Pipe Fits
PipeFit_Origin := Body_Origin + [W_Body/2; H_Body - L_TopOfPinToTop - D_Pin/2; 0 m]
PipeFit := CylinderF(PipeFit_Origin, D_ManifoldPipe/2, T_Body, [0; -90; 0]*deg)
RemovePipeFit := SubtractF(["PVC"], "DeleteMe")
PipeFitBottom_Origin := Body_Origin + [W_Body/2; -L_TopOfPinToTop - D_Pin/2; 0 m]
PipeFitBottom := CylinderF(PipeFitBottom_Origin, D_ManifoldPipe/2, T_Body, [0; -90; 0]*deg)
# Chamfer Blocks: Draw and Subtract
# Need to insert commands that write AutoCAD scripts to chamfer the filter openings for smooth insertion of the pipes. Cannot use any of the chamfer or truncate commands because they require cursor selection, which is difficult to do in AutoCAD scripts meant for command insertion.
# Pin Hole
PinHole_Origin := Body_Origin + [W_Body - W_LBracket1/2; H_Body - L_TopOfPinToTop - D_Pin/2; 0 m]
PinHole := CylinderF(PinHole_Origin, D_Pin/2, T_Body, [0; -90; 0]*deg)
RemovePinHole := SubtractF(["PVC"], "DeleteMe")
PinHoleBottom_Origin := Body_Origin + [W_Body - W_LBracket1/2; -L_TopOfPinToTop - D_Pin/2; 0 m]
PinBottomHole := CylinderF(PinHoleBottom_Origin, D_Pin/2, T_Body, [0; -90; 0]*deg)
# Pin
Pin_Origin := Body_Origin + [W_Body - W_LBracket1/2; H_Body - L_TopOfPinToTop - D_Pin/2; (L_Pin - T_Body)/2]
Pin := CylinderF(Pin_Origin, D_Pin/2, L_Pin, [0; -90; 0]*deg)
PinBottom_Origin := Body_Origin + [W_Body - W_LBracket1/2; -L_TopOfPinToTop - D_Pin/2; (L_Pin - T_Body)/2]
PinBottom := CylinderF(PinBottom_Origin, D_Pin/2, L_Pin, [0; -90; 0]*deg)
# L Brackets
LBracket1_Origin := Body_Origin + [W_Body - W_LBracket1; -H_LBracket2 - D_Pin - L_TopOfPinToTop; T_LBracket]
LBracket1_FarCorner := LBracket1_Origin + [W_LBracket1; H_LBracket1; -T_LBracket]
LBracket1 := Box(LBracket1_Origin, LBracket1_FarCorner)
LBracket1B_Origin := Body_Origin + [W_Body - W_LBracket1; -H_LBracket2 - D_Pin - L_TopOfPinToTop; -T_Body]
LBracket1B_FarCorner := LBracket1B_Origin + [W_LBracket1; H_LBracket1; -T_LBracket]
LBracket1B := Box(LBracket1B_Origin, LBracket1B_FarCorner)
LBracket2_Origin := Body_Origin + [W_Body - W_LBracket1; -H_LBracket2 - D_Pin - L_TopOfPinToTop + H_Body; T_LBracket]
LBracket2_FarCorner := LBracket2_Origin + [W_LBracket1; D_Pin + L_TopOfPinToTop + H_Extend; -T_LBracket]
LBracket2 := Box(LBracket2_Origin, LBracket2_FarCorner)
LBracket2B_Origin := Body_Origin + [W_Body - W_LBracket1; -H_LBracket2 - D_Pin - L_TopOfPinToTop + H_Body; -T_Body]
LBracket2B_FarCorner := LBracket2B_Origin + [W_LBracket1; D_Pin + L_TopOfPinToTop + H_Extend; -T_LBracket]
LBracket2B := Box(LBracket2B_Origin, LBracket2B_FarCorner)
# L Bracket U Holes
UHoleCircle_Origin := Body_Origin + [W_Body - W_LBracket1/2; -L_TopOfPinToTop - D_Pin/2; T_LBracket]
UHoleCircle := CylinderF(UHoleCircle_Origin, D_Pin/2, 2*T_LBracket + T_Body, [0; -90; 0]*deg)
RemoveUHole := SubtractF(["Steel"], "DeleteMe")
UHolePrism_Origin := Body_Origin + [W_Body - W_LBracket1/2; -L_TopOfPinToTop; T_LBracket]
UHolePrism_FarCorner := UHolePrism_Origin + [-W_LBracket1/2; -D_Pin; -2*T_LBracket - T_Body]
UHolePrism := Box(UHolePrism_Origin, UHolePrism_FarCorner)
UHoleCircle2_Origin := Body_Origin + [W_Body - W_LBracket1/2; H_Body - L_TopOfPinToTop - D_Pin/2; T_LBracket]
UHoleCircle2 := CylinderF(UHoleCircle2_Origin, D_Pin/2, 2*T_LBracket + T_Body, [0; -90; 0]*deg)
UHolePrism2_Origin := Body_Origin + [W_Body - W_LBracket1/2; H_Body - L_TopOfPinToTop; T_LBracket]
UHolePrism2_FarCorner := UHolePrism2_Origin + [-W_LBracket1/2; -D_Pin; -2*T_LBracket - T_Body]
UHolePrism2 := Box(UHolePrism2_Origin, UHolePrism2_FarCorner)
# Stack MathCAD Scripts
PVCBody_Script := stack(PVCLayer, BodyBox, PVCFrz, SelectPVCLayer, TopBodyBox, PVCFrz, SelectPVCLayer, BottomBodyBox, PVCFrz, SelectPVCLayer, PipeFit, GroupDelete, RemovePipeFit, PVCFrz, SelectPVCLayer, PipeFitBottom, GroupDelete, RemovePipeFit, PVCFrz, SelectPVCLayer, PinHole, GroupDelete, RemovePinHole, PVCFrz, SelectPVCLayer, PinBottomHole, GroupDelete, RemovePinHole, PVCFrz)
LBracket_Script := stack(SteelLayer, LBracket1, Union_All, SteelFrz, SelectSteelLayer, LBracket1B, Union_All, SteelFrz, SelectSteelLayer, LBracket2, Union_All, SteelFrz, SelectSteelLayer, LBracket2B, Union_All, SteelFrz, SelectSteelLayer, UHoleCircle, GroupDelete, RemoveUHole, SteelFrz, SelectSteelLayer, UHolePrism, GroupDelete, RemoveUHole, SteelFrz, SelectSteelLayer, UHoleCircle2, GroupDelete, RemoveUHole, SteelFrz, SelectSteelLayer, UHolePrism2, GroupDelete, RemoveUHole, SteelFrz)
Pin_Script := stack(SteelLayer, Pin, SteelFrz, sp, SelectSteelLayer, PinBottom, SteelFrz, ThawPVC, ThawSteel, vscurrentXray)
Spacer_Script := stack(PVCBody_Script, LBracket_Script, Pin_Script)
# [component: inputs Spacer_Script]
PVCBody_Script := stack(PVCLayer, BodyBox, PVCFrz, SelectPVCLayer, TopBodyBox, PVCFrz, SelectPVCLayer, BottomBodyBox, PVCFrz, SelectPVCLayer, PipeFit, GroupDelete, RemovePipeFit, PVCFrz, SelectPVCLayer, PipeFitBottom, GroupDelete, RemovePipeFit, PVCFrz, SelectPVCLayer, PinHole, GroupDelete, RemovePinHole, PVCFrz, SelectPVCLayer, PinBottomHole, GroupDelete, RemovePinHole, PVCFrz)
Pin_Script := stack(SteelLayer, Pin, SteelFrz, SelectSteelLayer, PinBottom, SteelFrz)
LBracket_Script := stack(SteelLayer, LBracket1, Union_All, SteelFrz, SelectSteelLayer, LBracket1B, Union_All, SteelFrz, SelectSteelLayer, UHoleCircle, GroupDelete, RemoveUHoleCircle, SteelFrz, SelectSteelLayer, UHolePrism, GroupDelete, RemoveUHolePrism, SteelFrz, ThawPVC, ThawSteel, vscurrentXray)  # error: This variable is undefined.
Spacer_Script := stack(PVCBody_Script, Pin_Script, LBracket_Script)  # error: This variable is undefined.
