# [reference: EtFlocSedFi.xmcd]
# Mathcad to AutoCAD translators:
# The wrapped MtoA translator contains the functions that the user will want to access. These functions will draw pieces with full functionality - specifying the location, dimension, and orientation of the object. Also, it contains layer control and subtraction capabilities for grouped objects.
# Layers
WoodLayer := layer_new("Wood", ltgrey)
SteelLayer := layer_new("Steel", grey)
SelectWoodLayer := SelectLayer("Wood")
SelectSteelLayer := SelectLayer("Steel")
WoodFrz := FreezeLayer("Wood")
SteelFrz := FreezeLayer("Steel")
ThawWood := ThawMultiple(["Wood"])
ThawSteel := ThawMultiple(["Steel"])
vscurrentXray := vscurrent("x")
# Dimensions
W_Steel := 64 cm
W_LBody := 116 cm
T_Body := 5 cm
H_SteelSide := 4 cm
H_Body := 23 cm
T_SteelSide := 0.5 cm
W_RBody := 24 cm
# Left Body
Body_Origin := [0 m; 0 m; 0 m]
LBody_FarCorner := Body_Origin + [W_LBody; H_Body; -T_Body]
LBodyBox := Box(Body_Origin, LBody_FarCorner)
# Right Body
RBody_Origin := [W_LBody + 1 cm; 0 m; 0 m]
RBody_FarCorner := RBody_Origin + [W_RBody; H_Body; -T_Body]
RBodyBox := Box(RBody_Origin, RBody_FarCorner)
# Insert Hinge
# Need to figure out filepath and then the other four factors to insert the drawing.
Hinge := insertdwg(filepath, insertionpoint, Xscalefactor, Yscalefactor, 0 deg)  # error: This variable is undefined.
RotateHing := Rotate3DLast(RotationPoint, axis, angle)  # error: This variable is undefined.
# Steel Sides
# Need clarificaiton on documents. Thinking of drawing two boxes and subtracting wth the wooden box in steel layer.kee in mind that the steel components are gapped.
SteelStrip_Origin := RBody_FarCorner + [-9 cm; T_SteelSide; T_Body]
SteelStip_FarCorner := SteelStrip_Origin + [-W_Steel; -H_SteelSide; T_Body]
# Stack MathCAD Scripts
WoodBody_Script := stack(WoodLayer, LBodyBox, WoodFrz, SelectWoodLayer, RBodyBox, WoodFrz, ThawWood)
Platform_Script := stack(WoodBody_Script)
# [component: inputs Platform_Script]
