# DRAIN WALKWAY
# Walkway 1 (the walkway on the right side of the plant)
# ASSUMPTIONS
H_Walkway := 50 cm  # Distance from the top border of the wall
T_Walkway := 30 cm  # Thickness of the walkway (z dimension)
W_Walkway := 1.5 m  # Walkway width, walking area (x dimension)
# ORIGIN POINTS
Walkway_Origin := [Plant_Origin[0] + T_PlantWall; Plant_Origin[1]; H_Sed - H_Walkway]
# The walkway origin is located at the left corner of the Sed Tank (Opposite corner to the plant origin), outside the wall.
# DIMENSION POINTS
Walkway_Dimensions := [
    W_Walkway;
    (W_FlocChannel*N_FlocChannels) + (T_PlantWall*(N_FlocChannels + 1)) + N_SedTanks*W_Sed + T_PlantWall*(N_SedTanks - 1);
    T_Walkway
]  # Includes the width of all Sed and Floc tanks in one long walkway.
Drainboxes_Dimensions := [3*D_SedDrainValve; 2*D_SedDrainValve; T_Walkway]
FlocDrainboxes_Dimensions := [3*D_FlocValve; 2*D_FlocValve; T_Walkway]
# WALKWAY SCRIPT
Walkway_Script :=
    WalkwayLayer ← layer_new("Walkway", grey)
    WalkwayBox ← BoxF(Walkway_Origin, Walkway_Origin + Walkway_Dimensions, [0; 0; 0]*deg)
    FreezeWalkwayBox ← FreezeLayer("Walkway")
    Total ← stack(WalkwayLayer, WalkwayBox, FreezeWalkwayBox)
    for i ∈ 0 .. N_SedBays - 1
        Total ← stack(Total, BoxF([
            Plant_Origin[0] + T_PlantWall;
            W_SedBay*(N_SedBays - i) - 0.5*W_SedBay - D_SedDrainValve;
            Walkway_Origin[2]
        ], [
            Plant_Origin[0] + T_PlantWall;
            W_SedBay*(N_SedBays - i) - 0.5*W_SedBay - D_SedDrainValve;
            Walkway_Origin[2]
        ] + Drainboxes_Dimensions, [0; 0; 0]*deg))
    Total ← stack(Total, array_all(N_SedTanks, 1, W_SedBay*N_SedBays + T_PlantWall)) if N_SedTanks ≠ 1
    for j ∈ 0 .. last(Y_FlocDrainValves)
        Total ← stack(Total, BoxF([Plant_Origin[0] + T_PlantWall; Y_FlocDrainValves[j] - D_FlocValve; Walkway_Origin[2]], [Plant_Origin[0] + T_PlantWall; Y_FlocDrainValves[j] - D_FlocValve; Walkway_Origin[2]] + FlocDrainboxes_Dimensions, [0; 0; 0]*deg))
    Group ← GroupAll("DeleteMe")
    Subtract ← SubtractF(["Walkway"], "DeleteMe")
    Final ← stack(Total, Group, Subtract)
# Walkway 2 (Next to the entrance tank)
# Assumptions
S_Walkway := 1.5 m
# ORIGIN POINTS:
Walkway2_Origin := [
    Plant_Origin[0] + T_PlantWall + W_Walkway;
    Plant_Origin[1] + Walkway_Dimensions[1];
    H_Sed - H_Walkway
]
# DIMENSION POINTS:
Walkway2_Dimensions := [
    -(L_Et + W_Walkway);
    Et_Origin[1] - (Plant_Origin[1] + W_SedBay*N_SedBays*N_SedTanks + W_FlocChannel*N_FlocChannels + (N_SedTanks + N_FlocChannels + 1)*T_PlantWall);
    T_Walkway
]
# WALKWAY2 SCRIPT
Walkway2_Script :=
    ThawWalkwayBox ← SelectLayer("Walkway")
    WalkwayBox2 ← BoxF(Walkway2_Origin, Walkway2_Origin + Walkway2_Dimensions, [0; 0; 0]*deg)
    FreezeWalkwayBox ← FreezeLayer("Walkway")
    Total ← stack(ThawWalkwayBox, WalkwayBox2, FreezeWalkwayBox)
# PIPE PATH (space for the RM Pipe going through the walkway)
# ORIGIN POINT
PipePath_Origin := [RMTee_Origin[0] - ID_RMPipe; Et_Origin[1] - T_PlantWall; Walkway2_Origin[2]]
# DIMENSION POINTS:
PipePath_Dimensions := [2*ID_RMPipe; -3*ID_RMPipe; T_Walkway]
# PIPE PATH SCRIPT
PipePath_Script :=
    PipePathBox ← BoxF(PipePath_Origin, PipePath_Origin + PipePath_Dimensions, [0; 0; 0]*deg)
    Mirror ← Mirror3dAll("YZ", [Plant_Origin[0] - 1/2*L_Sed; 0 m; 0 m], "Y")
    Total ←
        PipePathBox if mod(N_FlocChannels, 2) == 1
        stack(PipePathBox, Mirror) otherwise
    Group ← GroupAll("DeleteMe")
    Subtract ← SubtractF(["Walkway"], "DeleteMe")
    Final ← stack(Total, Group, Subtract)
    return Final
# COAGULANT PLATFORM
# ASSUMPTIONS
S_BetweenTanks := R_CoagTank  # Distance between alum tanks
S_Operator := 1 m
# Distance between the tanks and the stairs.
# Space for operator mobility.
# DIMENSION POINTS
Ap_Dimensions := [
    (4*R_CoagTank + 4*T_ChemTankWall) + 3*S_BetweenTanks;
    2*(R_CoagTank + T_ChemTankWall) + S_ChemTankBorder + S_Operator;
    -(CoagTank_Origin[2] - T_ChemTankWall - (H_Sed - H_Walkway))
]
T_PlantWall =  # error: This variable is undefined.
H_Total := CoagTank_Origin[2] - T_ChemTankWall - (H_Sed - H_Walkway)
W_Total := Ap_Dimensions[1]
# ORIGIN POINTS
Ap_Origin := [
    CoagTank_Origin[0] - 3*(R_CoagTank + T_ChemTankWall) - 2*S_BetweenTanks;
    Et_Origin[1] - T_PlantWall;
    CoagTank_Origin[2] - T_ChemTankWall
]  # The platform origin is located in the left corner at the back (where there are not stairs)
# The stairs origin is located in the left corner at the front of the platform
Stairs_Origin := Ap_Origin
# PLATFORM SCRIPT
ApScript :=
    AlumPlatformLayer ← layer_new("AlumPlatform", grey)
    Stairs ← Stairs(Stairs_Origin, W_Total, H_Total, 180 deg)
    PlatformBox ← BoxF(Ap_Origin, Ap_Origin + Ap_Dimensions, [0; 0; 0]*deg)
    Mirror ← Mirror3dAll("YZ", [Plant_Origin[0] - 1/2*L_Sed; 0 m; 0 m], "Y")
    FreezePlatformBox ← FreezeLayer("AlumPlatform")
    Final ←
        stack(AlumPlatformLayer, Stairs, PlatformBox, FreezePlatformBox) if mod(N_FlocChannels, 2) == 0
        stack(AlumPlatformLayer, Stairs, PlatformBox, Mirror, FreezePlatformBox) otherwise
    return Final
# If the number of flocculator channels is even,
# the platform will be mirrored.
# Chlorine Tank Platform
# ASSUMPTIONS
# Since R.ChlorineTank is smaller than
# R.CoagTank, the dimension of the platform
# is smaller than that of the coag tank platform
ChlorineTank_origin := [
    Et_Origin[0] - L_Et - T_PlantWall - 1/2*R_ChlorineTank - 3*T_ChemTankWall - S_ChemTankBorder - S_BetweenTanks;
    Plant_Origin[1] + 0.5*(R_ChlorineTank + T_ChemTankWall) - S_Walkway;
    CoagTank_Origin[2]
]
S_BetweenTanksChlorine := R_ChlorineTank
# DIMENSION POINTS
Cp_Dimensions := [
    (4*R_ChlorineTank + 4*T_ChemTankWall) + 3*S_BetweenTanksChlorine;
    2*(R_ChlorineTank + T_ChemTankWall) + S_ChemTankBorder + S_Operator;
    -(ChlorineTank_origin[2] - T_ChemTankWall - (H_Sed - H_Walkway))
]
H_ChlorineTotal := ChlorineTank_origin[2] - T_ChemTankWall - (H_Sed - H_Walkway)
W_ChlorineTotal := Cp_Dimensions[1]
# ORIGIN POINTS
Cp_Origin := [
    ChlorineTank_origin[0] - 3/2*(R_ChlorineTank + T_ChemTankWall) - S_BetweenTanksChlorine + R_ChlorineTank;
    Plant_Origin[1] - T_PlantWall - S_Walkway;
    ChlorineTank_origin[2] - T_ChemTankWall
]
Stairs_ChlorineOrigin := Cp_Origin
# PLATFORM SCRIPT
CpScript :=
    ChlorinePlatformLayer ← layer_new("ChlorinePlatform", grey)
    ChlorineStairs ← Stairs(Stairs_ChlorineOrigin, W_ChlorineTotal, H_ChlorineTotal, 180 deg)
    ChlorinePlatformBox ← BoxF(Cp_Origin, Cp_Origin + Cp_Dimensions, [0; 0; 0]*deg)
    Mirror ← Mirror3dAll("YZ", [Plant_Origin[0] - 1/2*L_Sed; 0 m; 0 m], "Y")
    FreezeChlorinePlatformBox ← FreezeLayer("ChlorinePlatform")
    Final ←
        stack(ChlorinePlatformLayer, ChlorineStairs, ChlorinePlatformBox, FreezeChlorinePlatformBox) if mod(N_FlocChannels, 2) == 0
        stack(ChlorinePlatformLayer, ChlorineStairs, ChlorinePlatformBox, Mirror, FreezeChlorinePlatformBox) otherwise
    return Final
ChlorineTankscript :=
    layernew ← layer_new("chlorinetanks", grey)
    viewtop ← viewtop1
    outertankwall ← cylinderC(ChlorineTank_origin, R_ChlorineTank + T_ChemTankWall, H_ChlorineTank + T_ChemTankWall)
    innertankwall ← cylinderC([ChlorineTank_origin[0]; ChlorineTank_origin[1]; ChlorineTank_origin[2] + T_ChemTankWall], R_ChlorineTank, H_ChlorineTank)
    viewtop ← viewtop1
    subtract ← subtractD([
        ChlorineTank_origin[0] - (R_ChlorineTank + T_ChemTankWall);
        ChlorineTank_origin[1];
        ChlorineTank_origin[2]
    ], [ChlorineTank_origin[0] - R_ChlorineTank; ChlorineTank_origin[1]; ChlorineTank_origin[2]])
    SecondTank ← Mirror3dAll("YZ", [ChlorineTank_origin[0] + (R_ChlorineTank + T_ChemTankWall); 0 m; 0 m] + 0.5*S_BetweenTanks, "N")
    union ← union_allA
    layerset0 ← layer_set("0")
    Mirror ← Mirror3dAll("YZ", [Plant_Origin[0] - 1/2*L_Sed; 0 m; 0 m], "Y")
    layerfreeze ← layer_freeze("chlorinetanks")
    Final ←
        stack(layernew, viewtop, outertankwall, innertankwall, viewtop, subtract, SecondTank, union, layerset0, Mirror, layerfreeze) if mod(N_FlocChannels, 1) == 0
        stack(layernew, viewtop, outertankwall, innertankwall, viewtop, subtract, SecondTank, union, layerset0, Mirror, layerfreeze) otherwise
    return Final
AC_OperatorAccess := stack(ApScript, Walkway_Script, Walkway2_Script, PipePath_Script, CpScript)
Trial := stack(AC_OperatorAccess, AC_EntranceTank, ChlorineTankscript)
# [component: inputs Trial]
