# Operator Access
# Chemical Platform
# Width and length of the chemical platform are defined in ChemStockTanksAC
ChemPlatform_Origin := [
    CoagTank_Origin[0] + R_CoagTank + T_ChemTankWall + S_ChemTankBorder - L_EtChemPlatform;
    Et_Origin[1] + W_Et + T_PlantWall - W_EtChemPlatform;
    CoagTank_Origin[2] - T_ChemTankWall - T_PlantWall
]
ChemPlatform_Dimensions := [L_EtChemPlatform; W_EtChemPlatform; T_PlantWall]
ChemPlatformWall_Origin := [
    ChemPlatform_Origin[0] + L_EtChemPlatform - T_PlantWall;
    ChemPlatform_Origin[1];
    Plant_Origin[2] + H_Sed - H_WalkwayToTankWall
]
ChemPlatformWall_Dimensions := [
    T_PlantWall;
    W_EtChemPlatform;
    CoagTank_Origin[2] - T_ChemTankWall - H_Sed + H_WalkwayToTankWall - T_PlantWall
]
H_ChemStairs := CoagTank_Origin[2] - T_ChemTankWall - H_Sed + H_WalkwayToTankWall
W_ChemStairs := W_EtChemPlatform
ChemStairs_Origin := ChemPlatform_Origin + [0 m; 0 m; ChemPlatform_Dimensions[2]]
OpAccessLayer := layer_new("OpWalkwayCon", grey)
PlatformStairs := Stairs(ChemStairs_Origin, W_ChemStairs, H_ChemStairs, 180 deg)
PlatformBox := BoxF(ChemPlatform_Origin, ChemPlatform_Origin + ChemPlatform_Dimensions, [0; 0; 0]*deg)
PlatformWall := BoxF(ChemPlatformWall_Origin, ChemPlatformWall_Origin + ChemPlatformWall_Dimensions, [0; 0; 0]*deg)
UnionPlatform1 := Union_All
FreezeEtWalkway := FreezeLayer("OpWalkwayCon")
R_Hole := outerdiameter(AvailND[index2(ND_CoagPiping, AvailND) + 1])/2
L_MaleInsertToHoleCenter := ElbowRadius(ND_CoagPiping) + L_BallValve + L_FirstPipe + L_SecondPipe
SubtractDrainWallBox := BoxF([
    ChemPlatformWall_Origin[0];
    ChemPlatform_Origin[1] + 0.5*W_EtChemPlatform - L_PlatformDrainHole;
    ChemPlatformWall_Origin[2]
], [
    ChemPlatformWall_Origin[0] + T_PlantWall;
    ChemPlatform_Origin[1] + 0.5*W_EtChemPlatform + L_PlatformDrainHole;
    ChemPlatformWall_Origin[2] + W_PlatformHole
], [0; 0; 0]*deg)
SubtractDoseWallBox := BoxF(ChemWallHole_Origin, [
    ChemPlatformWall_Origin[0] + T_PlantWall;
    ChemPlatformWall_Origin[1] + 3*L_PlatformHole;
    ChemPlatform_Origin[2]
], [0; 0; 0]*deg)
SubtractCoagDrainPipe := CylinderF(CoagTank_Origin - [0 m; 0 m; T_ChemTankWall], R_Hole, T_PlantWall, [0; 270]*deg)
SubtractCoagDosePipe := CylinderF(CoagTank_Origin + [
    -sqrt(2)/2*(R_CoagTank + T_ChemTankWall + L_BulkheadFittingEnd + L_MaleInsertEnd + L_MaleInsertToHoleCenter);
    -sqrt(2)/2*(R_CoagTank + T_ChemTankWall + L_BulkheadFittingEnd + L_MaleInsertEnd + L_MaleInsertToHoleCenter);
    -T_ChemTankWall
], R_Hole, T_PlantWall, [0; 270]*deg)
SubtractCoag2DrainPipe := CylinderF(CoagTank_Origin + [0 m; 2*R_CoagTank + 2*T_ChemTankWall + 2*S_ChemTankBorder - W_EtChemPlatform; -T_ChemTankWall], R_Hole, T_PlantWall, [0; 270]*deg)
SubtractCoag2DosePipe := CylinderF(CoagTank_Origin + [0 m; 2*R_CoagTank + 2*T_ChemTankWall + 2*S_ChemTankBorder - W_EtChemPlatform; -T_ChemTankWall] + [
    -sqrt(2)/2*(R_CoagTank + T_ChemTankWall + L_BulkheadFittingEnd + L_MaleInsertEnd + L_MaleInsertToHoleCenter);
    sqrt(2)/2*(R_CoagTank + T_ChemTankWall + L_BulkheadFittingEnd + L_MaleInsertEnd + L_MaleInsertToHoleCenter);
    0 m
], R_Hole, T_PlantWall, [0; 270]*deg)
SubtractChlorDrainPipe := CylinderF(ChlorineTank_Origin - [0 m; 0 m; T_ChemTankWall], R_Hole, T_PlantWall, [0; 270]*deg)
SubtractChlorDosePipe := CylinderF(ChlorineTank_Origin + [
    0 m;
    -(R_ChlorineTank + T_ChemTankWall + L_BulkheadFittingEnd + L_MaleInsertEnd + L_MaleInsertToHoleCenter);
    -T_ChemTankWall
], R_Hole, T_PlantWall, [0; 270]*deg)
SubtractChlor2DrainPipe := CylinderF(ChlorineTank_Origin - [2*R_ChlorineTank + 2*T_ChemTankWall + S_ChemTankBorder; 0 m; T_ChemTankWall], R_Hole, T_PlantWall, [0; 270]*deg)
SubtractChlor2DosePipe := CylinderF(ChlorineTank_Origin + [
    -(2*R_ChlorineTank + 2*T_ChemTankWall + S_ChemTankBorder);
    -(R_ChlorineTank + T_ChemTankWall + L_BulkheadFittingEnd + L_MaleInsertEnd + L_MaleInsertToHoleCenter);
    -T_ChemTankWall
], R_Hole, T_PlantWall, [0; 270]*deg)
SubtractFilterCoagDrainPipe := CylinderF(FilterCoagTank_Origin - [0 m; 0 m; T_ChemTankWall], R_Hole, T_PlantWall, [0; 270]*deg)
SubtractFilterCoagDosePipe := CylinderF(FilterCoagTank_Origin + [
    0 m;
    R_ChlorineTank + T_ChemTankWall + L_BulkheadFittingEnd + L_MaleInsertEnd + L_MaleInsertToHoleCenter;
    -T_ChemTankWall
], R_Hole, T_PlantWall, [0; 270]*deg)
SubtractFilterCoag2DrainPipe := CylinderF(FilterCoagTank_Origin - [2*R_FilterCoagTank + 2*T_ChemTankWall + S_ChemTankBorder; 0 m; T_ChemTankWall], R_Hole, T_PlantWall, [0; 270]*deg)
SubtractFilterCoag2DosePipe := CylinderF(FilterCoagTank_Origin + [
    -(2*R_FilterCoagTank + 2*T_ChemTankWall + S_ChemTankBorder);
    R_ChlorineTank + T_ChemTankWall + L_BulkheadFittingEnd + L_MaleInsertEnd + L_MaleInsertToHoleCenter;
    -T_ChemTankWall
], R_Hole, T_PlantWall, [0; 270]*deg)
GroupPlatformSubtractions := GroupAll("DeleteMe")
SubtractPlatformHoles := SubtractF(["OpWalkwayCon"], "DeleteMe")
SubtractionScript := stack(FreezeEtWalkway, SubtractDrainWallBox, SubtractDoseWallBox, SubtractCoagDrainPipe, SubtractCoagDosePipe, SubtractCoag2DrainPipe, SubtractCoag2DosePipe, SubtractChlorDrainPipe, SubtractChlorDosePipe, SubtractChlor2DrainPipe, SubtractChlor2DosePipe, SubtractFilterCoagDrainPipe, SubtractFilterCoagDosePipe, SubtractFilterCoag2DrainPipe, SubtractFilterCoag2DosePipe, GroupPlatformSubtractions, SubtractPlatformHoles)
# If the number of flocculator channels is even,
# the platform will be mirrored. However, this shouldn't happen now.
Mirror := Mirror3dAll("YZ", [Plant_Origin[0] - 1/2*L_Sed; 0 m; 0 m], "Y")
ChemPlatform_Script := stack(OpAccessLayer, PlatformStairs, PlatformBox, PlatformWall, UnionPlatform1, SubtractionScript)
# Main Floor
Floor_Origin := [Plant_Origin[0] + T_PlantWall; Plant_Origin[1] - T_PlantWall; Z_Walkway - T_Floor]
Floor_Dim := [
    -(Plant_Origin[0] + T_PlantWall - (Fi_origin[0] - L_Fi - T_FiWall));
    N_SedTanks*(N_SedBays*W_SedBay + T_PlantWall) + N_FlocChannels*(W_FlocChannel + T_PlantWall) + T_PlantWall + W_EtWalkway + W_Et + 2*T_PlantWall;
    T_Floor
]
SedDrainBoxes_Dimensions := [
    -(L_SedSludgeValvePipe - 2*SocketDepth(ND_SedSludgePipe) + 2*MaleAdapterLength(ND_SedSludgePipe) + ValveLength(ND_SedSludgePipe) - ValveSocket(ND_SedSludgePipe));
    2*ND_SedSludgePipe;
    T_Floor
]
FlocDrainBoxes_Dimensions := [
    -(2*MaleAdapterLength(ND_FlocValve) + ValveLength(ND_FlocValve) - ValveSocket(ND_FlocValve));
    2*ND_FlocValve;
    T_Floor
]
EtDrainBox_Dimensions := [
    2*MaleAdapterLength(ND_EtFlowControl) + ValveLength(ND_EtFlowControl) - ValveSocket(ND_EtFlowControl);
    2*ND_EtFlowControl;
    T_Floor
]
FloorBox := BoxF(Floor_Origin, Floor_Origin + Floor_Dim, [0; 0; 0]*deg)
ChemDrainSubBox := BoxF([
    ChemPlatformWall_Origin[0] + T_PlantWall;
    CoagTank_Origin[1] + R_CoagTank + T_ChemTankWall + S_ChemTankBorder - 0.5*W_EtChemPlatform - L_PlatformDrainHole;
    ChemPlatformWall_Origin[2] - T_Floor
], [
    ChemPlatformWall_Origin[0] + T_PlantWall + W_PlatformHole + zc;
    CoagTank_Origin[1] + R_CoagTank + T_ChemTankWall + S_ChemTankBorder - 0.5*W_EtChemPlatform + L_PlatformDrainHole;
    ChemPlatformWall_Origin[2]
], [0; 0; 0]*deg)
SedSubBox_Origin := Plant_Origin + [T_PlantWall; -T_PlantWall; H_Sed - H_WalkwayToTankWall - T_Floor - zc]
SedSubBox_Dim := [-2*T_PlantWall - L_Sed; N_SedTanks*(N_SedBays*W_SedBay + T_PlantWall); T_Floor + 2*zc]
SedSubBox := BoxF(SedSubBox_Origin, SedSubBox_Origin + SedSubBox_Dim, [0; 0; 0]*deg)
FlocSubBox_Origin := [
    Floc_Origin[0] + T_PlantWall;
    Floc_Origin[1] - T_PlantWall;
    H_Sed - H_WalkwayToTankWall - T_Floor - zc
]
FlocSubBox_Dim := [-2*T_PlantWall - L_Sed; N_FlocChannels*(T_PlantWall + W_FlocChannel) + T_PlantWall; T_Floor + zc]
FlocSubBox := BoxF(FlocSubBox_Origin, FlocSubBox_Origin + FlocSubBox_Dim, [0; 0; 0]*deg)
EtSubBox_Origin := [
    Et_Origin[0] + T_PlantWall;
    Et_Origin[1] - T_PlantWall;
    Plant_Origin[2] + H_Sed - H_WalkwayToTankWall - T_Floor - zc
]
EtSubBox_Dim := [-2*T_PlantWall - L_Sed; 2*T_PlantWall + W_Et; T_Floor + zc]
EtSubBox := BoxF(EtSubBox_Origin, EtSubBox_Origin + EtSubBox_Dim, [0; 0; 0]*deg)
EtSubFlowControl := BoxF([
    Et_Origin[0] - 2*S_Fitting - 2*ConRadius(ND_EtDrain);
    Et_Origin[1] - T_PlantWall - 2*MaleAdapterLength(ND_EtFlowControl) - ValveLength(ND_EtFlowControl) + 2*ValveSocket(ND_EtFlowControl) - SocketDepth(ND_EtFlowControl) - ElbowRadius(ND_EtFlowControl) - ConRadius(ND_EtFlowControl);
    Z_Walkway - T_Floor
], [
    Et_Origin[0] - 2*S_Fitting - 2*ConRadius(ND_EtDrain) - OuterDiameterFittingPVC(ND_EtFlowControl);
    Et_Origin[1] - T_PlantWall;
    Z_Walkway
], [0; 0; 0]*deg)
# space for the RM Pipe going through the walkway
RMCutout_Origin := [
    RMTee_Origin[0] - innerdiameter(ND_RMPipe, PS_Default);
    Et_Origin[1] - T_PlantWall;
    Plant_Origin[2] + H_Sed - H_WalkwayToTankWall - T_Floor - zc
]
RMCutout_Dimensions := [2*innerdiameter(ND_RMPipe, PS_Default); -3*innerdiameter(ND_RMPipe, PS_Default); T_Floor + 2*zc]
RMCutoutBox := BoxF(RMCutout_Origin, RMCutout_Origin + RMCutout_Dimensions, [0; 0; 0]*deg)
FilterSubBox_Origin := [Fi_origin[0] + T_FiWall; Fi_origin[1] + W_Fi + T_FiWall; Z_Walkway - T_Floor]
FilterSubBox_Dim := [-2*T_FiWall - L_Fi; -T_FiWall - N_Fi*(W_Fi + T_FiWall); T_Floor]
FilterSubBox := BoxF(FilterSubBox_Origin, FilterSubBox_Origin + FilterSubBox_Dim, [0; 0; 0]*deg)
FiSiphonSubBox_Origin := [Fi_origin[0] + T_FiWall; Fi_origin[1]; Z_Walkway - T_Floor]
FiSiphonSubBox_Dim := [
    ShortTeeLength(ND_FiSiphon) + ConRadius(ND_FiSiphon) + S_Fitting;
    2*S_Fitting + OuterDiameterFittingPVC(ND_FiSiphon);
    T_Floor
]
FiSiphonSubBox := BoxF(FiSiphonSubBox_Origin, FiSiphonSubBox_Origin + FiSiphonSubBox_Dim, [0; 0; 0]*deg)
ArrayFiSiphonSubBox := ArrayLast(N_Fi, 1, -W_Fi - T_FiWall)
FiInletChannelSubBox_Origin := [
    FiInletChannel_Origin[0] + T_PlantWall;
    FiInletChannel_Origin[1] - T_PlantWall;
    Z_Walkway - T_Floor
]
FiInletChannelSubBox_Dim := [-T_PlantWall - W_FiInletChannel; 2*T_PlantWall + L_FiInletChannel; T_Floor]
FiInletChannelSubBox := BoxF(FiInletChannelSubBox_Origin, FiInletChannelSubBox_Origin + FiInletChannelSubBox_Dim, [0; 0; 0]*deg)
FiAuxSubBox_Origin := [
    FiEntranceBox_origin[0] + T_PlantWall;
    FiEntranceBox_origin[1] + W_FiEntrance + T_PlantWall;
    Z_Walkway - T_Floor
]
FiAuxSubBox_Dim := [
    -3*T_PlantWall - L_FiEntrance - L_FiExit;
    -T_PlantWall - N_Fi*(W_FiEntrance + T_PlantWall) - (N_Fi - (N_Fi > 1))*(W_FiOverflow + T_PlantWall);
    T_Floor
]
FiAuxSubBox := BoxF(FiAuxSubBox_Origin, FiAuxSubBox_Origin + FiAuxSubBox_Dim, [0; 0; 0]*deg)
DosingSubBox_Origin := [
    Et_Origin[0] - L_Et - T_PlantWall;
    Et_Origin[1] - S_Fitting;
    Plant_Origin[2] + H_Sed - H_WalkwayToTankWall - T_Floor - zc
]
DosingSubBox_Dim := [-L_CdcLever - S_Fitting; 2*ConRadius(ND_EtFloat) + S_EtFloat + 2*S_Fitting; T_Floor + zc]
DosingSubBox := BoxF(DosingSubBox_Origin, DosingSubBox_Origin + DosingSubBox_Dim, [0; 0; 0]*deg)
DrainBoxes :=
    Total ← BoxF([
        Plant_Origin[0] - L_Sed - T_PlantWall;
        W_SedBay*N_SedBays - 0.5*W_SedBay - ND_SedSludgePipe;
        Floor_Origin[2]
    ], [
        Plant_Origin[0] - L_Sed - T_PlantWall;
        W_SedBay*N_SedBays - 0.5*W_SedBay - ND_SedSludgePipe;
        Floor_Origin[2]
    ] + SedDrainBoxes_Dimensions, [0; 0; 0]*deg)
    if N_SedBays > 1
        for i ∈ 1 .. N_SedBays - 1
            Total ← stack(Total, BoxF([
                Plant_Origin[0] - L_Sed - T_PlantWall;
                W_SedBay*(N_SedBays - i) - 0.5*W_SedBay - ND_SedSludgePipe;
                Floor_Origin[2]
            ], [
                Plant_Origin[0] - L_Sed - T_PlantWall;
                W_SedBay*(N_SedBays - i) - 0.5*W_SedBay - ND_SedSludgePipe;
                Floor_Origin[2]
            ] + SedDrainBoxes_Dimensions, [0; 0; 0]*deg))
    Total ← stack(Total, array_all(N_SedTanks, 1, W_SedBay*N_SedBays + T_PlantWall)) if N_SedTanks > 1
    for j ∈ 0 .. last(Y_FlocDrainValves)
        Total ← stack(Total, BoxF([Plant_Origin[0] - L_Sed - T_PlantWall; Y_FlocDrainValves[j] - ND_FlocValve; Floor_Origin[2]], [Plant_Origin[0] - L_Sed - T_PlantWall; Y_FlocDrainValves[j] - ND_FlocValve; Floor_Origin[2]] + FlocDrainBoxes_Dimensions, [0; 0; 0]*deg))
    Total ← stack(Total, BoxF([
        Et_Origin[0] + T_PlantWall;
        Et_Origin[1] + S_Fitting + ConRadius(ND_EtDrain) - ND_EtFlowControl;
        Floor_Origin[2]
    ], [
        Et_Origin[0] + T_PlantWall;
        Et_Origin[1] + S_Fitting + ConRadius(ND_EtDrain) - ND_EtFlowControl;
        Floor_Origin[2]
    ] + EtDrainBox_Dimensions, [0; 0; 0]*deg))
    return Total
SubtractBoxes := SubtractF(["OpWalkwayCon"], "DeleteMe")
PlantFloorScript := stack(SelectLayer("OpWalkwayCon"), FloorBox, FreezeLayer("OpWalkwayCon"), ChemDrainSubBox, SedSubBox, FlocSubBox, EtSubBox, EtSubFlowControl, FilterSubBox, FiSiphonSubBox, ArrayFiSiphonSubBox, FiAuxSubBox, DosingSubBox, GroupDelete, SubtractBoxes, DrainBoxes, GroupDelete, SubtractBoxes)
AC_OperatorAccess := stack(ChemPlatform_Script, PlantFloorScript)
