# Operator Access
# Chemical Platform
# Width and length of the chemical platform are defined in ChemStockTanksAC
ChemPlatform_Origin := [
    CoagTank_Origin[0] + R_CoagTank + T_ChemTankWall + S_ChemTankBorder - L_EtChemPlatform;
    Et_Origin[1] + W_Et + T_PlantWall - W_EtChemPlatform;
    CoagTank_Origin[2] - T_ChemTankWall - T_PlantWall
]
ChemPlatform_Dimensions := [L_EtChemPlatform; W_EtChemPlatform; T_PlantWall]
ChemPlatformWall_Origin := [
    ChemPlatform_Origin[0] + L_EtChemPlatform - T_PlantWall;
    ChemPlatform_Origin[1];
    Plant_Origin[2] + H_Sed - H_WalkwayToTankWall
]
ChemPlatformWall_Dimensions := [
    T_PlantWall;
    W_EtChemPlatform;
    CoagTank_Origin[2] - T_ChemTankWall - H_Sed + H_WalkwayToTankWall - T_PlantWall
]
H_ChemStairs := CoagTank_Origin[2] - T_ChemTankWall - H_Sed + H_WalkwayToTankWall
W_ChemStairs := W_EtChemPlatform
ChemStairs_Origin := ChemPlatform_Origin + [0 m; 0 m; ChemPlatform_Dimensions[2]]
OpAccessLayer := layer_new("OpWalkwayCon", grey)
PlatformStairs := Stairs(ChemStairs_Origin, W_ChemStairs, H_ChemStairs, 180 deg)
PlatformBox := BoxF(ChemPlatform_Origin, ChemPlatform_Origin + ChemPlatform_Dimensions, [0; 0; 0]*deg)
PlatformWall := BoxF(ChemPlatformWall_Origin, ChemPlatformWall_Origin + ChemPlatformWall_Dimensions, [0; 0; 0]*deg)
UnionPlatform1 := Union_All
FreezeEtWalkway := FreezeLayer("OpWalkwayCon")
R_Hole := outerdiameter(AvailND[index2(ND_CoagPiping, AvailND) + 1])/2
L_MaleInsertToHoleCenter := ElbowRadius(ND_CoagPiping) + L_BallValve + L_FirstPipe + L_SecondPipe
SubtractDrainWallBox := BoxF([
    ChemPlatformWall_Origin[0];
    CoagTank_Origin[1] - R_CoagTank - T_ChemTankWall - 0.5*S_ChemTankBorder - L_PlatformHole;
    ChemPlatformWall_Origin[2]
], [
    ChemPlatformWall_Origin[0] + T_PlantWall;
    CoagTank_Origin[1] - R_CoagTank - T_ChemTankWall - 0.5*S_ChemTankBorder + L_PlatformHole;
    ChemPlatformWall_Origin[2] + W_PlatformHole
], [0; 0; 0]*deg)
SubtractDoseWallBox := BoxF(ChemWallHole_Origin, [
    ChemPlatformWall_Origin[0] + T_PlantWall;
    ChemPlatformWall_Origin[1] + 3*L_PlatformHole;
    ChemPlatform_Origin[2]
], [0; 0; 0]*deg)
SubtractCoagDrainPipe := CylinderF(CoagTank_Origin - [0 m; 0 m; T_ChemTankWall], R_Hole, T_PlantWall, [0; 270]*deg)
SubtractCoagDosePipe := CylinderF(CoagTank_Origin + [
    -sqrt(2)/2*(R_CoagTank + T_ChemTankWall + L_BulkheadFittingEnd + L_MaleInsertEnd + L_MaleInsertToHoleCenter);
    -sqrt(2)/2*(R_CoagTank + T_ChemTankWall + L_BulkheadFittingEnd + L_MaleInsertEnd + L_MaleInsertToHoleCenter);
    -T_ChemTankWall
], R_Hole, T_PlantWall, [0; 270]*deg)
SubtractCoag2DrainPipe := CylinderF(CoagTank_Origin - [0 m; 2*R_CoagTank + 2*T_ChemTankWall + S_ChemTankBorder; T_ChemTankWall], R_Hole, T_PlantWall, [0; 270]*deg)
SubtractCoag2DosePipe := CylinderF(CoagTank_Origin - [0 m; 2*R_CoagTank + 2*T_ChemTankWall + S_ChemTankBorder; T_ChemTankWall] + [
    -sqrt(2)/2*(R_CoagTank + T_ChemTankWall + L_BulkheadFittingEnd + L_MaleInsertEnd + L_MaleInsertToHoleCenter);
    sqrt(2)/2*(R_CoagTank + T_ChemTankWall + L_BulkheadFittingEnd + L_MaleInsertEnd + L_MaleInsertToHoleCenter);
    0 m
], R_Hole, T_PlantWall, [0; 270]*deg)
SubtractChlorDrainPipe := CylinderF(ChlorineTank_Origin - [0 m; 0 m; T_ChemTankWall], R_Hole, T_PlantWall, [0; 270]*deg)
SubtractChlorDosePipe := CylinderF(ChlorineTank_Origin + [
    0 m;
    -(R_ChlorineTank + T_ChemTankWall + L_BulkheadFittingEnd + L_MaleInsertEnd + L_MaleInsertToHoleCenter);
    -T_ChemTankWall
], R_Hole, T_PlantWall, [0; 270]*deg)
SubtractChlor2DrainPipe := CylinderF(ChlorineTank_Origin - [2*R_ChlorineTank + 2*T_ChemTankWall + S_ChemTankBorder; 0 m; T_ChemTankWall], R_Hole, T_PlantWall, [0; 270]*deg)
SubtractChlor2DosePipe := CylinderF(ChlorineTank_Origin + [
    -(2*R_ChlorineTank + 2*T_ChemTankWall + S_ChemTankBorder);
    -(R_ChlorineTank + T_ChemTankWall + L_BulkheadFittingEnd + L_MaleInsertEnd + L_MaleInsertToHoleCenter);
    -T_ChemTankWall
], R_Hole, T_PlantWall, [0; 270]*deg)
SubtractFilterCoagDrainPipe := CylinderF(FilterCoagTank_Origin - [0 m; 0 m; T_ChemTankWall], R_Hole, T_PlantWall, [0; 270]*deg)
SubtractFilterCoagDosePipe := CylinderF(FilterCoagTank_Origin + [
    0 m;
    R_ChlorineTank + T_ChemTankWall + L_BulkheadFittingEnd + L_MaleInsertEnd + L_MaleInsertToHoleCenter;
    -T_ChemTankWall
], R_Hole, T_PlantWall, [0; 270]*deg)
SubtractFilterCoag2DrainPipe := CylinderF(FilterCoagTank_Origin - [2*R_FilterCoagTank + 2*T_ChemTankWall + S_ChemTankBorder; 0 m; T_ChemTankWall], R_Hole, T_PlantWall, [0; 270]*deg)
SubtractFilterCoag2DosePipe := CylinderF(FilterCoagTank_Origin + [
    -(2*R_FilterCoagTank + 2*T_ChemTankWall + S_ChemTankBorder);
    R_ChlorineTank + T_ChemTankWall + L_BulkheadFittingEnd + L_MaleInsertEnd + L_MaleInsertToHoleCenter;
    -T_ChemTankWall
], R_Hole, T_PlantWall, [0; 270]*deg)
GroupPlatformSubtractions := GroupAll("DeleteMe")
SubtractPlatformHoles := SubtractF(["OpWalkwayCon"], "DeleteMe")
SubtractionScript := stack(FreezeEtWalkway, SubtractDrainWallBox, SubtractDoseWallBox, SubtractCoagDrainPipe, SubtractCoagDosePipe, SubtractCoag2DrainPipe, SubtractCoag2DosePipe, SubtractChlorDrainPipe, SubtractChlorDosePipe, SubtractChlor2DrainPipe, SubtractChlor2DosePipe, SubtractFilterCoagDrainPipe, SubtractFilterCoagDosePipe, SubtractFilterCoag2DrainPipe, SubtractFilterCoag2DosePipe, GroupPlatformSubtractions, SubtractPlatformHoles)
# If the number of flocculator channels is even,
# the platform will be mirrored. However, this shouldn't happen now.
Mirror := Mirror3dAll("YZ", [Plant_Origin[0] - 1/2*L_Sed; 0 m; 0 m], "Y")
ChemPlatform_Script := stack(OpAccessLayer, PlatformStairs, PlatformBox, PlatformWall, UnionPlatform1, SubtractionScript)
# Main Floor
Floor_Origin := [Plant_Origin[0] + T_PlantWall; Plant_Origin[1] - T_PlantWall; Z_Walkway - T_Floor]
Floor_Dim := [
    -(Plant_Origin[0] + T_PlantWall - (Fi_origin[0] - L_Fi - T_FiWall));
    N_SedTanks*(N_SedBays*W_SedBay + T_PlantWall) + N_FlocChannels*(W_FlocChannel + T_PlantWall) + T_PlantWall + W_EtWalkway + W_Et + 2*T_PlantWall;
    T_Floor
]
SedDrainBoxes_Dimensions := [
    -(L_SedSludgeValvePipe - 2*SocketDepth(ND_SedSludgePipe) + 2*MaleAdapterLength(ND_SedSludgePipe) + ValveLength(ND_SedSludgePipe) - ValveSocket(ND_SedSludgePipe));
    2*ND_SedSludgePipe;
    T_Floor
]
FlocDrainBoxes_Dimensions := [
    -(2*MaleAdapterLength(ND_FlocValve) + ValveLength(ND_FlocValve) - ValveSocket(ND_FlocValve));
    2*ND_FlocValve;
    T_Floor
]
EtDrainBox_Dimensions := [
    2*MaleAdapterLength(ND_EtFlowControl) + ValveLength(ND_EtFlowControl) - ValveSocket(ND_EtFlowControl);
    2*ND_EtFlowControl;
    T_Floor
]
FloorBox := BoxF(Floor_Origin, Floor_Origin + Floor_Dim, [0; 0; 0]*deg)
ChemDrainSubBox := BoxF([
    ChemPlatformWall_Origin[0] + T_PlantWall;
    CoagTank_Origin[1] - R_CoagTank - T_ChemTankWall - 0.5*S_ChemTankBorder - L_PlatformHole;
    ChemPlatformWall_Origin[2] - T_Floor
], [
    ChemPlatformWall_Origin[0] + T_PlantWall + W_PlatformHole;
    CoagTank_Origin[1] - R_CoagTank - T_ChemTankWall - 0.5*S_ChemTankBorder + L_PlatformHole;
    ChemPlatformWall_Origin[2]
], [0; 0; 0]*deg)
SedSubBox_Origin := Plant_Origin + [T_PlantWall; -T_PlantWall; H_Sed - H_WalkwayToTankWall - T_Floor - zc]
SedSubBox_Dim := [-2*T_PlantWall - L_Sed; N_SedTanks*(N_SedBays*W_SedBay + T_PlantWall); T_Floor + 2*zc]
SedSubBox := BoxF(SedSubBox_Origin, SedSubBox_Origin + SedSubBox_Dim, [0; 0; 0]*deg)
FlocSubBox_Origin := Plant_Origin + [
    T_PlantWall;
    N_SedTanks*(N_SedBays*W_SedBay + T_PlantWall) - T_PlantWall;
    H_Sed - H_WalkwayToTankWall - T_Floor - zc
]
FlocSubBox_Dim := [-2*T_PlantWall - L_Sed; N_FlocChannels*(T_PlantWall + W_FlocChannel) + T_PlantWall; T_Floor + zc]
FlocSubBox := BoxF(FlocSubBox_Origin, FlocSubBox_Origin + FlocSubBox_Dim, [0; 0; 0]*deg)
EtSubBox_Origin := [
    Et_Origin[0] + T_PlantWall;
    Et_Origin[1] - T_PlantWall;
    Plant_Origin[2] + H_Sed - H_WalkwayToTankWall - T_Floor - zc
]
EtSubBox_Dim := [-2*T_PlantWall - L_Sed; 2*T_PlantWall + W_Et; T_Floor + zc]
EtSubBox := BoxF(EtSubBox_Origin, EtSubBox_Origin + EtSubBox_Dim, [0; 0; 0]*deg)
FiSubBox_Origin := [Fi_origin[0] - L_Fi - T_FiWall - zc; Fi_origin[1] + W_Fi + T_PlantWall; Z_Walkway - T_Floor - zc]
FiSubBox_Dim := [L_Fi + 2*T_FiWall + zc; -N_Fi*W_Fi - (N_Fi + 1)*T_PlantWall; T_Floor + zc]
FiSubBox := BoxF(FiSubBox_Origin, FiSubBox_Origin + FiSubBox_Dim, [0; 0; 0]*deg)
FiInletChannelSubBox_Origin := [FiInletChannel_Origin[0]; FiInletChannel_Origin[1] - T_PlantWall; Z_Walkway - T_Floor - zc]
FiInletChannelSubBox_Dim := [-W_FiInletChannel - T_PlantWall; L_FiInletChannel + 2*T_PlantWall; T_Floor + zc]
FiInletChannelSubBox := BoxF(FiInletChannelSubBox_Origin, FiInletChannelSubBox_Origin + FiInletChannelSubBox_Dim, [0; 0; 0]*deg)
FiEntAndExitSubBox_Origin := [
    FiEntranceBox_origin[0] + T_PlantWall;
    FiEntranceBox_origin[1] + W_FiEntrance + T_PlantWall;
    Z_Walkway - T_Floor - zc
]
FiEntAndExitSubBox_Dim := [
    -(L_FiEntrance + L_FiExit + 3*T_PlantWall);
    -N_Fi*(W_FiEntrance + 2*T_PlantWall) - trunc(N_Fi/2)*W_FiOverflow;
    T_Floor + zc
]
FiEntAndExitSubBox := BoxF(FiEntAndExitSubBox_Origin, FiEntAndExitSubBox_Origin + FiEntAndExitSubBox_Dim, [0; 0; 0]*deg)
FiSiphonHole := BoxF([
    Fi_origin[0] + T_PlantWall;
    Et_Origin[1] - W_Fi - T_PlantWall - W_EtWalkway - T_FiWall;
    Z_Walkway - T_Floor - zc
], [
    Fi_origin[0] + T_PlantWall + 2*SocketDepth(ND_FiSiphon) + ShortTeeLength(ND_FiSiphon) + ConRadius(ND_FiSiphon) + 5 cm;
    Et_Origin[1] - W_Fi - T_PlantWall - W_EtWalkway - T_FiWall + T_ConcreteMin + 2*ConRadius(ND_FiSiphon) + 5 cm;
    Z_Walkway + zc
], [0; 0; 0]*deg)
# Currently does not account for distance between the filters if there is more than two. This should be fixed in the future.
ArraySiphonHole := ArrayLast(N_Fi, 1, -(W_Fi + T_FiWall))
# space for the RM Pipe going through the walkway
RMCutout_Origin := [
    RMTee_Origin[0] - innerdiameter(ND_RMPipe, PS_Default);
    Et_Origin[1] - T_PlantWall;
    Plant_Origin[2] + H_Sed - H_WalkwayToTankWall - T_Floor - zc
]
RMCutout_Dimensions := [2*innerdiameter(ND_RMPipe, PS_Default); -3*innerdiameter(ND_RMPipe, PS_Default); T_Floor + 2*zc]
RMCutoutBox := BoxF(RMCutout_Origin, RMCutout_Origin + RMCutout_Dimensions, [0; 0; 0]*deg)
FlowControlCutout_Origin := [
    Et_Origin[0] - L_Sed - T_PlantWall;
    Et_Origin[1] + S_Fitting;
    Plant_Origin[2] + H_Sed - H_WalkwayToTankWall - T_Floor - zc
]
FlowControlCutout_Dim := [-4*ConRadius(ND_EtFlowControl); 2*ConRadius(ND_EtFlowControl); T_Floor + 2*zc]
FlowControlCutoutBox := BoxF(FlowControlCutout_Origin, FlowControlCutout_Origin + FlowControlCutout_Dim, [0; 0; 0]*deg)
DrainBoxes :=
    Total ← BoxF([
        Plant_Origin[0] - L_Sed - T_PlantWall;
        W_SedBay*N_SedBays - 0.5*W_SedBay - ND_SedSludgePipe;
        Floor_Origin[2]
    ], [
        Plant_Origin[0] - L_Sed - T_PlantWall;
        W_SedBay*N_SedBays - 0.5*W_SedBay - ND_SedSludgePipe;
        Floor_Origin[2]
    ] + SedDrainBoxes_Dimensions, [0; 0; 0]*deg)
    if N_SedBays > 1
        for i ∈ 1 .. N_SedBays - 1
            Total ← stack(Total, BoxF([
                Plant_Origin[0] - L_Sed - T_PlantWall;
                W_SedBay*(N_SedBays - i) - 0.5*W_SedBay - ND_SedSludgePipe;
                Floor_Origin[2]
            ], [
                Plant_Origin[0] - L_Sed - T_PlantWall;
                W_SedBay*(N_SedBays - i) - 0.5*W_SedBay - ND_SedSludgePipe;
                Floor_Origin[2]
            ] + SedDrainBoxes_Dimensions, [0; 0; 0]*deg))
    Total ← stack(Total, array_all(N_SedTanks, 1, W_SedBay*N_SedBays + T_PlantWall)) if N_SedTanks > 1
    for j ∈ 0 .. last(Y_FlocDrainValves)
        Total ← stack(Total, BoxF([Plant_Origin[0] - L_Sed - T_PlantWall; Y_FlocDrainValves[j] - ND_FlocValve; Floor_Origin[2]], [Plant_Origin[0] - L_Sed - T_PlantWall; Y_FlocDrainValves[j] - ND_FlocValve; Floor_Origin[2]] + FlocDrainBoxes_Dimensions, [0; 0; 0]*deg))
    Total ← stack(Total, BoxF([
        Et_Origin[0] + T_PlantWall;
        Et_Origin[1] + S_Fitting + ConRadius(ND_EtDrain) - ND_EtFlowControl;
        Floor_Origin[2]
    ], [
        Et_Origin[0] + T_PlantWall;
        Et_Origin[1] + S_Fitting + ConRadius(ND_EtDrain) - ND_EtFlowControl;
        Floor_Origin[2]
    ] + EtDrainBox_Dimensions, [0; 0; 0]*deg))
    return Total
SubtractBoxes := SubtractF(["OpWalkwayCon"], "DeleteMe")
AC_OperatorAccess := stack(ChemPlatform_Script, SelectLayer("OpWalkwayCon"), FloorBox, FreezeLayer("OpWalkwayCon"), ChemDrainSubBox, SedSubBox, FlocSubBox, EtSubBox, FiSubBox, FiInletChannelSubBox, FiEntAndExitSubBox, FiSiphonHole, ArraySiphonHole, FlowControlCutoutBox, GroupAll("DeleteMe"), SubtractBoxes, DrainBoxes, GroupAll("DeleteMe"), SubtractBoxes)
