# Plant Layout
# make changes to the default plant layout here
# 1) thaw the entrance tank, flocculator, sed tanks, and drain channel to mirror them
ThawMirrorTanks := ThawMultiple(["Floc*"; "DC*"])
MirrorPlantTanks := Mirror3dAll("yz", [Plant_Origin[0] - L_Sed/2; Plant_Origin[1]], "y")
FreezeMirrorTanks := FreezeMultiple(["Floc*"; "Sed*"; "DC*"])
FlipTanks := stack(ThawMirrorTanks, MirrorPlantTanks, FreezeMirrorTanks)
# 2) move the filters to line up with the top of the flocculator
ThawFinishedFilter := ThawMultiple(["Fi*"])
Fi_OriginNew := [
    Plant_Origin[0] - L_Sed - W_DC - 5*T_PlantWall - T_FiWall - W_MpWalkway - L_FiExit - L_FiEntrance - W_FiInletChannel;
    Et_Origin[1] - W_Fi - T_PlantWall - W_EtWalkway - T_FiWall - (W_EtChemPlatform - W_Et - T_PlantWall);
    Fi_origin[2]
]
MoveFinishedFilter := MoveAll(Fi_origin, Fi_OriginNew)
FreezeAllFilter := FreezeMultiple(["Fi*"])
MoveFilterFinal := stack(ThawFinishedFilter, MoveFinishedFilter, FreezeAllFilter)
# Plant Floor Subtractions for Filter (dependent on filter origin)
ThawPlantFloor := ThawMultiple(["OpWalkwayCon"])
FiSubBox_Origin := [
    Fi_OriginNew[0] - L_Fi - T_FiWall - zc;
    Fi_OriginNew[1] + W_Fi + T_PlantWall;
    Z_Walkway - T_Floor - zc
] = [-12.4908; 7.89658; 1.18315] m
FiSubBox_Dim := [L_Fi + 2*T_FiWall + zc; -N_Fi*W_Fi - (N_Fi + 1)*T_PlantWall; T_Floor + zc]
FiSubBox := BoxF(FiSubBox_Origin, FiSubBox_Origin + FiSubBox_Dim, [0; 0; 0]*deg)
FiInletChannelSubBox_Origin := [
    FiInletChannel_Origin[0] + T_PlantWall - Fi_origin[0] + Fi_OriginNew[0];
    FiInletChannel_Origin[1] - T_PlantWall - Fi_origin[1] + Fi_OriginNew[1];
    Z_Walkway - T_Floor - zc
]
FiInletChannelSubBox_Dim := [-W_FiInletChannel - T_PlantWall; L_FiInletChannel + 2*T_PlantWall; T_Floor + zc]
FiInletChannelSubBox := BoxF(FiInletChannelSubBox_Origin, FiInletChannelSubBox_Origin + FiInletChannelSubBox_Dim, [0; 0; 0]*deg)
FiEntAndExitSubBox_Origin := [
    FiEntranceBox_origin[0] + T_PlantWall - Fi_origin[0] + Fi_OriginNew[0];
    FiEntranceBox_origin[1] + W_FiEntrance + T_PlantWall - Fi_origin[1] + Fi_OriginNew[1];
    Z_Walkway - T_Floor - zc
]
FiEntAndExitSubBox_Dim := [
    -(L_FiEntrance + L_FiExit + 3*T_PlantWall);
    -N_Fi*(W_FiEntrance + 2*T_PlantWall) - trunc(N_Fi/2)*W_FiOverflow;
    T_Floor + zc
]
FiEntAndExitSubBox := BoxF(FiEntAndExitSubBox_Origin, FiEntAndExitSubBox_Origin + FiEntAndExitSubBox_Dim, [0; 0; 0]*deg)
FiSiphonHole := BoxF([
    Fi_OriginNew[0] + T_PlantWall;
    Et_Origin[1] - W_Fi - T_PlantWall - W_EtWalkway - T_FiWall - Fi_origin[1] + Fi_OriginNew[1];
    Z_Walkway - T_Floor - zc
], [
    Fi_OriginNew[0] + T_PlantWall + 2*SocketDepth(ND_FiSiphon) + ShortTeeLength(ND_FiSiphon) + ConRadius(ND_FiSiphon) + 5 cm;
    Et_Origin[1] - W_Fi - T_PlantWall - W_EtWalkway - T_FiWall + T_ConcreteMin + 2*ConRadius(ND_FiSiphon) + 5 cm - Fi_origin[1] + Fi_OriginNew[1];
    Z_Walkway
], [0; 0; 0]*deg)
MirrorSiphonHole := MirrorLast([Fi_OriginNew[0] + T_PlantWall - zc; Fi_OriginNew[1] - T_PlantWall], [Fi_OriginNew[0] + T_PlantWall + zc; Fi_OriginNew[1] - T_PlantWall], "N")
# Need to fix this if there are more than 2 filters.
SubtractFilterBoxes := SubtractF(["OpWalkwayCon"], "DeleteMe")
ArraySiphonHole := ArrayLast(N_Fi, 1, -(W_Fi + T_FiWall))
FreezeFloor := FreezeMultiple(["OpWalkwayCon"])
FilterFloorSub :=
    stack(ThawPlantFloor, FiSubBox, FiInletChannelSubBox, FiEntAndExitSubBox, FiSiphonHole, MirrorSiphonHole, GroupAll("DeleteMe"), SubtractFilterBoxes, FreezeFloor) if N_Fi == 2
    stack(ThawPlantFloor, FiSubBox, FiInletChannelSubBox, FiEntAndExitSubBox, FiSiphonHole, GroupAll("DeleteMe"), SubtractFilterBoxes, FreezeFloor) otherwise
AC_ZPlantLayout := stack(FlipTanks, MoveFilterFinal, FilterFloorSub)
