# [reference: MasterProgram.xmcd]
# Origin Points
# Entrance Exit Filter
FiEntranceBox_origin := [
    Plant_Origin[0] - W_SedExitchannelPostweir - T_PlantWall;
    Plant_Origin[1] - W_FiEntrance - T_PlantWall;
    Z_FiEntranceBottom
]
FiExitBox_origin := [
    Plant_Origin[0] - W_SedExitchannelPostweir - 2*T_PlantWall - L_FiEntrance;
    Plant_Origin[1] - W_FiExit - T_PlantWall;
    Z_FiExitBottom
]
Fi_origin := [
    Plant_Origin[0] - W_SedExitchannelPostweir - 4*T_PlantWall - L_FiEntrance - L_FiExit - W_MpWalkway;
    Plant_Origin[1] - W_Fi - T_PlantWall;
    Z_FiBottom
]
# Manifolds
FiManTee_Origin := Fi_origin + [-3/2*B_FiManifoldBranch; ConRadius(ND_FiManBranch) + ShortTeeLength(ND_FiManBranch); T_FiLayer]
BwManTee_Origin := Fi_origin + [
    -3/2*B_FiManifoldBranch;
    ConRadius(ND_FiBwManBranch) + ShortTeeLength(ND_FiBwManBranch);
    outerradius(ND_FiBwManBranch)
]
# Couplings
FiBwInletCoupling_origin := [
    Plant_Origin[0] - W_SedExitchannelPostweir - T_PlantWall - 0.5*ND_FiBwTrunk - T_ConcreteMin;
    Plant_Origin[1] - T_PlantWall - ConRadius(ND_FiBwTrunk);
    Z_FiEntranceBottom - CouplingLength(ND_FiBwTrunk) + SocketDepth(ND_FiBwTrunk)
] = [-0.3762; -0.242075; -0.88012] m
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FiInletCoupling1_origin := [
    Plant_Origin[0] - W_SedExitchannelPostweir - T_PlantWall - L_FiEntrance + (0.5*ND_FiTrunk) + T_ConcreteMin;
    Plant_Origin[1] - T_PlantWall - 0.5*ND_FiTrunk - T_ConcreteMin;
    Z_FiEntranceBottom - CouplingLength(ND_FiTrunk) + SocketDepth(ND_FiTrunk)
]
# This will be the pipe layout in the entrance and exit boxes to allow for 2 90 degree elbows in  Pipes 2 and 3 coming from the entrance box (on the right)
FiInletCoupling2_origin := [
    Plant_Origin[0] - W_SedExitchannelPostweir - T_PlantWall - 0.5*ND_FiBwTrunk - T_ConcreteMin;
    Plant_Origin[1] - T_PlantWall - 0.5*ConRadius(ND_FiBwTrunk) - 2*ElbowRadius(ND_FiTrunk);
    Z_FiEntranceBottom - CouplingLength(ND_FiTrunk) + SocketDepth(ND_FiTrunk)
]
FiInletCoupling3_origin := [
    Plant_Origin[0] - W_SedExitchannelPostweir - T_PlantWall - L_FiEntrance + (0.5*ND_FiTrunk) + T_ConcreteMin;
    Plant_Origin[1] - T_PlantWall - 0.5*ConRadius(ND_FiBwTrunk) - 2*ElbowRadius(ND_FiTrunk);
    Z_FiEntranceBottom - CouplingLength(ND_FiTrunk) + SocketDepth(ND_FiTrunk)
]
FiExitCoupling0_origin := [
    Plant_Origin[0] - W_SedExitchannelPostweir - 2*T_PlantWall - 0.5*ND_FiTrunk - T_ConcreteMin - L_FiEntrance;
    Plant_Origin[1] - T_PlantWall - 0.5*ND_FiTrunk - T_ConcreteMin;
    Z_FiExitBottom - CouplingLength(ND_FiTrunk) + SocketDepth(ND_FiTrunk)
]
FiExitCoupling1_origin := [
    Plant_Origin[0] - W_SedExitchannelPostweir - 2*T_PlantWall - 2*L_FiEntrance + (0.5*ND_FiTrunk) + T_ConcreteMin;
    Plant_Origin[1] - T_PlantWall - 0.5*ND_FiTrunk - T_ConcreteMin;
    Z_FiExitBottom - CouplingLength(ND_FiTrunk) + SocketDepth(ND_FiTrunk)
]
FiExitCoupling2_origin := [
    Plant_Origin[0] - W_SedExitchannelPostweir - 2*T_PlantWall - 0.5*ND_FiBwTrunk - T_ConcreteMin - L_FiEntrance;
    Plant_Origin[1] - T_PlantWall - W_FiExit + T_ConcreteMin + 0.5*ND_FiTrunk;
    Z_FiExitBottom - CouplingLength(ND_FiTrunk) + SocketDepth(ND_FiTrunk)
]
FiExitCoupling3_origin := [
    Plant_Origin[0] - W_SedExitchannelPostweir - 2*T_PlantWall - 2*L_FiEntrance + (0.5*ND_FiTrunk) + T_ConcreteMin;
    Plant_Origin[1] - T_PlantWall - W_FiExit + T_ConcreteMin + 0.5*ND_FiTrunk;
    Z_FiExitBottom - CouplingLength(ND_FiTrunk) + SocketDepth(ND_FiTrunk)
]
# Weirs
FiEntranceWeir_origin := [
    Plant_Origin[0] - W_SedExitchannelPostweir;
    Plant_Origin[1] - W_FiEntrance - T_PlantWall;
    Z_FiEntranceWeir
]
# Dimension Points
FiEntranceBox_dim := [L_FiEntrance; W_FiEntrance; H_FiEntrance]
FiExitBox_dim := [L_FiExit; W_FiExit; H_FiExit]
Fi_dim := [L_Fi; W_Fi; H_Fi] = [1.4; 0.978446; 3.66732] m
FiEntranceWeir_dim := [-T_PlantWall; W_FiEntrance; Z_SedWeirExit - Z_FiEntranceWeir]
# Script Variables
# Inlet Channel
W_FiEntrance = 0.761371 m
LayerFiInletChannel := layer_new("FiInletChannel", ltgrey)
# The H.Sed-Z.SedWeirExit term can come out once we are not setting the top of the filter at Z=0
FiInletChannel :=
    if N_Fi == 1
        ChannelDrawing([
            Plant_Origin[0];
            Plant_Origin[1] + (-W_FiEntrance) - T_PlantWall;
            Plant_Origin[2] + H_Sed - H_ExitChannel - (H_Sed - Z_SedWeirExit)
        ], [W_FiEntrance; W_SedExitchannelPostweir; H_ExitChannel], T_ChannelWall, [90; 0; 0]*deg)
    otherwise
        ChannelDrawing([
            Plant_Origin[0];
            -(N_Fi*(W_FiEntrance + W_FiOverflow/2 + 3/2*T_PlantWall) - T_PlantWall) - T_PlantWall;
            Plant_Origin[2] + H_Sed - H_ExitChannel - (H_Sed - Z_SedWeirExit)
        ], [N_Fi*(W_FiEntrance + W_FiOverflow/2 + 3/2*T_PlantWall); W_SedExitchannelPostweir; H_ExitChannel], T_ChannelWall, [90; 0; 0]*deg)
# Since the channel is open at one end, this adds a wall to the far end of the channel
FiInletChannelCap :=
    if N_Fi == 1
        BoxF([
            Plant_Origin[0] - W_SedExitchannelPostweir - T_ChannelWall;
            -W_FiEntrance - T_PlantWall - T_ChannelWall;
            Plant_Origin[2] + H_Sed - H_ExitChannel - (H_Sed - Z_SedWeirExit) - T_ChannelWall
        ], [
            Plant_Origin[0] - W_SedExitchannelPostweir - T_ChannelWall;
            -W_FiEntrance - T_PlantWall - T_ChannelWall;
            Plant_Origin[2] + H_Sed - H_ExitChannel - (H_Sed - Z_SedWeirExit) - T_ChannelWall
        ] + [W_SedExitchannelPostweir + 2*T_ChannelWall; T_ChannelWall; H_ExitChannel + T_ChannelWall], [0; 0; 0]*deg)
    otherwise
        BoxF([
            Plant_Origin[0] - W_SedExitchannelPostweir - T_ChannelWall;
            -(N_Fi*(W_FiEntrance + W_FiOverflow/2 + 3/2*T_PlantWall) - T_PlantWall) - T_PlantWall - T_ChannelWall;
            Plant_Origin[2] + H_Sed - H_ExitChannel - (H_Sed - Z_SedWeirExit) - T_ChannelWall
        ], [
            Plant_Origin[0] - W_SedExitchannelPostweir - T_ChannelWall;
            -(N_Fi*(W_FiEntrance + W_FiOverflow/2 + 3/2*T_PlantWall) - T_PlantWall) - T_PlantWall - T_ChannelWall;
            Plant_Origin[2] + H_Sed - H_ExitChannel - (H_Sed - Z_SedWeirExit) - T_ChannelWall
        ] + [W_SedExitchannelPostweir + 2*T_ChannelWall; T_ChannelWall; H_ExitChannel + T_ChannelWall], [0; 0; 0]*deg)
EndBoxIf1 := BoxF([
    FiEntranceBox_origin[0] + T_PlantWall;
    FiEntranceBox_origin[1] - T_PlantWall - W_FiOverflow/2;
    Plant_Origin[2] + H_Sed - H_ExitChannel
], [Plant_Origin[0]; FiEntranceBox_origin[1] - T_PlantWall; Plant_Origin[2] + H_Sed], [0; 0; 0]*deg)  # NOT STACKED
EndBoxIf2 := BoxF([
    FiEntranceBox_origin[0] + T_PlantWall;
    FiEntranceBox_origin[1] - 3*T_PlantWall - W_FiOverflow - W_FiEntrance;
    Plant_Origin[2] + H_Sed - H_ExitChannel
], [
    Plant_Origin[0];
    FiEntranceBox_origin[1] - 2*T_PlantWall - W_FiOverflow - W_FiEntrance;
    Plant_Origin[2] + H_Sed
], [0; 0; 0]*deg)  # NOT STACKED
FreezeFiInletChannel := FreezeLayer("FiInletChannel")
FiEntWeir :=
    Weir1 ← BoxF(FiEntranceWeir_origin, FiEntranceWeir_origin + FiEntranceWeir_dim, [0; 0; 0]*deg)
    Weir2 ← BoxF([
        FiEntranceWeir_origin[0];
        FiEntranceWeir_origin[0] - 2*T_PlantWall - W_FiEntrance - W_FiOverflow;
        FiEntranceWeir_origin[2]
    ], [
        FiEntranceWeir_origin[0];
        FiEntranceWeir_origin[0] - 2*T_PlantWall - W_FiEntrance - W_FiOverflow;
        FiEntranceWeir_origin[2]
    ] + FiEntranceWeir_dim, [0; 0; 0]*deg)
    return
        Weir1 if N_Fi == 1
        stack(Weir1, Weir2) otherwise
GroupEntWeir := GroupAll("DeleteMe")
SubtractEntWeir := SubtractF(["FiInletChannel"], "DeleteMe")
FiInletChannelScript := stack(LayerFiInletChannel, FiInletChannel, FiInletChannelCap, bigunion, FreezeFiInletChannel, FiEntWeir, GroupEntWeir, SubtractEntWeir)
# Filter Auxilary Script
# (Drain Channel, BW Box, BW Overflow, Distribution Box, Overflow Box)
# Tanks
LayerFiBw := layer_new("FiBwTanks", ltgrey)
FiBwTank := stack(Tank([Fi_origin[0] + T_PlantWall + L_FiBw; Fi_origin[1] - T_PlantWall/2 - W_FiBw/2; Z_FiBwBottom], [L_FiBw; W_FiBw; H_FiBw], T_PlantWall), " ")
FiBwDrainTank := stack(Tank([
    Fi_origin[0] + 2*T_PlantWall + L_FiBw + L_FiBwWeirDrain;
    Fi_origin[1] - T_PlantWall/2 - W_FiBwWeirDrain/2;
    Z_FiBwWeirDrainBottom
], [L_FiBwWeirDrain; W_FiBwWeirDrain; H_FiBwWeirDrain], T_PlantWall), " ")
LayerFiBwFreeze := FreezeLayer("FiBwTanks")
LayerFiOverflow := layer_new("FiOverflow", ltgrey)
FiOverflowTank := Tank([FiEntranceBox_origin[0]; FiEntranceBox_origin[1] - T_PlantWall - W_FiOverflow; Z_FiOverflowBottom], [L_FiOverflow; W_FiOverflow; H_FiOverflow], T_PlantWall)
FiDistTank := stack(Tank([FiExitBox_origin[0]; FiExitBox_origin[1] - T_PlantWall - W_FiOverflow; Z_FiOverflowBottom], [L_FiOverflow; W_FiOverflow; H_FiExit], T_PlantWall), "")
LayerFiOverflowFreeze := FreezeLayer("FiOverflow")
LayerFiBwDrain := layer_new("FiBwDrain", ltgrey)
FiBwDrainChannel := ChannelDrawing([
    Fi_origin[0] + T_PlantWall + L_FiBw/2 - outerdiameter(ND_DistPipe)/2 - 5 cm;
    Fi_origin[1] - T_PlantWall/2 - H_FiBwDrain/2;
    Z_FiBwBottom - H_FiBwDrain - T_PlantWall
], [
    L_FiEntrance + W_SedExitchannelPostweir + 4*T_PlantWall + L_FiExit + W_MpWalkway - outerdiameter(ND_DistPipe)/2 - 5 cm;
    H_FiBwDrain;
    H_FiBwDrain
], T_ChannelWall, [0; 0; 0]*deg)
FiBwDrainFreeze := FreezeLayer("FiBWDrain")
FiAuxTanksScript := stack(LayerFiBw, FiBwTank, FiBwDrainTank, bigunion, LayerFiBwFreeze, LayerFiOverflow, FiOverflowTank, FiDistTank, bigunion, LayerFiOverflowFreeze, LayerFiBwDrain, FiBwDrainChannel, FiBwDrainFreeze)
# Couplings
LayerFiCoupling := layer_new("FiCoupling", green)
FiOverflowToDistCoupling := CouplingSUBF([
    FiExitBox_origin[0] + (T_PlantWall + CouplingLength(ND_DistPipe))/2 - SocketDepth(ND_DistPipe);
    FiExitBox_origin[1] - T_PlantWall - W_FiOverflow/2;
    Z_FiOverflowBottom - T_ConcreteMin - ConRadius(ND_DistPipe) + H_FiEntrance
], [0; 0]*deg, ND_DistPipe, EN_PipeSpec, ["FiOverflow"])
FiOverflowCoupling := CouplingSUBF([
    FiEntranceBox_origin[0] - L_FiOverflow/2;
    FiEntranceBox_origin[1] - T_PlantWall - W_FiOverflow/2;
    Z_FiOverflowBottom - CouplingLength(ND_FiEntranceOverflow) + SocketDepth(ND_FiEntranceOverflow)
], [0; 90]*deg, ND_FiEntranceOverflow, EN_PipeSpec, ["FiOverflow"])
DistCoupling := CouplingSUBF([
    FiExitBox_origin[0] - L_FiExit/2;
    FiExitBox_origin[1] - T_PlantWall - W_FiOverflow/2;
    Z_FiOverflowBottom - CouplingLength(ND_DistPipe) + SocketDepth(ND_DistPipe)
], [0; 90]*deg, ND_DistPipe, EN_PipeSpec, ["FiOverflow"])
FiBwCoupling := CouplingSUBF([
    Fi_origin[0] + T_PlantWall + L_FiBw/2;
    Fi_origin[1] - T_PlantWall/2;
    Z_FiBwBottom - CouplingLength(ND_FiBwDrain) + SocketDepth(ND_FiBwDrain)
], [0; 90]*deg, ND_FiBwDrain, EN_PipeSpec, ["FiBwTanks"])
FiBwDrainCoupling := CouplingSUBF([
    Fi_origin[0] + 2*T_PlantWall + L_FiBw + L_FiBwWeirDrain/2;
    Fi_origin[1] - T_PlantWall/2;
    Z_FiBwWeirDrainBottom - CouplingLength(ND_FiBwWeirDrain) + SocketDepth(ND_FiBwWeirDrain)
], [0; 90]*deg, ND_FiBwWeirDrain, EN_PipeSpec, ["FiBwTanks"])
LayerFiCouplingFreeze := FreezeLayer("FiCoupling")
FiAuxCouplingScript := stack(LayerFiCoupling, FiOverflowToDistCoupling, FiOverflowCoupling, DistCoupling, FiBwDrainCoupling, FiBwCoupling, LayerFiCouplingFreeze)
# Piping
# For all pipes, if the coupling does not extend out of the concrete floor, the pipe needs to extend 1 socket depth out of the concrete for the subsequent fitting.  If it does extend out of the concrete, we only want to the pipe length to be 2 socket depths: 1 for the coupling, 1 for the other fitting
LayerFiAuxPiping := layer_new("FiAuxPiping", blue)
FiOverflowConnectingPipe := PipeSUBF([
    FiExitBox_origin[0] + (T_PlantWall + CouplingLength(ND_DistPipe))/2 - SocketDepth(ND_DistPipe);
    FiExitBox_origin[1] - T_PlantWall - W_FiOverflow/2;
    Z_FiOverflowBottom - T_ConcreteMin - ConRadius(ND_DistPipe) + H_FiEntrance
], max((T_PlantWall - CouplingLength(ND_DistPipe)) + 2*SocketDepth(ND_DistPipe), 2*SocketDepth(ND_DistPipe)), [0; 0]*deg, ND_DistPipe, EN_PipeSpec, ["FiOverflow"])
FiOverflowToDistElbow := ElbowF([
    FiExitBox_origin[0] - SocketDepth(ND_DistPipe);
    FiExitBox_origin[1] - T_PlantWall - W_FiOverflow/2;
    Z_FiOverflowBottom - T_ConcreteMin - ConRadius(ND_DistPipe) + H_FiEntrance
], [90; 0; 90]*deg, ND_DistPipe, EN_PipeSpec)
FiOverflowConnectingPipe2 := PipeF([
    FiExitBox_origin[0] - ElbowRadius(ND_DistPipe) - SocketDepth(ND_DistPipe);
    FiExitBox_origin[1] - T_PlantWall - W_FiOverflow/2;
    Z_FiOverflowBottom - T_ConcreteMin - ConRadius(ND_DistPipe) + H_FiEntrance - ElbowRadius(ND_DistPipe)
], H_FiExit + SocketDepth(ND_DistPipe), [0; 270]*deg, ND_DistPipe, EN_PipeSpec)
FiDistPipe1 := PipeF([
    FiExitBox_origin[0] - L_FiExit/2;
    FiExitBox_origin[1] - T_PlantWall - W_FiOverflow/2;
    Z_FiOverflowBottom - CouplingLength(ND_DistPipe) + SocketDepth(ND_DistPipe)
], min(-(T_PlantWall - CouplingLength(ND_DistPipe)) - 2*SocketDepth(ND_DistPipe), -2*SocketDepth(ND_DistPipe)), [0; 90]*deg, ND_DistPipe, EN_PipeSpec)
FiDistElbow := ElbowF([
    FiExitBox_origin[0] - L_FiExit/2;
    FiExitBox_origin[1] - T_PlantWall - W_FiOverflow/2 - ElbowRadius(ND_DistPipe);
    Z_FiOverflowBottom - CouplingLength(ND_DistPipe) - ElbowRadius(ND_DistPipe) - SocketDepth(ND_DistPipe)
], [0; 90; 0]*deg, ND_DistPipe, EN_PipeSpec)
FiDistPipe2 := PipeF([
    FiExitBox_origin[0] - L_FiExit/2;
    FiExitBox_origin[1] - T_PlantWall - W_FiOverflow/2 - ElbowRadius(ND_DistPipe);
    (Z_FiOverflowBottom - CouplingLength(ND_DistPipe)) - SocketDepth(ND_DistPipe) - ElbowRadius(ND_DistPipe)
], 50 cm, [90; 0]*deg, ND_DistPipe, EN_PipeSpec)
Z_FiOverflowDrainPipeStart := Z_FiOverflowBottom - CouplingLength(ND_FiEntranceOverflow) + SocketDepth(ND_FiEntranceOverflow) = -0.832382 m
Z_FiOverflowDrainPipeEnd := Z_FiBwBottom - T_PlantWall - (10 cm + ConRadius(ND_FiEntranceOverflow)) + ElbowRadius(ND_FiEntranceOverflow) = -3.89592 m
FiOverflowDrainPipe := PipeSUBF([
    FiEntranceBox_origin[0] - L_FiOverflow/2;
    FiEntranceBox_origin[1] - T_PlantWall - W_FiOverflow/2;
    Z_FiOverflowDrainPipeStart
], Z_FiOverflowDrainPipeStart - Z_FiOverflowDrainPipeEnd, [0; 270]*deg, ND_FiEntranceOverflow, EN_PipeSpec, ["FiOverflow"])
FiOverflowDrainElbow := ElbowF([
    FiEntranceBox_origin[0] - L_FiOverflow/2;
    FiEntranceBox_origin[1] - T_PlantWall - W_FiOverflow/2;
    Z_FiOverflowDrainPipeEnd
], [180; 0; 90]*deg, ND_FiEntranceOverflow, EN_PipeSpec)
Z_FiBwOverflowPipeStart := Z_FiBwWeirDrainBottom - CouplingLength(ND_FiBwWeirDrain) + SocketDepth(ND_FiBwWeirDrain)
Z_FiBwOverflowPipeEnd := Z_FiBwBottom - T_PlantWall - (10 cm + ConRadius(ND_FiBwWeirDrain)) + ElbowRadius(ND_FiBwWeirDrain)
FiBwOverflowPipe := PipeSUBF([
    Fi_origin[0] + 2*T_PlantWall + L_FiBw + L_FiBwWeirDrain/2;
    Fi_origin[1] - T_PlantWall/2;
    Z_FiBwOverflowPipeStart
], Z_FiBwOverflowPipeStart - Z_FiBwOverflowPipeEnd, [0; 270]*deg, ND_FiBwWeirDrain, EN_PipeSpec, ["FiBwTanks"])
FiBwOverflowElbow := ElbowF([
    Fi_origin[0] + 2*T_PlantWall + L_FiBw + L_FiBwWeirDrain/2 + ElbowRadius(ND_FiBwWeirDrain);
    Fi_origin[1] - T_PlantWall/2;
    Z_FiBwOverflowPipeEnd
], [90; 0; 270]*deg, ND_FiBwWeirDrain, EN_PipeSpec)
# This does not require a start/end because the elbow extends deeper than 10 cm as is and is under the Bw box so splashing shouldn't be a concern
FiBwDrainPipe := PipeSUBF([
    Fi_origin[0] + 2*T_PlantWall + L_FiBw/2;
    Fi_origin[1] - T_PlantWall/2;
    Z_FiBwBottom - CouplingLength(ND_FiBwDrain) + SocketDepth(ND_FiBwDrain)
], min(-(T_PlantWall - CouplingLength(ND_FiBwDrain)) - 2*SocketDepth(ND_FiBwDrain), -2*SocketDepth(ND_FiBwDrain)), [0; 270]*deg, ND_FiBwDrain, EN_PipeSpec, ["FiBwTanks"])
FiBwDrainElbow := ElbowF([
    Fi_origin[0] + 2*T_PlantWall + L_FiBw/2 + ElbowRadius(ND_FiBwDrain);
    Fi_origin[1] - T_PlantWall/2;
    Z_FiBwBottom - T_PlantWall - SocketDepth(ND_FiBwDrain)
], [90; 0; 270]*deg, ND_FiBwWeirDrain, EN_PipeSpec)
LayerFiPipingFreeze := FreezeLayer("FiAuxPiping")
FiAuxPipeScript := stack(LayerFiAuxPiping, FiOverflowConnectingPipe, FiOverflowToDistElbow, FiOverflowConnectingPipe2, FiDistPipe1, FiDistElbow, FiDistPipe2, FiOverflowDrainPipe, FiOverflowDrainElbow, FiBwOverflowPipe, FiBwOverflowElbow, FiBwDrainPipe, FiBwDrainElbow, LayerFiPipingFreeze)
FiAuxScript := stack(FiAuxTanksScript, FiAuxCouplingScript, FiAuxPipeScript)
# [component: inputs FiAuxScript]
# Entrance and Exit Box Script
layernewcbox := layer_new("SRSFcontrolboxes", ltgrey)
tankebox := Tank(FiExitBox_origin, FiExitBox_dim, T_PlantWall)
tankibox := Tank(FiEntranceBox_origin, FiEntranceBox_dim, T_PlantWall)
group4 := FreezeLayer("SRSFcontrolboxes")
eweir := BoxF([FiEntranceBox_origin[0]; FiEntranceBox_origin[1] - T_PlantWall; FiEntranceWeir_origin[2]], [
    FiEntranceBox_origin[0] - L_FiWeir;
    FiEntranceBox_origin[1];
    FiEntranceBox_origin[2] + H_FiEntrance
], [0; 0; 0]*deg)
exitweir := BoxF([FiExitBox_origin[0]; FiEntranceBox_origin[1] - T_PlantWall; Z_FiExitWeir], [FiExitBox_origin[0] - L_FiWeir; FiEntranceBox_origin[1]; FiEntranceBox_origin[2] + H_FiExit], [0; 0; 0]*deg)
bwweir := BoxF([Fi_origin[0] + 2*T_PlantWall + L_FiBw; FiExitBox_origin[1] - 2*T_PlantWall - W_FiBw/2; Z_FiBwWeir], [
    Fi_origin[0] + T_PlantWall + L_FiBw;
    (FiExitBox_origin[1] - 2*T_PlantWall) + W_FiBw/2;
    Z_FiBwBottom + H_FiBw
], [0; 0; 0]*deg)
group5 := GroupAll("DeleteMe")
subtractweirs := SubtractF(["SRSFcontrolboxes"; "FilterBWDrainChannel"], "DeleteMe")
layernewcoup := layer_new("controlcouplings", green)
ecoupling0 := CouplingSUBF([FiExitCoupling0_origin[0]; FiBwInletCoupling_origin[1]; FiExitCoupling0_origin[2]], [0; 90]*deg, ND_FiTrunk, EN_PipeSpec, ["SRSFcontrolboxes"])
ecoupling1 := CouplingSUBF([FiExitCoupling1_origin[0]; FiBwInletCoupling_origin[1]; FiExitCoupling1_origin[2]], [0; 90]*deg, ND_FiTrunk, EN_PipeSpec, ["SRSFcontrolboxes"])
ecoupling2 := CouplingSUBF([FiExitCoupling0_origin[0]; FiExitCoupling2_origin[1]; FiExitCoupling2_origin[2]], [0; 90]*deg, ND_FiTrunk, EN_PipeSpec, ["SRSFcontrolboxes"])
ecoupling3 := CouplingSUBF([FiExitCoupling3_origin[0]; FiExitCoupling3_origin[1]; FiExitCoupling3_origin[2]], [0; 90]*deg, ND_FiTrunk, EN_PipeSpec, ["SRSFcontrolboxes"])
bwcoup1 := CouplingSUBF([FiBwInletCoupling_origin[0]; FiBwInletCoupling_origin[1]; FiBwInletCoupling_origin[2]], [0; 90]*deg, ND_FiBwTrunk, EN_PipeSpec, ["SRSFcontrolboxes"])
icoupling1 := CouplingSUBF([FiInletCoupling1_origin[0]; FiBwInletCoupling_origin[1]; FiInletCoupling1_origin[2]], [0; 90]*deg, ND_FiTrunk, EN_PipeSpec, ["SRSFcontrolboxes"])
icoupling2 := CouplingSUBF([
    FiInletCoupling2_origin[0];
    FiEntranceBox_origin[1] + 2*T_ConcreteMin + 1.5*ND_FiTrunk;
    FiInletCoupling2_origin[2]
], [0; 90]*deg, ND_FiTrunk, EN_PipeSpec, ["SRSFcontrolboxes"])
icoupling3 := CouplingSUBF([
    FiInletCoupling3_origin[0];
    FiEntranceBox_origin[1] + 2*T_ConcreteMin + 1.5*ND_FiTrunk;
    FiInletCoupling3_origin[2]
], [0; 90]*deg, ND_FiTrunk, EN_PipeSpec, ["SRSFcontrolboxes"])
layerfreezec := FreezeLayer("controlcouplings")
mirror5 := Mirror3dGroup("controlcouplings", "y", [Fi_origin[0]; Fi_origin[1] - T_PlantWall; Fi_origin[2]], "n")
layernewcpipes := layer_new("controlpipes", blue)
FiBwPipe := PipeF([FiBwInletCoupling_origin[0]; FiBwInletCoupling_origin[1]; FiBwInletCoupling_origin[2]], H_Fi - H_FiEntrance - ElbowRadius(ND_FiBwTrunk) - ND_FiBwTrunk/2 - SocketDepth(ND_FiBwTrunk), [0; 270]*deg, ND_FiBwTrunk, EN_PipeSpec)
FiBwDrainElbow := ElbowF([
    FiBwInletCoupling_origin[0];
    FiBwInletCoupling_origin[1];
    Fi_origin[2] + outerdiameter(ND_FiBwManBranch)/2 + ElbowRadius(ND_FiBwTrunk)
], [0; 0; 270]*deg, ND_FiBwTrunk, EN_PipeSpec)
cpipe1 := PipeF([FiInletCoupling1_origin[0]; FiBwInletCoupling_origin[1]; FiInletCoupling1_origin[2]], H_Fi - H_FiEntrance - ElbowRadius(ND_FiTrunk) - ND_FiBwTrunk/2 - 40 cm - SocketDepth(ND_FiTrunk)/2, [0; 270]*deg, ND_FiTrunk, EN_PipeSpec)
elbow1 := ElbowF([
    FiInletCoupling1_origin[0];
    FiBwInletCoupling_origin[1];
    Fi_origin[2] + outerdiameter(ND_FiBwManBranch)/2 + 40 cm + ElbowRadius(ND_FiTrunk)
], [0; 0; 270]*deg, ND_FiTrunk, EN_PipeSpec)
cpipe2 := PipeF([
    FiInletCoupling2_origin[0];
    FiEntranceBox_origin[1] + 2*T_ConcreteMin + 1.5*ND_FiTrunk;
    FiInletCoupling2_origin[2]
], H_Fi - H_FiEntrance - 2*ElbowRadius(ND_FiTrunk) - ND_FiBwTrunk/2 - 60 cm - SocketDepth(ND_FiTrunk)/2, [0; 270]*deg, ND_FiTrunk, EN_PipeSpec)
elbow2 := ElbowF([
    FiExitCoupling1_origin[0];
    FiBwInletCoupling_origin[1] - ElbowRadius(ND_FiTrunk);
    Fi_origin[2] + outerdiameter(ND_FiBwManBranch)/2 + 80 cm
], [0; 0; 0]*deg, ND_FiTrunk, EN_PipeSpec)
pipe2a := PipeF([
    FiExitCoupling1_origin[0];
    FiBwInletCoupling_origin[1] - ElbowRadius(ND_FiTrunk);
    Fi_origin[2] + outerdiameter(ND_FiBwManBranch)/2 + 80 cm
], W_FiExit - 2*T_ConcreteMin - ND_FiTrunk - 3*ElbowRadius(ND_FiTrunk), [90; 0]*deg, ND_FiTrunk, EN_PipeSpec)
elbow2a := ElbowF([
    FiExitCoupling1_origin[0];
    FiBwInletCoupling_origin[1] + 2*ElbowRadius(ND_FiTrunk) - W_FiExit + 2*T_ConcreteMin + ND_FiTrunk;
    Fi_origin[2] + outerdiameter(ND_FiBwManBranch)/2 + 80 cm
], [180; 0; 0]*deg, ND_FiTrunk, EN_PipeSpec)
pipe2b := PipeF([
    FiInletCoupling2_origin[0] - ElbowRadius(ND_FiTrunk);
    FiEntranceBox_origin[1] + 2*T_ConcreteMin + 1.5*ND_FiTrunk;
    Fi_origin[2] + outerdiameter(ND_FiBwManBranch)/2 + 80 cm
], 2*L_FiExit - 2*T_ConcreteMin - ND_FiTrunk - ElbowRadius(ND_FiTrunk) - 2*SocketDepth(ND_FiTrunk), [0; 0]*deg, ND_FiTrunk, EN_PipeSpec)
elbow2b := ElbowF([
    FiInletCoupling2_origin[0] - ElbowRadius(ND_FiTrunk);
    FiEntranceBox_origin[1] + 2*T_ConcreteMin + 1.5*ND_FiTrunk;
    Fi_origin[2] + outerdiameter(ND_FiBwManBranch)/2 + 80 cm
], [90; 180; 270]*deg, ND_FiTrunk, EN_PipeSpec)
cpipe3 := PipeF([
    FiInletCoupling3_origin[0];
    FiEntranceBox_origin[1] + 2*T_ConcreteMin + 1.5*ND_FiTrunk;
    FiInletCoupling3_origin[2]
], H_Fi - H_FiEntrance - 3*ElbowRadius(ND_FiTrunk) - ND_FiBwTrunk/2 - 80 cm - SocketDepth(ND_FiTrunk)/2 + SocketDepth(ND_FiTrunk), [0; 270]*deg, ND_FiTrunk, EN_PipeSpec)
elbow3 := ElbowF([
    FiExitCoupling1_origin[0] - ElbowRadius(ND_FiTrunk);
    FiBwInletCoupling_origin[1] - ElbowRadius(ND_FiTrunk);
    Fi_origin[2] + outerdiameter(ND_FiBwManBranch)/2 + 120 cm
], [0; 0; 0]*deg, ND_FiTrunk, EN_PipeSpec)
pipe3a := PipeF([
    FiExitCoupling1_origin[0] - ElbowRadius(ND_FiTrunk);
    FiBwInletCoupling_origin[1] - ElbowRadius(ND_FiTrunk);
    Fi_origin[2] + outerdiameter(ND_FiBwManBranch)/2 + 120 cm
], W_FiExit - 2*T_ConcreteMin - ND_FiTrunk - 3*ElbowRadius(ND_FiTrunk), [90; 0]*deg, ND_FiTrunk, EN_PipeSpec)
elbow3a := ElbowF([
    FiExitCoupling1_origin[0] - ElbowRadius(ND_FiTrunk);
    FiBwInletCoupling_origin[1] + 2*ElbowRadius(ND_FiTrunk) - W_FiExit + 2*T_ConcreteMin + ND_FiTrunk;
    Fi_origin[2] + outerdiameter(ND_FiBwManBranch)/2 + 120 cm
], [180; 0; 0]*deg, ND_FiTrunk, EN_PipeSpec)
pipe3b := PipeF([
    FiInletCoupling3_origin[0] - ElbowRadius(ND_FiTrunk);
    FiEntranceBox_origin[1] + 2*T_ConcreteMin + 1.5*ND_FiTrunk;
    Fi_origin[2] + outerdiameter(ND_FiBwManBranch)/2 + 120 cm
], 2*L_FiExit - 2*T_ConcreteMin - ND_FiTrunk - ElbowRadius(ND_FiTrunk) - 3*SocketDepth(ND_FiTrunk), [0; 0]*deg, ND_FiTrunk, EN_PipeSpec)
elbow3b := ElbowF([
    FiInletCoupling3_origin[0] - ElbowRadius(ND_FiTrunk);
    FiEntranceBox_origin[1] + 2*T_ConcreteMin + 1.5*ND_FiTrunk;
    Fi_origin[2] + outerdiameter(ND_FiBwManBranch)/2 + 120 cm
], [90; 180; 270]*deg, ND_FiTrunk, EN_PipeSpec)
epipe1 := PipeF([FiExitCoupling0_origin[0]; FiBwInletCoupling_origin[1]; FiExitCoupling0_origin[2]], H_Fi - H_FiEntrance - ElbowRadius(ND_FiTrunk) - ND_FiBwTrunk/2 - 60 cm - SocketDepth(ND_FiTrunk)/2, [0; 270]*deg, ND_FiTrunk, EN_PipeSpec)
eelbow1 := ElbowF([
    FiExitCoupling0_origin[0];
    FiBwInletCoupling_origin[1];
    Fi_origin[2] + outerdiameter(ND_FiBwManBranch)/2 + 60 cm + ElbowRadius(ND_FiTrunk)
], [0; 0; 270]*deg, ND_FiTrunk, EN_PipeSpec)
epipe2 := PipeF([FiExitCoupling1_origin[0]; FiBwInletCoupling_origin[1]; FiExitCoupling1_origin[2]], H_Fi - H_FiEntrance - ElbowRadius(ND_FiTrunk) - ND_FiBwTrunk/2 - 100 cm - SocketDepth(ND_FiTrunk)/2, [0; 270]*deg, ND_FiTrunk, EN_PipeSpec)
eelbow2 := ElbowF([
    FiExitCoupling1_origin[0];
    FiBwInletCoupling_origin[1];
    Fi_origin[2] + outerdiameter(ND_FiBwManBranch)/2 + 100 cm + ElbowRadius(ND_FiTrunk)
], [0; 0; 270]*deg, ND_FiTrunk, EN_PipeSpec)
epipe3 := PipeF([FiExitCoupling0_origin[0]; FiExitCoupling2_origin[1]; FiExitCoupling2_origin[2]], H_Fi - H_FiEntrance - ElbowRadius(ND_FiTrunk) - ND_FiBwTrunk/2 - 20 cm - SocketDepth(ND_FiTrunk)/2, [0; 270]*deg, ND_FiTrunk, EN_PipeSpec)
eelbow3 := ElbowF([
    FiExitCoupling3_origin[0];
    FiExitCoupling3_origin[1];
    FiExitCoupling3_origin[2] - 2*SocketDepth(ND_FiTrunk)
], [180; 225; 90]*deg, ND_FiTrunk, EN_PipeSpec)
delbow1 := ElbowF([
    FiExitCoupling3_origin[0] - ElbowRadius(ND_FiTrunk);
    FiExitCoupling3_origin[1] - ElbowRadius(ND_FiTrunk);
    FiExitCoupling3_origin[2] - 2*SocketDepth(ND_FiTrunk) - ElbowRadius(ND_FiTrunk)
], [90; 45; 90]*deg, ND_FiTrunk, EN_PipeSpec)
dpipebw := PipeF([
    FiExitCoupling3_origin[0] - ElbowRadius(ND_FiTrunk);
    FiExitCoupling3_origin[1] - ElbowRadius(ND_FiTrunk);
    FiExitCoupling3_origin[2] - 2*SocketDepth(ND_FiTrunk) - ElbowRadius(ND_FiTrunk)
], 50 cm, [90; 45; 90]*deg, ND_FiTrunk, EN_PipeSpec)
epipe4 := epipe4 ← PipeF([FiExitCoupling3_origin[0]; FiExitCoupling3_origin[1]; FiExitCoupling3_origin[2]], 2*SocketDepth(ND_FiTrunk), [0; 270]*deg, ND_FiTrunk, EN_PipeSpec)
eelbow4 := ElbowF([
    FiExitCoupling0_origin[0];
    FiBwInletCoupling_origin[1] - ElbowRadius(ND_FiTrunk);
    Fi_origin[2] + outerdiameter(ND_FiBwManBranch)/2 + 20 cm
], [0; 0; 0]*deg, ND_FiTrunk, EN_PipeSpec)
epipe4a := PipeF([
    FiExitCoupling0_origin[0];
    FiBwInletCoupling_origin[1] - ElbowRadius(ND_FiTrunk);
    Fi_origin[2] + outerdiameter(ND_FiBwManBranch)/2 + 20 cm
], W_FiExit - 2*T_ConcreteMin - ND_FiTrunk - 2*ElbowRadius(ND_FiTrunk) - SocketDepth(ND_FiTrunk), [90; 0]*deg, ND_FiTrunk, EN_PipeSpec)
eelbow4a := ElbowF([
    FiExitCoupling0_origin[0];
    FiExitCoupling3_origin[1] + ElbowRadius(ND_FiTrunk);
    Fi_origin[2] + outerdiameter(ND_FiBwManBranch)/2 + 20 cm
], [180; 270; 0]*deg, ND_FiTrunk, EN_PipeSpec)
layerfrpipe := FreezeLayer("controlpipes")
mirror6 := Mirror3dGroup("controlpipes", "y", [Fi_origin[0]; Fi_origin[1] - T_PlantWall; Fi_origin[2]], "n")
layerfreezecboxes := FreezeLayer("SRSFcontrolboxes")
mirror7 := Mirror3dGroup("SRSF controlboxes", "y", [Fi_origin[0]; Fi_origin[1] - T_PlantWall; Fi_origin[2]], "n")
FiEntExitScript :=
    if N_Fi == 1
        one ← stack(layernewcbox, tankebox, tankibox, group4, eweir, exitweir, bwweir, group5, subtractweirs, layernewcoup, ecoupling0, ecoupling1, ecoupling2, ecoupling3, bwcoup1, icoupling1, icoupling2, icoupling3, layerset, layerfreezec, layernewcpipes, bwpipe1, bwelbow1, cpipe1, elbow1, cpipe2, elbow2, pipe2a, elbow2a, pipe2b, elbow2b, cpipe3, elbow3, pipe3a, elbow3a, pipe3b, elbow3b, epipe1)
        two ← stack(one, eelbow1, epipe2, eelbow2, epipe3, eelbow3, delbow1, epipe4, eelbow4, epipe4a, eelbow4a, layerset, layerfrpipe, bigunion, layerfreezecboxes)
        return two
    if N_Fi ≥ 2
        three ← stack(layernewcbox, tankebox, tankibox, group4, eweir, exitweir, bwweir, group5, subtractweirs, layernewcoup, ecoupling0, ecoupling1, ecoupling2, ecoupling3, bwcoup1, icoupling1, icoupling2, icoupling3, layerset, layerfreezec, mirror5, layernewcpipes, bwpipe1, bwelbow1, cpipe1, elbow1, cpipe2, elbow2, pipe2a, elbow2a, pipe2b, elbow2b, cpipe3, elbow3, pipe3a, elbow3a, pipe3b, elbow3b, epipe1, eelbow1)
        four ← stack(three, epipe2, eelbow2, epipe3, eelbow3, delbow1, epipe4, eelbow4, epipe4a, eelbow4a, layerset, layerfrpipe, mirror6, bigunion, layerfreezecboxes, mirror7)
        return four
# Filter Script
layernewfilt := layer_new("SRSF filters", ltgrey)
tankfilt := Tank(Fi_origin, Fi_dim, T_PlantWall)
addbox := BoxF([Fi_origin[0] + T_PlantWall; Fi_origin[1] - T_PlantWall; Fi_origin[2] - T_PlantWall], [Fi_origin[0] - Fi_dim[0] - T_PlantWall; Fi_origin[1] + Fi_dim[1] + T_PlantWall; Fi_origin[2]], [0; 0; 0]*deg)
group3 := FreezeLayer("SRSF filters")
layernewcouplings := layer_new("filtcouplings", green)
bwcoupling1 := CouplingSUBF([
    Fi_origin[0] + CouplingLength(ND_FiBwTrunk) - SocketDepth(ND_FiBwTrunk);
    FiBwInletCoupling_origin[1];
    Fi_origin[2] + outerdiameter(ND_FiBwManBranch)/2
], [0; 0]*deg, ND_FiBwTrunk, EN_PipeSpec, ["SRSF filters"])
coupling12 := CouplingSUBF([
    Fi_origin[0] + CouplingLength(ND_FiTrunk) - SocketDepth(ND_FiTrunk);
    FiBwInletCoupling_origin[1];
    Fi_origin[2] + outerdiameter(ND_FiBwManBranch)/2 + 20 cm
], [0; 0]*deg, ND_FiTrunk, EN_PipeSpec, ["SRSF filters"])
coupling13 := CouplingSUBF([
    Fi_origin[0] + CouplingLength(ND_FiTrunk) - SocketDepth(ND_FiTrunk);
    FiBwInletCoupling_origin[1];
    Fi_origin[2] + outerdiameter(ND_FiBwManBranch)/2 + 40 cm
], [0; 0]*deg, ND_FiTrunk, EN_PipeSpec, ["SRSF filters"])
coupling14 := CouplingSUBF([
    Fi_origin[0] + CouplingLength(ND_FiTrunk) - SocketDepth(ND_FiTrunk);
    FiBwInletCoupling_origin[1];
    Fi_origin[2] + outerdiameter(ND_FiBwManBranch)/2 + 60 cm
], [0; 0]*deg, ND_FiTrunk, EN_PipeSpec, ["SRSF filters"])
coupling15 := CouplingSUBF([
    Fi_origin[0] + CouplingLength(ND_FiTrunk) - SocketDepth(ND_FiTrunk);
    FiBwInletCoupling_origin[1];
    Fi_origin[2] + outerdiameter(ND_FiBwManBranch)/2 + 80 cm
], [0; 0]*deg, ND_FiTrunk, EN_PipeSpec, ["SRSF filters"])
coupling16 := CouplingSUBF([
    Fi_origin[0] + CouplingLength(ND_FiTrunk) - SocketDepth(ND_FiTrunk);
    FiBwInletCoupling_origin[1];
    Fi_origin[2] + outerdiameter(ND_FiBwManBranch)/2 + 100 cm
], [0; 0]*deg, ND_FiTrunk, EN_PipeSpec, ["SRSF filters"])
coupling17 := CouplingSUBF([
    Fi_origin[0] + CouplingLength(ND_FiTrunk) - SocketDepth(ND_FiTrunk);
    FiBwInletCoupling_origin[1];
    Fi_origin[2] + outerdiameter(ND_FiBwManBranch)/2 + 120 cm
], [0; 0]*deg, ND_FiTrunk, EN_PipeSpec, ["SRSF filters"])
siphonc1 := CouplingSUBF([
    Fi_origin[0] + CouplingLength(ND_FiSiphon) - SocketDepth(ND_FiSiphon);
    Fi_origin[1] + T_ConcreteMin + OuterDiameterFittingPVC(ND_FiSiphon)/2;
    Z_FiSiphonCoupling
], [0; 0]*deg, ND_FiSiphon, EN_PipeSpec, ["SRSF filters"])
layerset := layer_set("0")
layerfreezeco := FreezeLayer("filtcouplings")
mirror1 := Mirror3dGroup("filtercouplings", "y", [Fi_origin[0]; Fi_origin[1] - T_PlantWall; Fi_origin[2]], "n")
# Filter manifold
# Trunks
LayerTrunks := layer_new("FiTrunks", blue)
FiTrunk := ManifoldG([Fi_origin[0] + SocketDepth(ND_FiTrunk); FiBwInletCoupling_origin[1]; Fi_origin[2] + T_FiLayer], L_Fi + SocketDepth(ND_FiTrunk), B_FiManifoldBranch/2, [0; 0; 90]*deg, ND_FiTrunk, EN_PipeSpec, N_FiManBranch, 2*outerradius(ND_FiManBranch), B_FiManifoldBranch)
ArrayFiTrunks := ArrayLast(N_FiLayer, 1, T_FiLayer)
LayerBwTrunk := layer_new("BwTrunk", blue)
BwTrunk := ManifoldG([
    Fi_origin[0] + SocketDepth(ND_FiBwTrunk);
    FiBwInletCoupling_origin[1];
    Fi_origin[2] + ConRadius(ND_FiBwManBranch)
], L_Fi + SocketDepth(ND_FiBwTrunk), B_FiManifoldBranch/2, [0; 0; 90]*deg, ND_FiBwTrunk, EN_PipeSpec, N_FiManBranch, 2*outerradius(ND_FiBwManBranch), B_FiManifoldBranch)
FreezeFiTrunkLayer := FreezeLayer("FiTrunks")
FreezeBwTrunkLayer := FreezeLayer("BwTrunk")
FiTrunkScript := stack(LayerTrunks, FiTrunk, viewfront1, ArrayFiTrunks, viewtop1, FreezeFiTrunkLayer, LayerBwTrunk, BwTrunk, FreezeBwTrunkLayer)
# Filter Branches
LayerMan := layer_new("FiMan", red)
FiManBranch := PipeF(FiManTee_Origin, L_FiManBranch, [-90; 0]*deg, ND_FiManBranch, EN_FiBranchPipeSpec)
FiManTee := TeeF(FiManTee_Origin, [0; 0; 0]*deg, ND_FiManBranch, EN_FiBranchPipeSpec)
ArrayManBranches := array_all(1, N_FiManBranch - 2, -B_FiManifoldBranch)
FiManBranchRight := PipeF(FiManTee_Origin + [B_FiManifoldBranch; ElbowRadius(ND_FiManBranch) - ShortTeeLength(ND_FiManBranch); 0 m], L_FiManBranch, [-90; 0]*deg, ND_FiManBranch, EN_FiBranchPipeSpec)
FiManBranchLeft := PipeF(FiManTee_Origin + [-L_Fi + 2*B_FiManifoldBranch; ElbowRadius(ND_FiManBranch) - ShortTeeLength(ND_FiManBranch); 0 m], L_FiManBranch, [-90; 0]*deg, ND_FiManBranch, EN_FiBranchPipeSpec)
FiManBranchRightElbow := ElbowF(FiManTee_Origin + [B_FiManifoldBranch; ElbowRadius(ND_FiManBranch) - ShortTeeLength(ND_FiManBranch); 0 m], [0; 0; 180]*deg, ND_FiManBranch, EN_FiBranchPipeSpec)
FiManBranchLeftElbow := ElbowF(FiManTee_Origin + [-L_Fi + 2*B_FiManifoldBranch; ElbowRadius(ND_FiManBranch) - ShortTeeLength(ND_FiManBranch); 0 m], [180; 0; 0]*deg, ND_FiManBranch, EN_FiBranchPipeSpec)
ArrayFiMan := array_all(N_FiLayer, 1, T_FiLayer)
FiManScript := stack(LayerMan, FiManBranch, FiManTee, ArrayManBranches, FiManBranchRight, FiManBranchLeft, FiManBranchRightElbow, FiManBranchLeftElbow, viewfront1, ArrayFiMan, viewtop1)
# Backwash branches
BwManBranch := PipeF(BwManTee_Origin, L_FiBwManBranch, [-90; 0]*deg, ND_FiBwManBranch, EN_FiBranchPipeSpec)
ArrayBwManBranches := ArrayLast(1, N_FiManBranch - 2, -B_FiManifoldBranch)
BwManTee := TeeF(BwManTee_Origin, [0; 0; 0]*deg, ND_FiBwManBranch, EN_FiBranchPipeSpec)
BwManBranchRight := PipeF(BwManTee_Origin + [B_FiManifoldBranch; ElbowRadius(ND_FiBwManBranch) - ShortTeeLength(ND_FiBwManBranch); 0 m], L_FiBwManBranch, [-90; 0]*deg, ND_FiBwManBranch, EN_FiBranchPipeSpec)
BwManBranchLeft := PipeF(BwManTee_Origin + [-L_Fi + 2*B_FiManifoldBranch; ElbowRadius(ND_FiManBranch) - ShortTeeLength(ND_FiManBranch); 0 m], L_FiBwManBranch, [-90; 0]*deg, ND_FiBwManBranch, EN_FiBranchPipeSpec)
BwManBranchRightElbow := ElbowF(BwManTee_Origin + [B_FiManifoldBranch; ElbowRadius(ND_FiManBranch) - ShortTeeLength(ND_FiManBranch); 0 m], [0; 0; 180]*deg, ND_FiBwManBranch, EN_FiBranchPipeSpec)
BwManBranchLeftElbow := ElbowF(BwManTee_Origin + [-L_Fi + 2*B_FiManifoldBranch; ElbowRadius(ND_FiManBranch) - ShortTeeLength(ND_FiManBranch); 0 m], [180; 0; 0]*deg, ND_FiBwManBranch, EN_FiBranchPipeSpec)
FreezeFiManLayer := FreezeLayer("FiMan")
BwManScript := stack(BwManBranch, ArrayBwManBranches, BwManTee, ArrayBwManBranches, BwManBranchRight, BwManBranchLeft, BwManBranchRightElbow, BwManBranchLeftElbow, FreezeFiManLayer)
FiManScript := stack(FiTrunkScript, FiManScript, BwManScript)
# Filter Box and Piping
layerfrman := FreezeLayer("filter manifolds")
rotateman := RotateGroup("filter manifolds", "z", [FiBwInletCoupling_origin[1]], 90)
mirror2 := Mirror3dGroup("filter manifolds", "y", [Fi_origin[0]; Fi_origin[1] - T_PlantWall; Fi_origin[2]], "n")
frmanbranch := FreezeLayer("manifold branches")
mirrormanbranch := Mirror3dGroup("manifold branches", "y", [Fi_origin[0]; Fi_origin[1] - T_PlantWall; Fi_origin[2]], "n")
layernewpipe := layer_new("pipes", blue)
bwpipe := PipeF([
    Fi_origin[0] + CouplingLength(ND_FiBwTrunk) - SocketDepth(ND_FiBwTrunk);
    FiBwInletCoupling_origin[1];
    Fi_origin[2] + outerdiameter(ND_FiBwManBranch)/2
], W_MpWalkway + 2*T_PlantWall + L_FiExit + L_FiEntrance - T_ConcreteMin - ND_FiBwTrunk/2 - ElbowRadius(ND_FiBwTrunk), [0; 180]*deg, ND_FiBwTrunk, EN_PipeSpec)
pipe2 := PipeF([
    Fi_origin[0] + CouplingLength(ND_FiBwTrunk) - SocketDepth(ND_FiBwTrunk);
    FiBwInletCoupling_origin[1];
    Fi_origin[2] + outerdiameter(ND_FiBwManBranch)/2 + 20 cm
], W_MpWalkway + T_PlantWall + L_FiExit - T_ConcreteMin - ND_FiTrunk/2 - ElbowRadius(ND_FiTrunk), [0; 180]*deg, ND_FiTrunk, EN_PipeSpec)
pipe3 := PipeF([
    Fi_origin[0] + CouplingLength(ND_FiBwTrunk) - SocketDepth(ND_FiBwTrunk);
    FiBwInletCoupling_origin[1];
    Fi_origin[2] + outerdiameter(ND_FiBwManBranch)/2 + 40 cm
], W_MpWalkway + 2*T_PlantWall + L_FiExit + T_ConcreteMin + ND_FiTrunk/2 - ElbowRadius(ND_FiTrunk), [0; 180]*deg, ND_FiTrunk, EN_PipeSpec)
pipe4 := PipeF([
    Fi_origin[0] + CouplingLength(ND_FiBwTrunk) - SocketDepth(ND_FiBwTrunk);
    FiBwInletCoupling_origin[1];
    Fi_origin[2] + outerdiameter(ND_FiBwManBranch)/2 + 60 cm
], W_MpWalkway + T_PlantWall + L_FiExit - T_ConcreteMin - ND_FiTrunk/2 - ElbowRadius(ND_FiTrunk), [0; 180]*deg, ND_FiTrunk, EN_PipeSpec)
pipe5 := PipeF([
    Fi_origin[0] + CouplingLength(ND_FiBwTrunk) - SocketDepth(ND_FiBwTrunk);
    FiBwInletCoupling_origin[1];
    Fi_origin[2] + outerdiameter(ND_FiBwManBranch)/2 + 80 cm
], W_MpWalkway + T_PlantWall + T_ConcreteMin + ND_FiTrunk/2 - ElbowRadius(ND_FiTrunk), [0; 180]*deg, ND_FiTrunk, EN_PipeSpec)
pipe6 := PipeF([
    Fi_origin[0] + CouplingLength(ND_FiBwTrunk) - SocketDepth(ND_FiBwTrunk);
    FiBwInletCoupling_origin[1];
    Fi_origin[2] + outerdiameter(ND_FiBwManBranch)/2 + 100 cm
], W_MpWalkway + T_PlantWall + T_ConcreteMin + ND_FiTrunk/2 - ElbowRadius(ND_FiTrunk), [0; 180]*deg, ND_FiTrunk, EN_PipeSpec)
pipe7 := PipeF([
    Fi_origin[0] + CouplingLength(ND_FiBwTrunk) - SocketDepth(ND_FiBwTrunk);
    FiBwInletCoupling_origin[1];
    Fi_origin[2] + outerdiameter(ND_FiBwManBranch)/2 + 120 cm
], W_MpWalkway + T_PlantWall + T_ConcreteMin + ND_FiTrunk/2 - 2*ElbowRadius(ND_FiTrunk), [0; 180]*deg, ND_FiTrunk, EN_PipeSpec)
spipe1 := PipeF([
    Fi_origin[0] + CouplingLength(ND_FiSiphon) - SocketDepth(ND_FiSiphon);
    Fi_origin[1] + T_ConcreteMin + OuterDiameterFittingPVC(ND_FiSiphon)/2;
    Z_FiSiphonCoupling
], 2*SocketDepth(ND_FiSiphon), [0; 180]*deg, ND_FiSiphon, EN_PipeSpec)
selbow1 := ElbowF([
    Fi_origin[0] + CouplingLength(ND_FiSiphon) + ElbowRadius(ND_FiSiphon) + SocketDepth(ND_FiSiphon);
    Fi_origin[1] + T_ConcreteMin + OuterDiameterFittingPVC(ND_FiSiphon)/2;
    Z_FiSiphonCoupling - ElbowRadius(ND_FiSiphon)
], [0; 0; 90]*deg, ND_FiSiphon, EN_PipeSpec)
spipe2 := PipeF([
    Fi_origin[0] - SocketDepth(ND_FiSiphon);
    Fi_origin[1] + T_ConcreteMin + OuterDiameterFittingPVC(ND_FiSiphon)/2;
    Z_FiSiphonCoupling
], 2*SocketDepth(ND_FiSiphon), [180; 0]*deg, ND_FiSiphon, EN_PipeSpec)
selbow2 := TeeF([
    Fi_origin[0] - SocketDepth(ND_FiSiphon);
    Fi_origin[1] + T_ConcreteMin + OuterDiameterFittingPVC(ND_FiSiphon)/2;
    Z_FiSiphonCoupling
], [90; 0; 0]*deg, ND_FiSiphon, EN_PipeSpec)
CouplingLength(ND_FiSiphon) = 0.15875 m
SocketDepth(ND_FiSiphon) = 0.057 m
spipe12 := PipeF([
    Fi_origin[0] + CouplingLength(ND_FiSiphon) + ElbowRadius(ND_FiSiphon) + SocketDepth(ND_FiSiphon);
    Fi_origin[1] + T_ConcreteMin + OuterDiameterFittingPVC(ND_FiSiphon)/2;
    Z_FiSiphonCoupling - ElbowRadius(ND_FiSiphon)
], Z_FiBwBottom - ND_FiSiphon, [0; 90]*deg, ND_FiSiphon, EN_PipeSpec)
isiphonpipe := PipeF([
    Fi_origin[0] - ShortTeeLength(ND_FiSiphon);
    Fi_origin[1] + T_ConcreteMin + OuterDiameterFittingPVC(ND_FiSiphon)/2;
    Z_FiSiphonCoupling - 100 cm
], 50 cm, [0; 90]*deg, ND_FiSiphon, EN_PipeSpec)
TeeLength(ND_FiSiphon) = 0.28575 m
isiphonpipec := PipeF([
    Fi_origin[0] + SocketDepth(ND_FiSiphon);
    Fi_origin[1] + T_ConcreteMin + OuterDiameterFittingPVC(ND_FiSiphon)/2;
    Z_FiSiphonCoupling
], 2*SocketDepth(ND_FiSiphon), [0; 180]*deg, ND_FiSiphon, EN_PipeSpec)
isiphonpipe2 := PipeF([
    Fi_origin[0] - ShortTeeLength(ND_FiSiphon);
    Fi_origin[1] + T_ConcreteMin + OuterDiameterFittingPVC(ND_FiSiphon)/2;
    Z_FiSiphonCoupling + 100 cm
], 50 cm, [0; 270]*deg, ND_FiSiphon, EN_PipeSpec)
Z_FiSiphonCoupling + TeeLength(ND_FiSiphon)/2
layerfreezepipe := FreezeLayer("pipes")
mirror3 := Mirror3dGroup("pipes", "y", [Fi_origin[0]; Fi_origin[1] - T_PlantWall; Fi_origin[2]], "n")
layerfreezefilt := FreezeLayer("SRSF filters")
mirror4 := Mirror3dGroup("SRSF filters", "y", [Fi_origin[0]; Fi_origin[1] - T_PlantWall; Fi_origin[2]], "n")
FiScript :=
    if N_Fi == 1
        one ← stack(layernewfilt, tankfilt, group3, layernewcouplings, bwcoupling1, coupling12, coupling13, coupling14, coupling15, coupling16, coupling17, siphonc1, layerfreezeco, FiManScript)
        two ← stack(one, layernewpipe, bwpipe, pipe2, pipe3, pipe4, pipe5, pipe6, pipe7, spipe1, selbow1, spipe2, selbow2, spipe12, isiphonpipe, isiphonpipec, isiphonpipe2, dpipe, dpipeelbow, layerfreezepipe, bigunion, layerfreezefilt)
        return two
    if N_Fi ≥ 2
        three ← stack(layernewfilt, tankfilt, addbox, group3, layernewcouplings, bwcoupling1, coupling12, coupling13, coupling14, coupling15, coupling16, coupling17, siphonc1, layerset, layerfreezeco, mirror1, layerman, man1, man2, man3, man4, man5, man6, man7, layerset)
        four ← stack(three, layerfrman, rotateman, mirror2, layernewmbranches, man1script, man2script, man3script, man4script, man5script, man6script, man7script, frmanbranch, mirrormanbranch, layernewpipe, bwpipe, pipe2, pipe3, pipe4, pipe5, pipe6, pipe7, pipe7, spipe1, selbow1, spipe2, selbow2, spipe12, isiphonpipe, isiphonpipec, isiphonpipe2, dpipe, dpipeelbow, layerset, layerfreezepipe, mirror3, bigunion, layerfreezefilt, mirror4)
        return four  # error: This variable is undefined.
AC_Filtertest := stack(FiInletChannelScript, FiAuxScript, FiEntExitScript, FiScript)  # error: This variable is undefined.
# [component: inputs AC_Filtertest]
AC_Filtertest =  # error: This variable is undefined.
