# Automated Design: AutoCAD: Sedimentation Tank
# Dimension Values
channelbox_dim :=
    dim ← [W_InletChannel; (N_SedTanks*W_Sed) + ((N_SedTanks + 1)*T_PlantWall); H_InletChannel] if sedlayout == 2
    dim ← [W_InletChannel; N_SedTanks*(W_Sed + T_PlantWall); H_InletChannel] if sedlayout == 3
    return dim
echannelbox_dim := [W_ExitChannel; N_SedTanks*(W_Sed + T_PlantWall); H_ExitChannel]
channelinletbox1_dim := [T_PlantWall; W_InletChannel + T_PlantWall; H_InletChannel]
channelinletbox2_dim := [W_InletChannel; W_Sed; H_Sed]
sedbottombox_dim := [-L_Sed; W_Sed; T_PlantWall]
channelclosebox_dim := [W_InletChannel + T_ChannelWall + T_PlantWall; T_PlantWall; H_InletChannel + T_ChannelWall]
channelinletwall_dim := [T_ChannelWall; W_Sed; H_Sed]
# The minimum function ensures that the control box is at least as wide as the channel that it is connected to. If need be it can be even wider if the plumbing connections require it to be wider.
echanneltank_dim := [W_ExitChannel; 4*ConRadius(ND_PltWeir) + 3*S_Elbow; H_ExitChannel]
echanneltankbox_dim := [
    -W_ExitChannel;
    4*ConRadius(ND_PltWeir) + 3*S_Elbow;
    ConRadius(ND_PltWeir) + ElbowRadius(ND_PltWeir) + SocketDepth(ND_PltWeir)
]  # I replaced
S_Elbow + ElbowRadius(ND_PltWeir) + ConRadius(ND_PltWeir) + SocketDepth(ND_PltWeir)
ichanneltank_dim := [W_InletChannel; (2*ConRadius(ND_PltWeir)) + (2*S_Elbow); H_InletChannel]
with
W_InletChannel
# W_ExitChannel | or
# in the four functions at the left.
ichanneltankbox_dim := [
    -W_InletChannel;
    (2*ConRadius(ND_PltWeir)) + (2*S_Elbow);
    ConRadius(ND_PltWeir) + ElbowRadius(ND_PltWeir) + SocketDepth(ND_PltWeir)
]
framewall_dim := [-L_Sed; T_ConcreteMin; -H_SedFrameWall]
textbox_dim := [L_Sed/2; W_SedBay]
SedWeirExit_Dim :=
    [W_SedWeirExit; T_SedWeir; H_SedWeirExit] if EN_InletChannelGeom == Perpindicular_Weir
    [T_SedWeir; W_SedWeirExit; H_SedWeirExit] otherwise
sedweirexit_dim := [W_SedWeirExit; H_SedWeirExit; T_SedWeir]
sedweirinlet_dim := [W_SedWeirInlet; H_SedWeirInlet; T_SedWeir]
seddrainslope_dim := [sqrt(3)*H_SedSlope; D_SedDrainValve; -H_SedSlope]
# Origins Points
SedWeirInlet_Dim :=
    [W_SedWeirInlet; T_SedWeir; H_SedWeirInlet] if EN_InletChannelGeom == Perpindicular_Weir
    [T_SedWeir; W_SedWeirInlet; H_SedWeirInlet] otherwise
channel_origin := [
    Plant_Origin[0] - L_Sed + W_InletChannel;
    Plant_Origin[1] - T_PlantWall;
    Plant_Origin[2] + H_Sed - H_InletChannel
]
sedtankconnectingpipe_origin :=
    if sedlayout == 2
        origin ← [
            Plant_Origin[0] - SocketDepth(ND_PltWeir) - 2*ElbowRadius(ND_PltWeir);
            Plant_Origin[1] - T_PlantWall - S_Elbow - ConRadius(ND_PltWeir);
            Plant_Origin[2]
        ]
    return ← origin
echannel_origin :=
    origin ← [0; 0; 0]*m
    origin ← [Plant_Origin[0]; Plant_Origin[1] - T_PlantWall; Plant_Origin[2] + H_Sed - H_ExitChannel] if sedlayout == 2
    if sedlayout == 3
        origin ← [
            Plant_Origin[0] - L_Sed + W_InletChannel + T_ChannelWall + W_ExitChannel;
            Plant_Origin[1] - T_PlantWall;
            Plant_Origin[2] + H_Sed - H_ExitChannel
        ]
    if sedlayout == 4
        origin ← [
            Plant_Origin[0] - L_Sed + W_InletChannel + T_ChannelWall + W_ExitChannel;
            Plant_Origin[1] - T_PlantWall;
            Plant_Origin[2] + H_Sed - H_ExitChannel
        ]
    return origin
channelinletwall_origin := [Plant_Origin[0] - L_Sed + W_InletChannel; Plant_Origin[1]; Plant_Origin[2]]
isubtractbox_origin := [Plant_Origin[0] - L_Sed + W_InletChannel; Plant_Origin[1]; Plant_Origin[2] + H_Sed]
echanneltank_origin :=
    if sedlayout == 2
        origin ← [
            Plant_Origin[0];
            Plant_Origin[1] - T_PlantWall - (4*ConRadius(ND_PltWeir)) - (3*S_Elbow);
            Plant_Origin[2] + H_Sed - H_ExitChannel
        ]
    if sedlayout == 3
        origin ← [
            Plant_Origin[0] - L_Sed + W_InletChannel + T_ChannelWall + S_Elbow + ElbowRadius(ND_PltWeir) + ConRadius(ND_PltWeir) + SocketDepth(ND_PltWeir);
            Plant_Origin[1] - T_PlantWall - (4*ConRadius(ND_PltWeir)) - (3*S_Elbow);
            Plant_Origin[2] + H_Sed - H_ExitChannel
        ]
    origin
ichanneltank_origin :=
    if sedlayout == 2
        origin ← [
            Plant_Origin[0] - L_Sed - T_PlantWall + ichanneltank_dim[0] + T_PlantWall;
            Plant_Origin[1] - T_PlantWall - (2*ConRadius(ND_PltWeir)) - (2*S_Elbow);
            Plant_Origin[2] + H_Sed - H_InletChannel
        ]
    if sedlayout == 3
        origin ← [
            (Plant_Origin[0] - L_Sed + W_InletChannel) + T_ChannelWall;
            Plant_Origin[1] - T_PlantWall - (2*ConRadius(ND_PltWeir)) - (2*S_Elbow);
            Plant_Origin[2] + H_Sed - H_InletChannel
        ]
    origin
channelbox_origin := [Plant_Origin[0] - L_Sed; Plant_Origin[1] - T_PlantWall; Plant_Origin[2] + H_Sed - H_InletChannel]
echannelbox_origin :=
    origin ← [0; 0; 0]*m
    if sedlayout == 2
        origin ← [
            Plant_Origin[0] - W_ExitChannel;
            Plant_Origin[1] - T_PlantWall;
            Plant_Origin[2] + H_Sed - H_ExitChannel
        ]
    if sedlayout == 3
        origin ← [
            Plant_Origin[0] - L_Sed + W_InletChannel + T_ChannelWall;
            Plant_Origin[1] - T_PlantWall;
            Plant_Origin[2] + H_Sed - H_ExitChannel
        ]
    if sedlayout == 4
        origin ← [
            Plant_Origin[0] - L_Sed + W_InletChannel + T_ChannelWall;
            Plant_Origin[1] - T_PlantWall;
            Plant_Origin[2] + H_Sed - H_ExitChannel
        ]
    return origin
channelinletbox1_origin := [
    Plant_Origin[0] - L_Sed - T_PlantWall;
    Plant_Origin[1] + (.5*W_Sed) - (.5*W_InletChannel + T_PlantWall);
    Plant_Origin[2] + H_Sed - H_InletChannel
]
channelinletbox2_origin := [Plant_Origin[0] - L_Sed; Plant_Origin[1]; Plant_Origin[2]]
channelclosebox_origin := [
    Plant_Origin[0] - L_Sed - T_PlantWall - W_InletChannel - T_ChannelWall;
    Plant_Origin[1] - T_PlantWall;
    Plant_Origin[2] + H_Sed - H_InletChannel - T_ChannelWall
]
sedtankinletweirelbow_origin := [
    Plant_Origin[0] - L_Sed + (S_Elbow + ConRadius(ND_PltWeir));
    Plant_Origin[1] - T_PlantWall - S_Elbow - ConRadius(ND_PltWeir);
    Plant_Origin[2] - ShortTeeLength(ND_PltWeir)
]
sedtankexitweirelbow_origin :=
    if sedlayout == 2
        origin ← [
            Plant_Origin[0] - SocketDepth(ND_PltWeir) - 2*ElbowRadius(ND_PltWeir);
            Plant_Origin[1] - T_PlantWall - S_Elbow - ConRadius(ND_PltWeir);
            Plant_Origin[2] + ElbowRadius(ND_PltWeir)
        ]
    if sedlayout == 3
        origin ← [
            Plant_Origin[0] - L_Sed + W_InletChannel + T_ChannelWall + echanneltank_dim[0] - SocketDepth(ND_PltWeir);
            Plant_Origin[1] - T_PlantWall - S_Elbow - ConRadius(ND_PltWeir);
            Plant_Origin[2] + ElbowRadius(ND_PltWeir)
        ]
    return ← origin
sedtankexitweirelbow2_origin :=
    if sedlayout == 2
        origin ← [
            Plant_Origin[0] - SocketDepth(ND_PltWeir);
            Plant_Origin[1] - T_PlantWall - 2*S_Elbow - 3*ConRadius(ND_PltWeir);
            Plant_Origin[2] + ElbowRadius(ND_PltWeir)
        ]
    if sedlayout == 3
        origin ← [
            Plant_Origin[0] - L_Sed + W_InletChannel + T_ChannelWall + echanneltank_dim[0] - SocketDepth(ND_PltWeir);
            Plant_Origin[1] - T_PlantWall - S_Elbow - ConRadius(ND_PltWeir);
            Plant_Origin[2] + ElbowRadius(ND_PltWeir)
        ]
    return ← origin
exitweirpipecopy1_point :=
    if sedlayout == 2
        point ← [
            Plant_Origin[0] - SocketDepth(ND_PltWeir) - ElbowRadius(ND_PltWeir) - innerR(ND_PltWeir, EN_PipeSpec);
            Plant_Origin[1] - T_PlantWall - S_Elbow - ConRadius(ND_PltWeir);
            Plant_Origin[2] + ElbowRadius(ND_PltWeir)
        ]
    if sedlayout == 3
        point ← [
            Plant_Origin[0] - L_Sed + W_InletChannel + T_ChannelWall + echanneltank_dim[0] - SocketDepth(ND_PltWeir) - ElbowRadius(ND_PltWeir) - innerR(ND_PltWeir, EN_PipeSpec);
            Plant_Origin[1] - T_PlantWall - S_Elbow - ConRadius(ND_PltWeir);
            Plant_Origin[2] + ElbowRadius(ND_PltWeir)
        ]
    return point
exitweirpipecopy2_point :=
    if sedlayout == 2
        point ← [
            Plant_Origin[0] - SocketDepth(ND_PltWeir) - ElbowRadius(ND_PltWeir) - innerR(ND_PltWeir, EN_PipeSpec);
            Plant_Origin[1] - T_PlantWall - 2*S_Elbow - 3*ConRadius(ND_PltWeir);
            Plant_Origin[2] + ElbowRadius(ND_PltWeir)
        ]
    if sedlayout == 3
        point ← [
            Plant_Origin[0] - L_Sed + W_InletChannel + T_ChannelWall + echanneltank_dim[0] - SocketDepth(ND_PltWeir) - ElbowRadius(ND_PltWeir) - innerR(ND_PltWeir, EN_PipeSpec);
            Plant_Origin[1] - T_PlantWall - 2*S_Elbow - 3*ConRadius(ND_PltWeir);
            Plant_Origin[2] + ElbowRadius(ND_PltWeir)
        ]
    return point
ElbowRadius(ND_PltWeir) =  # error: This variable is undefined.
sedtankinletpipe1_origin := [
    Plant_Origin[0] - L_Sed + (.5*W_InletChannel);
    Plant_Origin[1] + (W_Sed/(2*N_SedInletPipes*N_SedBays));
    Plant_Origin[2] + H_Sed - H_InletChannel
]
inletweirpipe_origin := [
    Plant_Origin[0] - L_Sed + S_Elbow + ConRadius(ND_PltWeir);
    Plant_Origin[1] - T_PlantWall - S_Elbow - ConRadius(ND_PltWeir);
    Plant_Origin[2] + ShortTeeLength(ND_PltWeir)
]
sedtankinletweirelbow_origin =  # error
exitweirpipe_origin :=
    if sedlayout == 2
        origin ← [
            Plant_Origin[0] - ElbowRadius(ND_PltWeir) - SocketDepth(ND_PltWeir);
            Plant_Origin[1] - T_PlantWall - S_Elbow - ConRadius(ND_PltWeir);
            Plant_Origin[2] + ElbowRadius(ND_PltWeir)
        ]
    if sedlayout == 3
        origin ← [
            Plant_Origin[0] - L_Sed + W_InletChannel + T_ChannelWall + S_Elbow + ConRadius(ND_PltWeir);
            Plant_Origin[1] - T_PlantWall - S_Elbow - ConRadius(ND_PltWeir);
            Plant_Origin[2] + ElbowRadius(ND_PltWeir)
        ]
    return ← origin
Sedbottomslopes_origin := [0; 0; 0]
Sedbottomslopes_dim := [
    Sedbottomslopes_origin[0] + W_SedBay;
    Sedbottomslopes_origin[1] + H_SedSludge + T_SedSludge;
    Sedbottomslopes_origin[2] + L_Sed
]
Sedbottomslopes_dim[0]/2 - W_SedSludge/2 =  # error
SedDrain_origin := [
    Sedbottomslopes_origin[0] + Sedbottomslopes_dim[0]/2 - W_SedSludge/2;
    Sedbottomslopes_origin[1];
    Sedbottomslopes_origin[2]
]
SedDrain_dim := [SedDrain_origin[0] + W_SedSludge; SedDrain_origin[1] + H_SedSludge; SedDrain_origin[2] + L_Sed]
W_SedInletBottom =  # error
SedDrainCover_origin := [
    Sedbottomslopes_origin[0] + Sedbottomslopes_dim[0]/2 - W_SedDrainCover/2;
    Sedbottomslopes_origin[1] + H_SedSludge;
    Sedbottomslopes_origin[2]
]
SedDrainCover_dim := [
    SedDrainCover_origin[0] + W_SedDrainCover;
    SedDrainCover_origin[1] + T_SedSludge;
    SedDrainCover_origin[2] + L_Sed
]
Sedbottomslopeslope_origin := [
    Sedbottomslopes_origin[0] + W_SedInletBottom;
    Sedbottomslopes_origin[1] + Sedbottomslopes_dim[1];
    Sedbottomslopes_origin[2]
]
SedTankDivider_Origin := [Plant_Origin[0]; Plant_Origin[1] + W_Sed; Plant_Origin[2]]
SedTankDivider_Dim := [
    SedTankDivider_Origin[0] - L_Sed;
    SedTankDivider_Origin[1] + T_PlantWall;
    SedTankDivider_Origin[2] + H_SedBayDivider
]
T_ManifoldCap := ConRadius(ND_SedManifold) - outerradius(ND_SedManifold)
DrainCover_origin := [Plant_Origin[0]; Plant_Origin[1] + W_SedInletBottom; Plant_Origin[2] + H_SedSludge]
iccoupling_origin := [
    -L_Sed + W_SedInletchannelPreweir/2;
    W_Sed - (W_SedBay/2);
    H_Sed - H_InletChannel - CouplingLength(ND_SedManifold) + SocketDepth(ND_SedManifold)
]
manifoldpipe_origin := [Plant_Origin[0] - T_ManifoldCap; Plant_Origin[1] + W_Sed - W_SedBay/2; Z_SedManifoldPipe]
manifoldelbow_origin := [-L_Sed + W_SedInletchannelPreweir/2; W_Sed - W_SedBay/2; Z_SedManifoldPipe]
Lamina_Origin := [
    Plant_Origin[0] - L_Sed + W_InletChannel + T_ChannelWall + L_SedPlate*cos(AN_SedPlate);
    Plant_Origin[1];
    Plant_Origin[2] + H_SedBayDivider + outerdiameter(ND_SedPlateFrame)
]
# These are the assumed dimensions for the frame that supports the lamella, they should probably be defined somewhere else.
PipeFrame_Origin := [
    Plant_Origin[0] - W_ExitChannel - T_ChannelWall - L_SedPlate*cos(60 deg) - outerradius(ND_SedFrameStub) + B_SedPlateHorizontal - T_SedPlate/sin(60 deg);
    Plant_Origin[1];
    Plant_Origin[2] + H_SedBayDivider + outerdiameter(ND_SedPlateFrame)/2
]
PVCCouplingNew_origin := [
    Plant_Origin[0] - W_ExitChannel - SocketDepth(ND_SedLaunder);
    Plant_Origin[1] + W_Sed/(N_SedLaunders*N_SedBays*2);
    Plant_Origin[2] + HW_Sed - H_SedAbove + outerradius(ND_SedLaunder)
]
FlexCouplingNew_origin := [
    {
        PVCCouplingNew_origin[0] - SocketDepth(ND_SedLaunder) if CouplingLength(ND_SedLaunder) ≥ T_ChannelWall
        Plant_Origin[0] - T_ChannelWall - W_ExitChannel otherwise
    };
    Plant_Origin[1] + W_Sed/(N_SedLaunders*N_SedBays*2);
    Plant_Origin[2] + HW_Sed - H_SedAbove + outerradius(ND_SedLaunder)
]
SedLaunderNippleNew_origin := [
    PVCCouplingNew_origin[0] - CouplingLength(ND_SedLaunder) + 2*SocketDepth(ND_SedLaunder);
    Plant_Origin[1] + W_Sed/(N_SedLaunders*N_SedBays*2);
    Plant_Origin[2] + HW_Sed - H_SedAbove + outerradius(ND_SedLaunder)
]
SedLaunderNew_origin := [
    FlexCouplingNew_origin[0] - SocketDepthFlex(ND_SedLaunder);
    Plant_Origin[1] + W_Sed/(N_SedLaunders*N_SedBays*2);
    Plant_Origin[2] + HW_Sed - H_SedAbove + outerradius(ND_SedLaunder)
]
LaunderCapNew_origin := [
    SedLaunderNew_origin[0] - L_SedLaunder;
    Plant_Origin[1] + W_Sed/(N_SedLaunders*N_SedBays*2);
    Plant_Origin[2] + HW_Sed - H_SedAbove + outerradius(ND_SedLaunder)
]
LengthSedLaunderNipple :=
    (SocketDepth(ND_SedLaunder) + SocketDepthFlex(ND_SedLaunder)) if CouplingLength(ND_SedLaunder) ≥ T_PlantWall
    (SocketDepth(ND_SedLaunder) + SocketDepthFlex(ND_SedLaunder) + (T_PlantWall - CouplingLength(ND_SedLaunder))) otherwise
SedLaunder_origin := [
    Plant_Origin[0] - W_ExitChannel - T_ChannelWall - L_SedLaunder + SocketDepth(ND_SedLaunder);
    Plant_Origin[1] + W_Sed/(N_SedLaunders*N_SedBays*2);
    Plant_Origin[2] + HW_Sed - H_SedAbove + outerradius(ND_SedLaunder)
]
LaunderLedge_Origin := [
    Plant_Origin[0] - L_Sed + T_ChannelWall + W_InletChannel;
    Plant_Origin[1];
    SedLaunderNew_origin[2] - CapDiameter(ND_SedLaunder)/2
]
SedLaunderOrifice_origin := [SedLaunder_origin[0]; SedLaunder_origin[1]; SedLaunder_origin[2] + L_Sed - B_SedLaunderOrifices]
textbox_origin := [-2*L_Sed; W_SedBay]
SedWeirExit_Origin :=
    [-W_ExitChannel; -T_PlantWall; H_Sed - H_ExitChannel] if Geom_ExitChannel == Perpindicular_Weir
    [-T_SedWeir - W_SedExitchannelPostweir; -T_PlantWall; H_Sed - H_ExitChannel]
sedweirexit_origin := [
    {
        -W_ExitChannel if Geom_ExitChannel == Perpindicular_Weir
        -T_PlantWall otherwise
    };
    H_Sed - H_ExitChannel;
    {
        T_PlantWall - T_SedWeir if Geom_ExitChannel == Perpindicular_Weir
        -W_SedExitchannelPostweir - T_SedWeir otherwise
    }
]
sedweirexit_origin =  # error
sedweirinlet_origin := [
    {
        -L_Sed if EN_InletChannelGeom == Perpindicular_Weir
        -T_PlantWall otherwise
    };
    H_Sed - H_InletChannel;
    {
        T_PlantWall - T_SedWeir if EN_InletChannelGeom == Perpindicular_Weir
        -L_Sed + W_SedInletchannelPreweir otherwise
    }
]
SedWeirInlet_Origin :=
    [-L_Sed; -T_PlantWall; H_Sed - H_InletChannel]
    [-L_Sed + W_SedInletchannelPreweir; -T_PlantWall; H_Sed - H_InletChannel]
FlocHopper_origin := [0; 0; 0]
FlocHopperBox_dim := [L_FlocHopper; T_FlocHopper; H_FlocHopper]
FlocHopperWedge_dim := [(L_FlocHopper - W_FlocHopper)/2; T_FlocHopper; FlocHopper_origin[2]]
LaunderLedge_Dim := [T_ConcreteMin; W_SedBay*N_SedBays; -T_ConcreteMin]
isubractbox_dim := [W_InletChannel; T_PlantWall; H_InletChannel]
inletweirpipe_length := H_Sed - H_InletChannel + HW_InletChannel - ElbowRadius(ND_PltWeir) - ConRadius(ND_PltWeir)
exitweirpipe_length := H_Sed - H_ExitChannel + H_PltWeir - ElbowRadius(ND_PltWeir) - ConRadius(ND_PltWeir)
connectingpipe_length := -((Plant_Origin[0] - L_Sed + S_Elbow + ConRadius(ND_PltWeir) + ShortTeeLength(ND_PltWeir)) - (Plant_Origin[0] - SocketDepth(ND_PltWeir) - 2*ElbowRadius(ND_PltWeir)))
seddrainslope_dim := [sqrt(3)*H_SedSlope; D_SedDrainValve; -H_SedSlope]
ManifoldLedge_Origin := [Plant_Origin[0]; Plant_Origin[1]; Z_SedManifoldPipe - CapDiameter(ND_SedManifold)/2]
ManifoldLedge_Dim := [-T_ConcreteMin; W_SedBay*N_SedBays; -T_ConcreteMin]
InfluentManifoldCap_Origin := [Plant_Origin[0] - T_ManifoldCap; manifoldpipe_origin[0]; Z_SedManifoldPipe]
# Sedtank Scripts
SedTankLayer := layer_new("tank", grey)
MakeSedTank := Tank(Plant_Origin, [L_Sed; W_Sed; H_Sed], T_PlantWall)
SedLaunderLedge := BoxF(LaunderLedge_Origin, LaunderLedge_Origin + LaunderLedge_Dim, [0; 0; 0]*deg)
SedManifoldLedge := BoxF(ManifoldLedge_Origin, ManifoldLedge_Origin + ManifoldLedge_Dim, [0; 0; 0]*deg)
FreezeSedTank := FreezeLayer("tank")
SedDrainWedge :=
    WedgeF([Plant_Origin[0] - L_Sed; W_SedBay*N_SedBays - 0.5*W_SedBay - D_SedDrainValve/2; Plant_Origin[2]], seddrainslope_dim + [Plant_Origin[0] - L_Sed; W_SedBay*N_SedBays - 0.5*W_SedBay - D_SedDrainValve/2; Plant_Origin[2]], [0; 0; 0]*deg) if EN_PlantDrains == 0
    WedgeF([Plant_Origin[0]; W_SedBay*N_SedBays - 0.5*W_SedBay - D_SedDrainValve/2; Plant_Origin[2]], [-seddrainslope_dim[0]; seddrainslope_dim[1]; seddrainslope_dim[2]] + [Plant_Origin[0]; W_SedBay*N_SedBays - 0.5*W_SedBay - D_SedDrainValve/2; Plant_Origin[2]], [0; 0; 0]*deg) otherwise
ArrayWedgeBay := array_all(N_SedBays, 1, -W_Sed - T_PlantWall)
GroupSedPieces := GroupAll("DeleteMe")
# when this subtraction takes place, all pieces become part of the "tank" layer
SubtractSedPieces := SubtractF(["tank"], "DeleteMe")
Sedtanktankscript :=
    stack(viewtop1, SedTankLayer, MakeSedTank, SedLaunderLedge, SedManifoldLedge, FreezeSedTank, SedDrainWedge, ArrayWedgeBay, GroupSedPieces, SubtractSedPieces) if N_SedBays > 1
    stack(viewtop1, SedTankLayer, MakeSedTank, SedLaunderLedge, SedManifoldLedge, FreezeSedTank, SedDrainWedge, GroupSedPieces, SubtractSedPieces) otherwise
SedWeirExitLayer := layer_new("sedweirexit", ltgrey)
DrawSedExitWeir1 := BoxF(SedWeirExit_Origin, SedWeirExit_Origin + SedWeirExit_Dim, [0; 0; 0]*deg)
DrawSedExitWeir2 := BoxF([-W_ExitChannel; -T_PlantWall; H_Sed - H_ExitChannel] + Plant_Origin, [-W_SedExitchannelPostweir; -T_PlantWall + T_SedWeir; H_Sed] + Plant_Origin, [0; 0; 0]*deg)
FreezeSedWeirExit := FreezeLayer("SedWeirExit")
Sedtankexitweirscript :=
    stack(SedWeirExitLayer, DrawSedExitWeir1, DrawSedExitWeir2, FreezeSedWeirExit) if Geom_ExitChannel ≠ Perpindicular_Weir
    stack(SedWeirExitLayer, DrawSedExitWeir1, FreezeSedWeirExit) otherwise
SedWeirInletLayer := layer_new("SedWeirInlet", ltgrey)
DrawSedWeirInlet1 := BoxF(SedWeirInlet_Origin, SedWeirInlet_Origin + SedWeirInlet_Dim, [0; 0; 0]*deg)
DrawSedWeirInlet2 := BoxF([-L_Sed; -T_PlantWall; H_Sed - H_InletChannel] + Plant_Origin, [W_SedInletchannelPreweir - L_Sed; -T_PlantWall + T_SedWeir; H_Sed] + Plant_Origin, [0; 0; 0]*deg)
FreezeSedWeir := FreezeLayer("SedWeirInlet")
Sedtankinletweirscript :=
    stack(SedWeirInletLayer, DrawSedWeirInlet1, FreezeSedWeir) if EN_InletChannelGeom == Perpindicular_Weir
    stack(SedWeirInletLayer, DrawSedWeirInlet1, DrawSedWeirInlet2, FreezeSedWeir) otherwise
SedCouplingLayer := layer_new("coupling", ltgrey)
DrawSedCoupling := CouplingSUBF(iccoupling_origin, [0; 90]*deg, ND_SedManifold, EN_PipeSpec, ["tank"])
FreezeSedCoupling := FreezeLayer("coupling")
Sedtankinletchannelscript := stack(SedCouplingLayer, DrawSedCoupling, FreezeSedCoupling)
SedDrainCouplings :=
    Local ← layer_new("SedDrainCoupling", green)
    for i ∈ 0 .. N_SedBays - 1
        Local ←
            stack(Local, CouplingSUBF([-L_Sed - SocketDepth(ND_SedDrainAdapter); W_SedBay*(N_SedBays - i) - 0.5*W_SedBay; Plant_Origin[2]], [0; 0]*deg, ND_SedDrainAdapter, EN_PipeSpec, ["tank"])) if EN_PlantDrains == 0
            otherwise
                stack(Local, CouplingSUBF([
                    Plant_Origin[0] + CouplingLength(ND_SedDrainAdapter) - SocketDepth(ND_SedDrainAdapter);
                    W_SedBay*(N_SedBays - i) - 0.5*W_SedBay;
                    Plant_Origin[2]
                ], [0; 0]*deg, ND_SedDrainAdapter, EN_PipeSpec, ["tank"]))
    return Local
FreezeSedDrainCouplings := FreezeLayer("SedDrainCoupling")
SedDrainPipes :=
    Local ← layer_new("SedDrainPipe", blue)
    for i ∈ 0 .. N_SedBays - 1
        Local ←
            if EN_PlantDrains == 0
                stack(Local, PipeSUBF([
                    -L_Sed - CouplingLength(ND_SedDrainAdapter) + SocketDepth(ND_SedDrainAdapter);
                    W_SedBay*(N_SedBays - i) - 0.5*W_SedBay;
                    Plant_Origin[2]
                ], T_PlantWall + SocketDepth(ND_SedDrainAdapter), [0; 0]*deg, ND_SedDrainAdapter, EN_PipeSpec, ["tank"]))
            otherwise
                stack(Local, PipeSUBF([
                    Plant_Origin[0] + CouplingLength(ND_SedDrainAdapter) - SocketDepth(ND_SedDrainAdapter) + T_PlantWall + SocketDepth(ND_SedDrainAdapter);
                    W_SedBay*(N_SedBays - i) - 0.5*W_SedBay;
                    Plant_Origin[2]
                ], T_PlantWall + SocketDepth(ND_SedDrainAdapter), [0; 0]*deg, ND_SedDrainAdapter, EN_PipeSpec, ["Tank"]))
    return Local
FreezeSedDrainPipes := FreezeLayer("SedDrainPipe")
SedDrainAdapterLayer := layer_new("SedDrainAdapter", green)
DrawSedDrainAdapter :=
    if EN_PlantDrains == 0
        MaleAdapterF([
            -L_Sed - T_PlantWall - CouplingLength(ND_SedDrainAdapter);
            W_SedBay*N_SedBays - 0.5*W_SedBay;
            Plant_Origin[2]
        ], [0; 0]*deg, ND_SedDrainAdapter, EN_PipeSpec)
    otherwise
        MaleAdapterF([
            Plant_Origin[0] + CouplingLength(ND_SedDrainAdapter) - SocketDepth(ND_SedDrainAdapter) + T_PlantWall + SocketDepth(ND_SedDrainAdapter);
            W_SedBay*N_SedBays - 0.5*W_SedBay;
            Plant_Origin[2]
        ], [180; 0]*deg, ND_SedDrainAdapter, EN_PipeSpec)
FreezeSedDrainAdapter := FreezeLayer("SedDrainAdapter")
SedDrainValveLayer := layer_new("SedDrainValves", blue)
InsertSedDrainValves := insertdwg("VAL-Scaled-Gate-Valve-Threaded", [
    CouplingLength(ND_SedDrainAdapter) + T_PlantWall + MaleAdapterLength(ND_SedDrainAdapter) - ValveSocket(ND_SedDrainAdapter) + ValveLength(ND_SedDrainAdapter) - SocketDepth(ND_SedDrainAdapter);
    W_SedBay*N_SedBays - 0.5*W_SedBay;
    0 m
], D_SedScale, D_SedScale, 0)
FreezeSedDrainValve := FreezeLayer("SedDrainValves")
SedDrainNippleLayer := layer_new("SedDrainNipple", blue)
DrawSedDrainNipple := PipeF([
    CouplingLength(ND_SedDrainAdapter) + T_PlantWall + MaleAdapterLength(ND_SedDrainAdapter) - ValveSocket(ND_SedDrainAdapter) + ValveLength(ND_SedDrainAdapter);
    W_SedBay*N_SedBays - 0.5*W_SedBay;
    0 m
], SocketDepth(ND_SedDrainAdapter) + ValveSocket(ND_SedDrainAdapter), [0; 0]*deg, ND_SedDrainAdapter, EN_PipeSpec)
FreezeSedDrainNipple := FreezeLayer("SedDrainNipple")
SedDrainElbowLayer := layer_new("SedDrainElbow", green)
DrawSedDrainElbow := ElbowF([
    CouplingLength(ND_SedDrainAdapter) + T_PlantWall + MaleAdapterLength(ND_SedDrainAdapter) - ValveSocket(ND_SedDrainAdapter) + ValveLength(ND_SedDrainAdapter);
    W_SedBay*N_SedBays - 0.5*W_SedBay;
    0 m
], [-90; 0; 225]*deg, ND_SedDrainAdapter, EN_PipeSpec)
ThawSedDrainPieces := ThawMultiple(["SedDrainAdapter"; "SedDrainValve"; "SedDrainNipple"])
ArraySedDrainPieces := array_all(N_SedBays, 1, -W_SedBay)
FreezeSedDrainPieces := FreezeMultiple(["SedDrainAdapter"; "SedDrainValve"; "SedDrainNipple"; "SedDrainElbow"])
SedDrainScript := stack(SedDrainCouplings, FreezeSedDrainCouplings, SedDrainPipes, FreezeSedDrainPipes, SedDrainAdapterLayer, DrawSedDrainAdapter, FreezeSedDrainAdapter, SedDrainValveLayer, InsertSedDrainValves, FreezeSedDrainValve, SedDrainNippleLayer, DrawSedDrainNipple, FreezeSedDrainNipple, SedDrainElbowLayer, DrawSedDrainElbow, ThawSedDrainPieces, ArraySedDrainPieces, layer_set("0"), FreezeSedDrainPieces)
SedBottomSlopeLayer := layer_new("BottomSlopes", ltgrey)
CreateSedPolyline := Pline([
    [Sedbottomslopeslope_origin[0]; Sedbottomslopeslope_origin[1]];
    [Sedbottomslopeslope_origin[0]; Sedbottomslopeslope_origin[1] - T_SedSludge];
    [Sedbottomslopeslope_origin[0] + T_ConcreteMin; Sedbottomslopeslope_origin[1] - T_SedSludge];
    [
        Sedbottomslopeslope_origin[0] + T_ConcreteMin;
        Sedbottomslopeslope_origin[1] - T_SedSludge - H_SedSludge
    ];
    [
        Sedbottomslopeslope_origin[0] - W_SedInletBottom;
        Sedbottomslopeslope_origin[1] - T_SedSludge - H_SedSludge
    ];
    [Sedbottomslopeslope_origin[0] - W_SedInletBottom; Z_SedSlopes];
    [Sedbottomslopeslope_origin[0] - W_SedInletBottom + T_ConcreteMin/2; Z_SedSlopes];
    [Sedbottomslopeslope_origin[0]; Sedbottomslopeslope_origin[1]]
])
ExtrudeSedPolyline := extrude([Sedbottomslopeslope_origin[0]; Sedbottomslopeslope_origin[1]], -L_Sed)
MirrorSedSlope := mirror3dyz(Sedbottomslopeslope_origin, [
    Sedbottomslopeslope_origin[0] + W_SedDrainCover/2;
    Sedbottomslopeslope_origin[1];
    Sedbottomslopeslope_origin[2]
])
ArraySedSlope := array_all(N_SedBays, 1, W_SedBay)
RightLedge := box([0 m; W_SedBay*N_SedBays - T_ConcreteMin/2; Z_SedSlopes], [-L_Sed; W_SedBay*N_SedBays; Z_SedSlopes + H_SedBetween])
LeftLedge := box([0 m; 0 m; Z_SedSlopes], [-L_Sed; T_ConcreteMin/2; Z_SedSlopes + H_SedBetween])
FreezeBottomSlopes := FreezeLayer("BottomSlopes")
Sedbottomslopescript :=
    one ← stack(SedBottomSlopeLayer, viewrightside1, CreateSedPolyline, viewrightside1, ExtrudeSedPolyline, MirrorSedSlope, viewtop1, union_allA, FreezeBottomSlopes) if N_SedBays == 1 and H_SedBetween == 0
    one ← stack(SedBottomSlopeLayer, viewrightside1, CreateSedPolyline, viewrightside1, ExtrudeSedPolyline, MirrorSedSlope, viewtop1, RightLedge, LeftLedge, union_allA, FreezeBottomSlopes) if N_SedBays == 1 and H_SedBetween > 0
    one ← stack(SedBottomSlopeLayer, viewrightside1, CreateSedPolyline, viewrightside1, ExtrudeSedPolyline, MirrorSedSlope, viewtop1, ArraySedSlope, union_allA, FreezeBottomSlopes) if N_SedBays > 1 and H_SedBetween == 0
    one ← stack(SedBottomSlopeLayer, viewrightside1, CreateSedPolyline, viewrightside1, ExtrudeSedPolyline, MirrorSedSlope, viewtop1, ArraySedSlope, RightLedge, LeftLedge, union_allA, FreezeBottomSlopes) otherwise
    return one
InletChannelCouplingLayer := layer_new("iccoupling", green)
DrawICCoupling := CouplingF(iccoupling_origin, [0; 90]*deg, ND_SedManifold, EN_PipeSpec)
# pipe6_origin | pipe7_origin | pipe9_origin | pipe10_origin | pipe12_origin | pipe13_origin | pipe1_length
FreezeICCoupling := FreezeLayer("iccoupling")
InfluentManifoldLayer := layer_new("ManifoldPipe", blue)
InfluentManPipeLayer := layer_new("manifoldpipe", blue)
DrawInfluentManifold := ManifoldF(manifoldpipe_origin, L_SedManifoldPipe - ElbowRadius(ND_SedManifold) - T_ManifoldCap, -SocketDepth(ND_SedManifold) + CapHeight(ND_SedManifold) + zc + B_SedManifoldPort/2, [0; 0; 180]*deg, ND_SedManifold, EN_PipeSpec, N_SedManifoldPorts, D_SedManifoldPort, B_SedManifoldPort)
DrawSedManDiffuser := PipeF(manifoldpipe_origin - [
    CapHeight(ND_SedManifold) + D_SedManifoldPort/2 - T_ManifoldCap + B_SedManifoldPort/2;
    0 m;
    (ND_SedManifold/2)
], L_Diffuser, [0; -90]*deg, D_Diffuser, EN_PipeSpec)
ArraySedManDiffuser := ArrayLast(1, N_SedManifoldPorts, -B_SedManifoldPort)
FreezeSedManDiffuser := FreezeLayer("ManifoldPipe")
SedManCapLayer := layer_new("ManifoldCap", yellow)
DrawSedManCap := CapF(manifoldpipe_origin, [0; 0]*deg, ND_SedManifold)
FreezeSedManCap := FreezeLayer("ManifoldCap")
SedManElbowLayer := layer_new("ManifoldElbow", green)
DrawSedManElbow := ElbowF([
    manifoldelbow_origin[0] + ElbowRadius(ND_SedManifold);
    manifoldelbow_origin[1];
    manifoldelbow_origin[2]
], [90; 0; -90]*deg, ND_SedManifold, EN_PipeSpec)
FreezeSedManElbow := FreezeLayer("ManifoldElbow")
SedChimneyStopLayer := layer_new("chimney stops", grey)
MakeSedChimneyStop := chimneystop([iccoupling_origin[0]; iccoupling_origin[1]; H_Sed - H_InletChannel - H_SedSludge], ND_SedManifold, HW_InletChannel, 1 in, EN_PipeSpec)
FreezeChimneyStop := FreezeLayer("chimney stops")
ThawSedManPieces := ThawMultiple(["iccoupling"; "ManifoldPipe"; "ManifoldCap"; "ManifoldElbow"; "chimney stops"])
ArraySedManPieces := array_all(N_SedBays, 1, -W_SedBay)
FreezeSedManPieces := FreezeMultiple(["iccoupling"; "ManifoldPipe"; "ManifoldCap"; "ManifoldElbow"; "chimney stops"])
influentmanifoldscript :=
    stack(InletChannelCouplingLayer, DrawICCoupling, FreezeICCoupling, InfluentManifoldLayer, DrawInfluentManifold, DrawSedManDiffuser, ArraySedManDiffuser, FreezeSedManDiffuser, SedManCapLayer, DrawSedManCap, FreezeSedManCap, SedManElbowLayer, DrawSedManElbow, FreezeSedManElbow, SedChimneyStopLayer, MakeSedChimneyStop, FreezeChimneyStop) if N_SedBays == 1 and N_SedTanks == 1
    stack(InletChannelCouplingLayer, DrawICCoupling, FreezeICCoupling, InfluentManifoldLayer, DrawInfluentManifold, DrawSedManDiffuser, ArraySedManDiffuser, FreezeSedManDiffuser, SedManCapLayer, DrawSedManCap, FreezeSedManCap, SedManElbowLayer, DrawSedManElbow, FreezeSedManElbow, SedChimneyStopLayer, MakeSedChimneyStop, FreezeChimneyStop, ThawSedManPieces, ArraySedManPieces, FreezeSedManPieces) otherwise
SedInletPipeLayer := layer_new("SedInletManPipe", blue)
DrawSedInletPipe := PipeF([
    iccoupling_origin[0];
    iccoupling_origin[1];
    manifoldelbow_origin[2] + ElbowRadius(ND_SedManifold) + SocketDepth(ND_SedManifold) + SocketDepthFlex(ND_SedManifold)
], iccoupling_origin[2] - (manifoldelbow_origin[2] + ElbowRadius(ND_SedManifold) + SocketDepth(ND_SedManifold) + SocketDepthFlex(ND_SedManifold)), [0; 90]*deg, ND_SedManifold, EN_PipeSpec)
DrawSedInletPipeNipple := PipeF([iccoupling_origin[0]; iccoupling_origin[1]; manifoldelbow_origin[2] + ElbowRadius(ND_SedManifold)], 2*SocketDepthFlex(ND_SedManifold), [0; 90]*deg, ND_SedManifold, EN_PipeSpec)
FreezeSedInletPipes := FreezeLayer("SedInletManPipe")
SedFlexManCouplingLayer := layer_new("FlexCouplingSedManifold", [0; 0; 0])
DrawSedManFlexCoupling := FlexCouplingF([
    iccoupling_origin[0];
    iccoupling_origin[1];
    manifoldelbow_origin[2] + ElbowRadius(ND_SedManifold) + SocketDepth(ND_SedManifold)
], [0; 90]*deg, ND_SedManifold)
ArraySedManPieces := array_all(N_SedBays, 1, -W_SedBay)
FreezeSedManFlexCoupling := FreezeLayer("FlexCouplingSedManifold")
FreezeSedManPieces := FreezeMultiple(["SedInletManPipe"; "FlexCouplingSedManifold"])
inletpipescript :=
    one ← stack(SedInletPipeLayer, viewtop1, DrawSedInletPipe, DrawSedInletPipeNipple, FreezeSedInletPipes, SedFlexManCouplingLayer, DrawSedManFlexCoupling, FreezeSedManFlexCoupling) if N_SedBays == 1
    one ← stack(SedInletPipeLayer, viewtop1, DrawSedInletPipe, DrawSedInletPipeNipple, FreezeSedInletPipes, SedFlexManCouplingLayer, DrawSedManFlexCoupling, layer_thaw("SedInletManPipe"), ArraySedManPieces, FreezeSedManPieces) otherwise
SedDrainCoverLayer := layer_new("DrainCover", red)
SedDrainCoverBox := BoxF(DrainCover_origin, DrainCover_origin + [-L_Sed; W_SedDrainCover; T_SedSludge], [0; 0; 0]*deg)
FreezeDrainCover := FreezeLayer("DrainCover")
DrainCoverCylinder := CylinderF([
    DrainCover_origin[0] - L_Sed + B_SedSludgeOrifices/2;
    DrainCover_origin[1] + W_SedDrainCover/2;
    DrainCover_origin[2] - zc
], D_SedSludgeOrifice/2, T_SedSludge + 2*zc, [0; 90]*deg)
ArrayDrainCoverCylinder := array_all(1, N_SedSludgeOrifices, B_SedSludgeOrifices)
GroupDrainCoverCylinder := GroupAll("DeleteMe")
SubtractDrainCoverCylinder := SubtractF(["DrainCover"], "DeleteMe")
ThawDrainCover := layer_thaw("DrainCover")
ArrayDrainCoverBay := array_all(N_SedBays, 1, W_SedBay)
Draincoverscript :=
    stack(SedDrainCoverLayer, SedDrainCoverBox, FreezeDrainCover, DrainCoverCylinder, ArrayDrainCoverCylinder, GroupDrainCoverCylinder, SubtractDrainCoverCylinder, ThawDrainCover, ArrayDrainCoverBay, FreezeDrainCover) if N_SedBays > 1
    stack(SedDrainCoverLayer, SedDrainCoverBox, FreezeDrainCover, DrainCoverCylinder, ArrayDrainCoverCylinder, GroupDrainCoverCylinder, SubtractDrainCoverCylinder)
SedTankLaminaScript :=
    LamLayer ← layer_new("Lamina", purple)
    DrawLam ← laminascript2(Lamina_Origin, W_SedBay, L_SedPlate, T_SedPlate, AN_SedPlate, N_SedModulePlates, N_SedModules, ND_SedModulePipe, ND_SedModulePipeSpace, S_SedPlateModule, S_SedModulePipes, L_SedModulePipe, N_SedPlateCol, B_SedPlateHorizontal)
    MirrorLam ← Mirror3dAll("yz", [
        Plant_Origin[0] - W_ExitChannel - T_ChannelWall - ((L_Sed - 2*T_ChannelWall - W_InletChannel - W_ExitChannel)/2);
        0 m;
        0 m
    ], "y")
    ArrayLam ← array_all(N_SedBays, 1, W_SedBay)
    FreezeLam ← FreezeLayer("Lamina")
    Final ← stack(LamLayer, DrawLam, MirrorLam, viewtop1, FreezeLam)
    return Final
PipeFrameScript :=
    PFLayer ← layer_new("PipeFrame", yellow)
    PipeLong1 ← PipeF([PipeFrame_Origin[0]; Plant_Origin[1] + B_SedPlateFrameVertical; PipeFrame_Origin[2]], PipeFrame_Origin[0] - Plant_Origin[0] + L_Sed, [0; 0]*deg, ND_SedPlateFrame, EN_PipeSpec)
    PipeLong2 ← PipeF([PipeFrame_Origin[0]; Plant_Origin[1] + W_SedBay - B_SedPlateFrameVertical; PipeFrame_Origin[2]], PipeFrame_Origin[0] - Plant_Origin[0] + L_Sed, [0; 0]*deg, ND_SedPlateFrame, EN_PipeSpec)
    ArrayBay ← array_all(N_SedBays, 1, W_SedBay)
    Local ←
        stack(PFLayer, viewtop1, PipeLong1, PipeLong2, ArrayBay) if N_SedBays > 1
        stack(PFLayer, viewtop1, PipeLong1, PipeLong2) otherwise
    for i ∈ 0 .. 2
        Local ← stack(Local, PipeF(PipeFrame_Origin + [-L_SedActive/2*i; 0 m; 0 m], W_SedBay*N_SedBays, [270; 0]*deg, ND_SedPlateFrame, EN_PipeSpec))
    FreezePF ← FreezeLayer("PipeFrame")
    StubLayer ← layer_new("PipeFrameStub", yellow)
    Stub ← PipeF([
        PipeFrame_Origin[0];
        Plant_Origin[1] + B_SedPlateFrameVertical;
        PipeFrame_Origin[2] + outerradius(ND_SedPlateFrame)
    ], H_SedFrameStub, [0; 90]*deg, ND_SedFrameStub, 1)
    ArrayStubRow ← array_all(1, N_SedModules + 1, -B_SedFrameStub)
    ArrayStubColumn ← array_all(2, 1, W_SedBay - 2*B_SedPlateFrameVertical)
    FreezeStub ← FreezeLayer("PipeFrameStub")
    PFSLayer ← layer_new("PipeFrameSupport", yellow)
    Flange ← CylinderF([
        PipeFrame_Origin[0];
        PipeFrame_Origin[1] + W_SedBay;
        PipeFrame_Origin[2] - outerdiameter(ND_SedPlateFrame)/2
    ], D_Flange/2, T_Flange, [0; 270]*deg)
    SupportPipe ← CylinderF([
        PipeFrame_Origin[0];
        PipeFrame_Origin[1] + W_SedBay;
        PipeFrame_Origin[2] - outerdiameter(ND_SedPlateFrame)/2 - T_Flange
    ], outerradius(ND_SedPlateFrame), PipeFrame_Origin[2] - outerradius(ND_SedPlateFrame) - T_Flange - Z_SedSlopes, [0; 270]*deg)
    ArraySupports ← array_all(1, 3, -L_SedActive/2)
    Local2 ←
        stack(Flange, SupportPipe, ArraySupports, array_all(N_SedBays - 1, 1, W_SedBay)) if N_SedBays ≥ 3
        stack(Flange, SupportPipe, ArraySupports) otherwise
    FreezePFS ← FreezeLayer("PipeFrameSupport")
    one ←
        stack(Local, FreezePF, StubLayer, Stub, ArrayStubRow, ArrayStubColumn, ArrayBay, FreezeStub) if (H_SedBetween == 0 and N_SedBays > 1)
        stack(Local, FreezePF, StubLayer, Stub, ArrayStubRow, ArrayStubColumn, FreezeStub) if (N_SedBays == 1)
        stack(Local, FreezePF, StubLayer, Stub, ArrayStubRow, ArrayStubColumn, ArrayBay, FreezeStub, PFSLayer, Local2, FreezePFS) otherwise
SedLaunderScript :=
    LaunderLayer ← layer_new("Launder", blue)
    LaunderPipe ← PipeF(SedLaunderNew_origin, L_SedLaunder, [0 deg; 0 deg], ND_SedLaunder, EN_PipeSpec)
    FreezeLaunder ← FreezeLayer("Launder")
    Orifice1 ← CylinderF([
        SedLaunderNew_origin[0] - B_SedLaunderOrifices/2 - SocketDepthFlex(ND_SedLaunder);
        SedLaunderNew_origin[1];
        SedLaunderNew_origin[2]
    ], D_SedLaunderOrifice/2, outerradius(ND_SedLaunder) + zc, [30; 90]*deg)
    Orifice2 ← CylinderF([
        SedLaunderNew_origin[0] - B_SedLaunderOrifices/2 - SocketDepthFlex(ND_SedLaunder);
        SedLaunderNew_origin[1];
        SedLaunderNew_origin[2]
    ], D_SedLaunderOrifice/2, outerradius(ND_SedLaunder) + zc, [-30; 90]*deg)
    OrificeArray ← array_all(1, N_SedLaunderOrificesRow, -B_SedLaunderOrifices)
    GroupOrifice ← GroupAll("DeleteMe")
    SubtractOrifices ← SubtractF(["Launder"], "DeleteMe")
    FlexCouplingLayer ← layer_new("FlexCoupling", red)
    FlexCoupling ← FlexCouplingF(FlexCouplingNew_origin, [0 deg; 0 deg], ND_SedLaunder)
    FreezeFlexCoupling ← FreezeLayer("FlexCoupling")
    CapLayer ← layer_new("LaunderCap", yellow)
    LaunderCap ← CapF(LaunderCapNew_origin, [0 deg; 180 deg], ND_SedLaunder)
    FreezeCap ← FreezeLayer("LaunderCap")
    ThawLaunder ← layer_thaw("Launder")
    ArrayPieces ← array_all(N_SedBays, 1, W_SedBay)
    view2 ← viewrightside1
    layerset1 ← layer_set("0")
    layernewcouplcap ← layer_new("laundercouplingcap", red)
    solidcap ← laundercouplingcap([
        SedLaunder_origin[1];
        Plant_Origin[1] + Z_SedLaunder;
        Plant_Origin[2] - W_ExitChannel - SocketDepth(ND_SedLaunder)
    ], ND_SedLaunder, EN_PipeSpec)
    layerfcouplcap ← layer_freeze("laundercouplingcap")
    layernewocap ← layer_new("launderorificecap", green)
    view3 ← viewleftside
    orificecap ← launderorificecap([
        (Plant_Origin[1] - W_Sed/(N_SedLaunders*N_SedBays*2));
        Plant_Origin[1] + Z_SedLaunder;
        Plant_Origin[2] + W_ExitChannel + T_PlantWall - SocketDepth(ND_SedLaunder)
    ], ND_SedLaunder, D_CapOrifice, EN_PipeSpec)
    layerfocap ← layer_freeze("launderorificecap")
    Final ←
        stack(LaunderLayer, LaunderPipe, FreezeLaunder, Orifice1, Orifice2, OrificeArray, GroupOrifice, SubtractOrifices, ThawLaunder, ArrayPieces, FreezeLaunder, FlexCouplingLayer, FlexCoupling, ArrayPieces, FreezeFlexCoupling, CapLayer, LaunderCap, ArrayPieces, FreezeCap, view2, layerset1, layernewcouplcap, solidcap, viewtop1, ArrayPieces, layerset1, layerfcouplcap, layernewocap, view3, orificecap, viewtop1, ArrayPieces, layerset1, layerfocap) if N_SedBays > 1
        stack(LaunderLayer, LaunderPipe, FreezeLaunder, Orifice1, Orifice2, OrificeArray, GroupOrifice, SubtractOrifices, FlexCouplingLayer, FlexCoupling, CapLayer, LaunderCap, FreezeCap, view2, layerset1, layernewcouplcap, solidcap, layerset1, layerfcouplcap, layernewocap, view3, orificecap, layerset1, layerfocap) otherwise
SedLaunderCoupling :=
    Local ← layer_new("PVCCoupling", green)
    for b ∈ 0 .. N_SedBays - 1
        Local ← stack(Local, CouplingSUBF(PVCCouplingNew_origin + [0 m; W_SedBay*b; 0 m], [0 deg; 0 deg], ND_SedLaunder, EN_PipeSpec, ["tank"]))
    Local2 ← layer_new("SedLaunderNipple", blue)
    for b ∈ 0 .. N_SedBays - 1
        Local2 ←
            stack(Local2, PipeF(SedLaunderNippleNew_origin + [0 m; W_SedBay*b; 0 m], LengthSedLaunderNipple, [0 deg; 0 deg], ND_SedLaunder, EN_PipeSpec)) if CouplingLength(ND_SedLaunder) ≥ T_ChannelWall
            stack(Local2, PipeSUBF(SedLaunderNippleNew_origin + [0 m; W_SedBay*b; 0 m], LengthSedLaunderNipple, [0 deg; 0 deg], ND_SedLaunder, EN_PipeSpec, ["tank"])) otherwise
    return stack(Local, FreezeLayer("PVCCoupling"), Local2, FreezeLayer("SedLaunderNipple"))
ThawAllSed := ThawMultiple([
    "tank";
    "bottomslopes";
    "iccoupling";
    "draincover";
    "slopes";
    "flochopper";
    "launder";
    "FlexCoupling";
    "SedLaunderNipple";
    "PVCCoupling";
    "LaunderCap";
    "LaunderOrificeCap";
    "chimneycoupling";
    "chimney stops";
    "manifoldpipe";
    "manifoldcap";
    "manifoldelbow";
    "SedInletManPipe";
    "FlexCouplingSedManifold";
    "SedDrainAdapter";
    "SedDrainNipple";
    "SedDrainElbow";
    "SedDrainValves";
    "DrainPipe";
    "DrainElbow";
    "SedDrainPipe";
    "SedDrainCoupling";
    "laundercouplingcap";
    "PVCCoupling";
    "SedLaunderNipple";
    "PipeFrame";
    "PipeFrameStub"
])
ThawPFS := layer_thaw("PipeFrameSupport")
ArraySedTank := array_all(N_SedTanks, 1, W_Sed + T_PlantWall)
FreezeSedPieces := FreezeMultiple([
    "bottomslopes";
    "iccoupling";
    "draincover";
    "slopes";
    "flochopper";
    "launder";
    "FlexCoupling";
    "SedLaunderNipple";
    "PVCCoupling";
    "LaunderCap";
    "LaunderOrificeCap";
    "chimneycoupling";
    "chimney stops";
    "manifoldpipe";
    "manifoldcap";
    "manifoldelbow";
    "SedInletManPipe";
    "FlexCouplingSedManifold";
    "SedDrainAdapter";
    "SedDrainNipple";
    "SedDrainElbow";
    "SedDrainValves";
    "DrainPipe";
    "DrainElbow";
    "SedDrainPipe";
    "SedDrainCoupling";
    "laundercouplingcap";
    "PVCCoupling";
    "SedLaunderNipple";
    "PipeFrame";
    "PipeFrameStub"
])
FreezePFS := FreezeLayer("PipeFrameSupport")
Sedtankarrayscript :=
    stack(ThawAllSed, ThawPFS, viewtop1, ArraySedTank, layer_set("0"), FreezeSedPieces, FreezePFS, FreezeSedTank) if N_SedBays > 0
    stack(ThawAllSed, viewtop1, ArraySedTank, layer_set("0"), FreezeSedPieces, FreezeSedTank) otherwise
SedExitChannelLayer := layer_new("echannel", ltgrey)
DrawSedExitChannel := Tank(echanneltank_origin, [
    W_ExitChannel;
    N_SedTanks*N_SedBays*(W_SedBay + T_PlantWall) - T_PlantWall + 4*ConRadius(ND_PltWeir) + 3*S_Elbow;
    H_ExitChannel
], T_ChannelWall)
FreezeSedExitChannel := FreezeLayer("echannel")
SedChannelLayer := layer_new("Channel", ltgrey)
DrawSedChannel := Tank(ichanneltank_origin, [
    W_InletChannel;
    N_SedTanks*N_SedBays*(W_SedBay + T_PlantWall) - T_PlantWall + 2*ConRadius(ND_PltWeir) + 2*S_Elbow;
    H_InletChannel
], T_ChannelWall)
FreezeSedChannel := FreezeLayer("channel")
MakeSedInletChannel := BoxF([
    Plant_Origin[0] - L_Sed;
    Plant_Origin[1] - T_PlantWall - zc;
    Plant_Origin[2] + H_Sed - H_InletChannel
], [
    Plant_Origin[0] - L_Sed + W_InletChannel;
    Plant_Origin[1] + (N_SedTanks*N_SedBays*(W_SedBay + T_PlantWall) - T_PlantWall) + zc;
    Plant_Origin[2] + H_Sed
], [0; 0; 0]*deg)
MakeSedExitChannel := BoxF([
    Plant_Origin[0] - W_ExitChannel;
    Plant_Origin[1] - T_PlantWall - zc;
    Plant_Origin[2] + H_Sed - H_ExitChannel
], [
    Plant_Origin[0];
    N_SedTanks*N_SedBays*(W_SedBay + T_PlantWall) - T_PlantWall + zc;
    Plant_Origin[2] + H_Sed
], [0; 0; 0]*deg)
GroupSedChannelPieces := GroupAll("DeleteMe")
SubtractChannelPieces := SubtractF(["Tank"; "EChannel"; "Channel"], "DeleteMe")  # this will put tank, channel, and echannel in the same layer
SedTankChannels := stack(SedExitChannelLayer, DrawSedExitChannel, FreezeSedExitChannel, SedChannelLayer, DrawSedChannel, FreezeSedChannel, MakeSedInletChannel, MakeSedExitChannel, GroupSedChannelPieces, SubtractChannelPieces)
sedechanneltankscript :=
    viewtope ← viewtop1
    layernewewe ← layer_new("exitweirelbow", green)
    elbowewe ← elbow(sedtankexitweirelbow_origin, ND_PltWeir, EN_PipeSpec)
    rotateewe1 ← rotate_3d([
        sedtankexitweirelbow_origin[0] + ElbowRadius(ND_PltWeir);
        sedtankexitweirelbow_origin[1];
        sedtankexitweirelbow_origin[2] - outerradius(ND_PltWeir)
    ], sedtankexitweirelbow_origin, "y", 90)
    rotateewe2 ← rotate_3d([
        sedtankexitweirelbow_origin[0];
        sedtankexitweirelbow_origin[1] + ElbowRadius(ND_PltWeir) - outerradius(ND_PltWeir);
        sedtankexitweirelbow_origin[2]
    ], sedtankexitweirelbow_origin, "z", 270)
    elbowewe2 ← elbow(sedtankexitweirelbow2_origin, ND_PltWeir, EN_PipeSpec)
    rotateewe21 ← rotate_3d([
        sedtankexitweirelbow2_origin[0] + ElbowRadius(ND_PltWeir);
        sedtankexitweirelbow2_origin[1];
        sedtankexitweirelbow2_origin[2] - outerradius(ND_PltWeir)
    ], sedtankexitweirelbow2_origin, "y", 90)
    rotateewe22 ← rotate_3d([
        sedtankexitweirelbow2_origin[0];
        sedtankexitweirelbow2_origin[1] + ElbowRadius(ND_PltWeir) - outerradius(ND_PltWeir);
        sedtankexitweirelbow2_origin[2]
    ], sedtankexitweirelbow2_origin, "z", 90)
    layerfreezeewe ← layer_freeze("exitweirelbow")
    layernewewp ← layer_new("exitweir", blue)
    pipeewp ← Pipe(exitweirpipe_origin, ND_PltWeir, exitweirpipe_length, EN_PipeSpec)
    copyewp ← copyB(exitweirpipecopy1_point, exitweirpipecopy1_point, exitweirpipecopy2_point)
    layerfreezeewp ← layer_freeze("exitweir")
    layernewconnpipe ← layer_new("connecting pipe", blue)
    pipecon ← Pipe(sedtankconnectingpipe_origin, ND_PltWeir, connectingpipe_length, EN_PipeSpec)
    rotatepipecon ← rotate_3d([
        sedtankconnectingpipe_origin[0] + outerradius(ND_PltWeir);
        sedtankconnectingpipe_origin[1];
        sedtankconnectingpipe_origin[2] + connectingpipe_length
    ], sedtankconnectingpipe_origin, "y", 270)
    layerfreezepipecon ← layer_freeze("connecting pipe")
    one ← stack(viewtope, layernewewe, elbowewe, rotateewe1, rotateewe2, elbowewe2, rotateewe21, rotateewe22, layer_set("0"), layerfreezeewe, layernewewp, pipeewp, copyewp, layer_set("0"), layerfreezeewp, layernewconnpipe, pipecon, rotatepipecon, layer_set("0"), layerfreezepipecon)
    return one
sedichanneltankscript :=
    viewtopi ← viewtop1
    layerset ← layer_set("0")
    layernewiwe ← layer_new("inletweirtee", green)
    teeiwt ← TeeF([
        Plant_Origin[0] - L_Sed + S_Fitting + ConRadius(ND_PltWeir);
        Plant_Origin[1] - T_PlantWall - S_Fitting - ConRadius(ND_PltWeir);
        Plant_Origin[2] + ShortTeeLength(ND_PltWeir)
    ], [0; 0; 90]*deg, ND_PltWeir, EN_PipeSpec)
    layernewiwp ← layer_new("inletweir", blue)
    pipeiwp ← Pipe(inletweirpipe_origin, ND_PltWeir, inletweirpipe_length, EN_PipeSpec)
    layerfreezeiwp ← layer_freeze("inletweir")
    layerfreezeiwt ← layer_freeze("inletweirtee")
    NewWastePipe ← layer_new("WastePipe", blue)
    WastePipe ← PipeF([
        sedtankinletweirelbow_origin[0] - ShortTeeLength(ND_PltWeir);
        sedtankinletweirelbow_origin[1];
        Plant_Origin[2]
    ], 1.25*ND_PltWeir, [0; 0]*deg, ND_PltWeir, EN_PipeSpec)
    FreezeWastePipe ← FreezeLayer("WastePipe")
    NewWasteElbow ← layer_new("WasteElbow", green)
    WasteElbow ← ElbowF([
        sedtankinletweirelbow_origin[0] - 1.25*ND_PltWeir - ShortTeeLength(ND_PltWeir);
        sedtankinletweirelbow_origin[1];
        Plant_Origin[2]
    ], [90; 0; 45]*deg, ND_PltWeir, EN_PipeSpec)
    FreezeWasteElbow ← FreezeLayer("WasteElbow")
    return stack(viewtopi, layernewiwe, teeiwt, layerset, viewtopi, layernewiwp, pipeiwp, layerset, layerfreezeiwp, layerfreezeiwt, NewWastePipe, WastePipe, FreezeWastePipe, NewWasteElbow, WasteElbow, FreezeWasteElbow)
weirpipescapsscript :=
    viewtops ← viewtop1
    layerweircaps ← layer_new("weirpipecap", dkgrey)
    iweircap ← cap(inletweirpipe_origin + [0; 0; inletweirpipe_length], ND_PltWeir, EN_PipeSpec)
    eweircap1 ← cap(exitweirpipe_origin + [0; 0; exitweirpipe_length], ND_PltWeir, EN_PipeSpec)
    eweircap2 ← cap(exitweirpipecopy2_point + [innerD(ND_PltWeir, EN_PipeSpec)/2; 0; exitweirpipe_length], ND_PltWeir, EN_PipeSpec)
    layerset0 ← layer_set("0")
    layerfreezecaps ← layer_freeze("weirpipecap")
    one ← stack(viewtops, layerweircaps, iweircap, eweircap1, viewtops, eweircap2, layerset0, layerfreezecaps)
    return one
text := stack(layer_new("text", [0; 0; 0]), concat("c", sp, "c", sp, point_nounits([0; 0; 0][:, 0])), concat("text"), concat(sp, sp), textbox(H_Text, textbox_origin, textbox_origin + textbox_dim, Disclaimer), layer_set("0"), layer_freeze("text"))
AC_SedTank :=
    stack(Sedtanktankscript, SedLaunderCoupling, SedDrainScript, Sedtankexitweirscript, Sedtankinletweirscript, Sedbottomslopescript, influentmanifoldscript, inletpipescript, Draincoverscript, SedTankLaminaScript, PipeFrameScript, SedLaunderScript, Sedtankarrayscript, SedTankChannels, sedichanneltankscript, sedechanneltankscript, weirpipescapsscript, text) if (N_SedBays > 1 and N_SedTanks > 1)
    stack(Sedtanktankscript, SedLaunderCoupling, SedDrainScript, Sedtankexitweirscript, Sedtankinletweirscript, Sedbottomslopescript, influentmanifoldscript, inletpipescript, Draincoverscript, SedTankLaminaScript, PipeFrameScript, SedLaunderScript, Sedtankarrayscript, SedTankChannels, sedichanneltankscript, sedechanneltankscript, weirpipescapsscript, text) if (N_SedBays ≤ 1 and N_SedTanks > 1)
    stack(Sedtanktankscript, SedLaunderCoupling, SedDrainScript, Sedtankexitweirscript, Sedtankinletweirscript, Sedbottomslopescript, influentmanifoldscript, inletpipescript, Draincoverscript, SedTankLaminaScript, PipeFrameScript, SedLaunderScript, sedichanneltankscript, SedTankChannels, SedLaunderCoupling, sedechanneltankscript, weirpipescapsscript, text) if (N_SedBays == 1 and N_SedTanks == 1)
    stack(Sedtanktankscript, SedLaunderCoupling, SedDrainScript, Sedtankexitweirscript, Sedtankinletweirscript, Sedbottomslopescript, influentmanifoldscript, inletpipescript, Draincoverscript, SedTankLaminaScript, PipeFrameScript, SedLaunderScript, sedichanneltankscript, SedTankChannels, SedLaunderCoupling, sedechanneltankscript, weirpipescapsscript, text) if (N_SedBays > 1 and N_SedTanks == 1)
# [component: inputs AC_SedTank]
