# [reference: MasterProgram.xmcd]
# Draw a single bay within a sed tank with
# Array the single bay then array the whole tanks
Plant_Origin := [0; 0; 0]
# Draw the Concrete components of the sedimentation tank (excluding channels and launder ledge)
# viewrightside1
# ViewRightSide1
SedSlopePolyline :=
    if Z_SedLamellaBottom - (Plant_Origin[2] + H_SedSideSlopes + 2*ConRadius(ND_SedPlateFrame)) > 0
        Pline([
            [Plant_Origin[1] + W_Sed; Plant_Origin[2]];
            [Plant_Origin[1] + W_Sed; Plant_Origin[2]] + [-W_SedBay/2 + W_SedSludge/2; Plant_Origin[2]];
            [Plant_Origin[1] + W_Sed; Plant_Origin[2]] + [-W_SedBay/2 + W_SedSludge/2; H_SedSludge];
            [Plant_Origin[1] + W_Sed; Plant_Origin[2]] + [-W_SedBay/2 + W_SedSludge/2 + T_ConcreteMin; H_SedSludge];
            [Plant_Origin[1] + W_Sed; Plant_Origin[2]] + [-W_SedBay/2 + W_SedSludge/2 + T_ConcreteMin; H_SedSludge + H_SedDrainCoverTotal];
            [Plant_Origin[1] + W_Sed; Plant_Origin[2]] + [
                -T_ConcreteMin;
                ((W_SedBay - W_SedSludge)/2 - 2*T_ConcreteMin)*tan(AN_SedSlope) + H_SedSludge + H_SedDrainCoverTotal
            ];
            [Plant_Origin[1] + W_Sed; 0 m] + [-T_ConcreteMin; Z_SedLamellaBottom - 2*ConRadius(ND_SedPlateFrame)];
            [Plant_Origin[1] + W_Sed; 0 m] + [0 m; Z_SedLamellaBottom - 2*ConRadius(ND_SedPlateFrame)];
            [Plant_Origin[1] + W_Sed; Plant_Origin[2]]
        ])
    otherwise
        Pline([
            [Plant_Origin[1] + W_Sed; Plant_Origin[2]];
            [Plant_Origin[1] + W_Sed; Plant_Origin[2]] + [-W_SedBay/2 + W_SedSludge/2; Plant_Origin[2]];
            [Plant_Origin[1] + W_Sed; Plant_Origin[2]] + [-W_SedBay/2 + W_SedSludge/2; H_SedSludge];
            [Plant_Origin[1] + W_Sed; Plant_Origin[2]] + [-W_SedBay/2 + W_SedSludge/2 + T_ConcreteMin; H_SedSludge];
            [Plant_Origin[1] + W_Sed; Plant_Origin[2]] + [-W_SedBay/2 + W_SedSludge/2 + T_ConcreteMin; H_SedSludge + H_SedDrainCoverTotal];
            [Plant_Origin[1] + W_Sed; Plant_Origin[2]] + [
                -T_ConcreteMin;
                ((W_SedBay - W_SedSludge)/2 - 2*T_ConcreteMin)*tan(AN_SedSlope) + H_SedSludge + H_SedDrainCoverTotal
            ];
            [Plant_Origin[1] + W_Sed; Plant_Origin[2]] + [
                0 m;
                ((W_SedBay - W_SedSludge)/2 - 2*T_ConcreteMin)*tan(AN_SedSlope) + H_SedSludge + H_SedDrainCoverTotal
            ];
            [Plant_Origin[1] + W_Sed; Plant_Origin[2]]
        ])
ExtrudeSedSlopes := extrude([Plant_Origin[0] + W_Sed; Plant_Origin[1]], -L_Sed)  # viewrightside1
MirrorSedSlopes := MirrorLast([Plant_Origin[1] + W_Sed - W_SedBay/2; Plant_Origin[2]], [Plant_Origin[1] + W_Sed - W_SedBay/2; Plant_Origin[2] + zc], "n")
ArraySedSlopes := array_all(N_SedBays, 1, -W_SedBay)  # viewtop1
# viewfront1
SedHopper :=
    if H_SedHopperBackSlope > 0 m
        Pline([
            [Plant_Origin[0]; Plant_Origin[2]];
            [Plant_Origin[0]; Plant_Origin[2]] + [-L_SedHopper; 0 m];
            [Plant_Origin[0]; Plant_Origin[2]] + [-L_SedHopper; H_SedFlocWeir];
            [Plant_Origin[0]; Plant_Origin[2]] + [-L_SedHopper + T_ConcreteMin; H_SedFlocWeir];
            [Plant_Origin[0]; Plant_Origin[2]] + [-L_SedHopperBackSlope; ElbowRadius(ND_SedHopperDrain)];
            [Plant_Origin[0]; Plant_Origin[2]] + [0 m; H_SedHopperBackSlope];
            [Plant_Origin[0]; Plant_Origin[2]]
        ])
    if L_SedHopper < T_ConcreteMin + H_SedFlocWeir/tan(AN_SedSlope)
        Pline([
            [Plant_Origin[0]; Plant_Origin[2]];
            [Plant_Origin[0]; Plant_Origin[2]] + [-L_SedHopper; 0 m];
            [Plant_Origin[0]; Plant_Origin[2]] + [-L_SedHopper; H_SedFlocWeir];
            [Plant_Origin[0]; Plant_Origin[2]] + [-L_SedHopper + T_ConcreteMin; H_SedFlocWeir];
            [Plant_Origin[0]; Plant_Origin[2]] + [0 m; (T_ConcreteMin + H_SedFlocWeir/tan(AN_SedSlope) - L_SedHopper)*tan(AN_SedSlope)];
            [Plant_Origin[0]; Plant_Origin[2]]
        ])
    otherwise
        Pline([
            [Plant_Origin[0]; Plant_Origin[2]];
            [Plant_Origin[0]; Plant_Origin[2]] + [-L_SedHopper; 0 m];
            [Plant_Origin[0]; Plant_Origin[2]] + [-L_SedHopper; H_SedFlocWeir];
            [Plant_Origin[0]; Plant_Origin[2]] + [-L_SedHopper + T_ConcreteMin; H_SedFlocWeir];
            [Plant_Origin[0]; Plant_Origin[2]]
        ])
# viewfront
ExtrudeSedHopper := extrude([Plant_Origin[0]; Plant_Origin[2]] + [-L_SedHopper + T_ConcreteMin; H_SedFlocWeir], -W_Sed)
# viewtop
SedManifoldLedge := BoxF([-L_SedHopper + Plant_Origin[0]; Plant_Origin[1]; Z_SedManifoldPipe - ConRadius(ND_SedManifold)], [
    -L_SedHopper - T_ConcreteMin + Plant_Origin[0];
    W_Sed + Plant_Origin[1];
    Z_SedManifoldPipe - ConRadius(ND_SedManifold) - T_ConcreteMin
], [0; 0; 0]*deg)
SedManifoldSlope := WedgeF(Plant_Origin - [L_Sed; 0 m; 0 m], [L_SedEndSlope; W_Sed; H_SedEndSlope] + Plant_Origin - [L_Sed; 0 m; 0 m], [0; 0; 0]*deg)
DrawSedTank := Tank(Plant_Origin, [L_Sed; W_Sed; H_Sed], T_PlantWall)
FreezeSedTank := FreezeLayer("SedTankCon")  # unionall
SedInletChannelCut := BoxF([-L_Sed + W_SedInletChannel; W_Sed; H_Sed - H_SedInletChannel] + Plant_Origin, [-L_Sed; W_Sed + T_PlantWall; H_Sed] + Plant_Origin, [0; 0; 0]*deg)
SedExitChannelCut := BoxF(Plant_Origin + [0 m; W_Sed; H_Sed - H_SedExitChannel], Plant_Origin + [-W_SedExitChannel; W_Sed + T_PlantWall; H_Sed], [0; 0; 0]*deg)
# this cuts a space for the channel on the side closest to the floc tank
MirrorSedChannelCuts := Mirror3dAll("zx", [Plant_Origin[0]; Plant_Origin[1] + W_Sed/2], "n")
GroupSedChannelCuts := GroupAll("DeleteMe")
SubtractSedChannelCuts := SubtractF(["SedTankCon"], "DeleteMe")
SedTankScript :=
    stack(SedTankLayer, viewrightside1, SedSlopePolyline, viewrightside1, ExtrudeSedSlopes, MirrorSedSlopes, viewfront1, SedHopper, viewfront1, ExtrudeSedHopper, viewtop1, SedManifoldLedge, SedManifoldSlope, DrawSedTank, union_allA, FreezeSedTank, SedInletChannelCut, SedExitChannelCut, MirrorSedChannelCuts, GroupSedChannelCuts, SubtractSedChannelCuts) if N_SedBays == 1
    stack(SedTankLayer, viewrightside1, SedSlopePolyline, viewrightside1, ExtrudeSedSlopes, MirrorSedSlopes, viewtop1, ArraySedSlopes, viewfront1, SedHopper, viewfront1, ExtrudeSedHopper, viewtop1, SedManifoldLedge, SedManifoldSlope, DrawSedTank, union_allA, FreezeSedTank, SedInletChannelCut, SedExitChannelCut, MirrorSedChannelCuts, GroupSedChannelCuts, SubtractSedChannelCuts) otherwise
# Draw the channels and launder ledge
SedChannelLayer := layer_new("SedChannelsCon", grey)
InletChannelVertBox := BoxF([-L_Sed + W_SedInletChannel; W_Sed; Z_SedChannelBottom] + Plant_Origin, [-L_Sed + W_SedInletChannel + T_ChannelWall; W_Sed - W_SedBay; H_Sed] + Plant_Origin, [0; 0; 0]*deg)
ExitChannelVertBox := BoxF([-W_SedExitChannel; W_Sed; Z_SedChannelBottom] + Plant_Origin, [-W_SedExitChannel - T_ChannelWall; W_Sed - W_SedBay; H_Sed] + Plant_Origin, [0; 0; 0]*deg)
InletChannelHorizBox := BoxF([-L_Sed; W_Sed; Z_SedChannelBottom] + Plant_Origin, [-L_Sed + W_SedInletChannel + T_ChannelWall; W_Sed - W_SedBay; Z_SedChannelBottom - T_ChannelWall] + Plant_Origin, [0; 0; 0]*deg)
ExitChannelHorizBox := BoxF([0 m; W_Sed; Z_SedChannelBottom] + Plant_Origin, [-W_SedExitChannel - T_ChannelWall; W_Sed - W_SedBay; Z_SedChannelBottom - T_ChannelWall] + Plant_Origin, [0; 0; 0]*deg)
SedLaunderLedge := BoxF([-L_Sed + W_SedInletChannel + T_ChannelWall; W_Sed; Z_SedLaunder - ConRadius(ND_SedLaunder)] + Plant_Origin, [
    -L_Sed + W_SedInletChannel + T_ChannelWall + T_ConcreteMin;
    W_Sed - W_SedBay;
    Z_SedLaunder - ConRadius(ND_SedLaunder) - T_ConcreteMin
] + Plant_Origin, [0; 0; 0]*deg)
FreezeSedChannels := FreezeLayer("SedChannelsCon")
SedChannelScript := stack(SedChannelLayer, InletChannelVertBox, ExitChannelVertBox, InletChannelHorizBox, ExitChannelHorizBox, SedLaunderLedge, union_allA, FreezeSedChannels)
# unionall
# Draw the manifold components
# Manifold origins:
SedManCoupling_Origin := [
    -L_Sed + T_ConcreteMin + ConRadius(ND_SedManifold);
    W_Sed - W_SedBay/2;
    Z_SedChannelBottom - SocketDepth(ND_SedManifold)
] + Plant_Origin
SedManNipple_Origin := [0 m; 0 m; -CouplingLength(ND_SedManifold) + 2*SocketDepth(ND_SedManifold)] + SedManCoupling_Origin
SedManFlexCoupling_Origin := [0 m; 0 m; -(SocketDepth(ND_SedManifold) + max(0 m, T_PlantWall - CouplingLength(ND_SedManifold)))] + SedManNipple_Origin
SedManVertPipe_Origin := [0 m; 0 m; -CouplingLengthFlex(ND_SedManifold) + SocketDepthFlex(ND_SedManifold)] + SedManFlexCoupling_Origin
SedManElbow_Origin := [
    SedManVertPipe_Origin[0] + ElbowRadius(ND_SedManifold);
    SedManVertPipe_Origin[1];
    Z_SedManifoldPipe
]
SedManPipe_Origin := SedManElbow_Origin + [L_SedManifoldPipe; 0 m; 0 m]  # This is the same as the cap origin
SedManLayer := layer_new("SedManifoldPlumbing", blue)
SedManRigidCoupling := CouplingSUBF(SedManCoupling_Origin, [0; 270]*deg, ND_SedManifold, PS_Default, ["SedChannelsCon"])
SedManNipple := PipeSUBF(SedManNipple_Origin, SocketDepthFlex(ND_SedManifold) + SocketDepth(ND_SedManifold) + max(0 m, T_PlantWall - CouplingLength(ND_SedManifold)), [0; 270]*deg, ND_SedManifold, PS_Default, ["SedChannelsCon"])
SedManFlexCoupling := FlexCouplingF(SedManFlexCoupling_Origin, [0; 270]*deg, ND_SedManifold)
SedManVertPipe := PipeF(SedManVertPipe_Origin, SedManVertPipe_Origin[2] - Z_SedManifoldPipe - ElbowRadius(ND_SedManifold), [0; 270]*deg, ND_SedManifold, PS_Default)
SedManElbow := ElbowF(SedManElbow_Origin, [90; 0; 270]*deg, ND_SedManifold, PS_Default)
SedManPipe := PipeF(SedManPipe_Origin, L_SedManifoldPipe, [0; 0], ND_SedManifold, PS_Default)
SedManCap := CapF(SedManPipe_Origin, [0; 0; 0]*deg, ND_SedManifold)
FreezeSedMan := FreezeLayer("SedManifoldPlumbing")
SedManOrifice := CylinderF(SedManPipe_Origin + [-B_SedManifoldPort/2; 0 m; 0 m], D_SedManifoldPort/2, ND_SedManifold, [0; 90]*deg)
ArraySedManOrifice := array_all(1, N_SedManifoldPorts, -B_SedManifoldPort)
GroupSedManOrifices := GroupAll("DeleteMe")
SubtractSedManOrifices := SubtractF(["SedManifoldPlumbing"], "DeleteMe")
SedManifoldScript := stack(SedManLayer, SedManRigidCoupling, SedManNipple, SedManFlexCoupling, SedManVertPipe, SedManElbow, SedManPipe, SedManCap, FreezeSedMan, SedManOrifice, ArraySedManOrifice, GroupSedManOrifices, SubtractSedManOrifices)
# Draw the launder components
# Launder origins:
SedLaunderCoupling_Origin := [-W_SedExitChannel - SocketDepth(ND_SedLaunder); W_Sed - W_SedBay/2; Z_SedLaunder] + Plant_Origin
SedLaunderNipple_Origin := SedLaunderCoupling_Origin + [-CouplingLength(ND_SedLaunder) + 2*SocketDepth(ND_SedLaunder); 0 m; 0 m]
SedLaunderFlexCoupling_Origin := SedLaunderNipple_Origin - [SocketDepth(ND_SedLaunder) + max(0 m, T_PlantWall - CouplingLength(ND_SedLaunder)); 0 m; 0 m]
SedLaunderPipe_Origin := SedLaunderFlexCoupling_Origin - [CouplingLengthFlex(ND_SedLaunder) - SocketDepth(ND_SedLaunder); 0 m; 0 m]
SedLaunderCap_Origin := SedLaunderPipe_Origin - [L_SedLaunder; 0 m; 0 m]
SedLaunderLayer := layer_new("SedLaunderPlumbing", blue)
SedLaunderCoupling := CouplingSUBF(SedLaunderCoupling_Origin, [0; 0]*deg, ND_SedLaunder, PS_Default, ["SedChannelsCon"])
SedLaunderNipple := PipeSUBF(SedLaunderNipple_Origin, SocketDepth(ND_SedLaunder) + SocketDepthFlex(ND_SedLaunder) + max(0 m, T_PlantWall - CouplingLength(ND_SedLaunder)), [0; 0]*deg, ND_SedLaunder, PS_Default, ["SedChannelsCon"])
SedLaunderFlexCoupling := FlexCouplingF(SedLaunderFlexCoupling_Origin, [0; 0]*deg, ND_SedLaunder)
SedLaunderPipe := PipeF(SedLaunderPipe_Origin, L_SedLaunder, [0; 0]*deg, ND_SedLaunder, PS_Default)
SedLaunderCap := CapF(SedLaunderCap_Origin, [0; 180]*deg, ND_SedLaunder)
FreezeLaunder := FreezeLayer("SedLaunderPlumbing")
SedLaunderOrifice := CylinderF([-CouplingLengthFlex(ND_SedLaunder) - D_SedLaunderOrifice; 0 m; 0 m] + SedLaunderPipe_Origin, D_SedLaunderOrifice/2, ND_SedLaunder, [30; 90]*deg)
ArraySedLaunderOrifices := array_all(1, N_SedLaunderOrifices, -B_SedLaunderOrifices)
MirrorSedLaunderOrifices := Mirror3dAll("zx", [Plant_Origin[0]; SedLaunderPipe_Origin[1]], "n")
GroupLaunderOrifices := GroupAll("DeleteMe")
SubtractLaunderOrifices := SubtractF(["SedLaunderPlumbing"], "DeleteMe")
SedLaunderScript := stack(SedLaunderLayer, SedLaunderCoupling, SedLaunderNipple, SedLaunderFlexCoupling, SedLaunderPipe, SedLaunderCap, FreezeLaunder, SedLaunderOrifice, ArraySedLaunderOrifices, MirrorSedLaunderOrifices, GroupLaunderOrifices, SubtractLaunderOrifices)
# Draw the Floc Hopper Drain
SedHopperDrainCoupling_Origin := [
    -SocketDepth(ND_SedHopperDrain) + T_PlantWall;
    W_Sed - W_SedBay/2;
    ElbowRadius(ND_SedHopperDrain) + ConRadius(ND_SedHopperDrain)
] + Plant_Origin
SedHopperDrainPipe_Origin := SedHopperDrainCoupling_Origin + [2*SocketDepth(ND_SedLaunder) - CouplingLength(ND_SedLaunder); 0 m; 0 m]
SedHopperDrainNippleToValve_Origin := SedHopperDrainCoupling_Origin + [
    ValveSocket(ND_SedHopperDrain) + SocketDepth(ND_SedHopperDrain) + max(0 m, T_PlantWall - CouplingLength(ND_SedHopperDrain)) + S_Fitting;
    0 m;
    0 m
]
SedHopperValve_Origin := [ValveLength(ND_SedHopperDrain); 0 m; 0 m] + SedHopperDrainNippleToValve_Origin
SedHopperDrainElbow_Origin := [2*SocketDepth(ND_SedHopperDrain); 0 m; 0 m] + SedHopperValve_Origin
SedHopperDrainLayer := layer_new("SedHopperDrain", blue)  # same as origin for nipple to elbow
SedHopperDrainPipe := PipeSUBF(SedHopperDrainPipe_Origin, L_SedHopperDrainPipe, [0; 0]*deg, ND_SedHopperDrain, PS_Default, ["SedTankCon"])
SedHopperDrainCoupling := CouplingSUBF(SedHopperDrainCoupling_Origin, [0; 0]*deg, ND_SedHopperDrain, PS_Default, ["SedTankCon"])
SedHopperDrainNippleToValve := PipeSUBF(SedHopperDrainNippleToValve_Origin, ValveSocket(ND_SedHopperDrain) + SocketDepth(ND_SedHopperDrain), [0; 0]*deg, ND_SedHopperDrain, PS_Default, ["SedTankCon"])
SedHopperDrainValve := insertdwg("VAL-Scaled-Gate-Valve-Threaded", SedHopperValve_Origin, 2*outerradius(ND_SedHopperDrain)/(1.16 m), 2*outerradius(ND_SedHopperDrain)/(1.16 m), 0 deg)
SedHopperDrainNippleToElbow := PipeF(SedHopperDrainElbow_Origin, ValveSocket(ND_SedHopperDrain) + SocketDepth(ND_SedHopperDrain), [0; 0]*deg, ND_SedHopperDrain, PS_Default)
SedHopperDrainElbow := ElbowF(SedHopperDrainElbow_Origin, [270; 315; 0]*deg, ND_SedHopperDrain, PS_Default)
FreezeSedDrainHopper := FreezeLayer("SedHopperDrain")
SedHopperDrainScript := stack(SedHopperDrainLayer, SedHopperDrainPipe, SedHopperDrainCoupling, SedHopperDrainNippleToValve, SedHopperDrainValve, SedHopperDrainNippleToElbow, SedHopperDrainElbow, FreezeSedDrainHopper)
# Draw the sed drain cover
SedDrainCoverLayer := layer_new("SedDrainCoverCon", ltgrey)
# viewrightside1
SedDrainCoverPline := Pline([
    [Plant_Origin[1] + W_Sed - (W_SedBay + W_SedDrainCover)/2; Plant_Origin[2] + H_SedSludge];
    [
        Plant_Origin[1] + W_Sed - (W_SedBay + W_SedDrainCover)/2;
        Plant_Origin[2] + H_SedSludge + H_SedDrainCoverTotal
    ];
    [
        Plant_Origin[1] + W_Sed - (H_SedDrainCoverTotal + T_ConcreteMin + zc)/tan(AN_SedSlope) - (W_SedBay + W_SedDrainCover)/2;
        Plant_Origin[2] + H_SedSludge + T_ConcreteMin + zc
    ];
    [
        Plant_Origin[1] + W_Sed - W_SedBay + (H_SedDrainCoverTotal + T_ConcreteMin + zc)/tan(AN_SedSlope) - (W_SedBay + W_SedDrainCover);
        Plant_Origin[2] + H_SedSludge + T_ConcreteMin + zc
    ];
    [
        Plant_Origin[1] + W_Sed - (W_SedBay - W_SedDrainCover)/2;
        Plant_Origin[2] + H_SedSludge + H_SedDrainCoverTotal
    ];
    [Plant_Origin[1] + W_Sed - (W_SedBay - W_SedDrainCover)/2; Plant_Origin[2] + H_SedSludge];
    [Plant_Origin[1] + W_Sed - (W_SedBay + W_SedDrainCover)/2; Plant_Origin[2] + H_SedSludge]
])
ExtrudeSedDrainCover := extrude([
    Plant_Origin[1] + W_Sed - W_SedBay/2;
    Plant_Origin[2] + H_SedSludge + H_SedDrainCoverTotal - tan(AN_SedSlope)*W_SedDrainCover/2
], -L_SedDrainCoverSegment)
ArraySedDrainCover := ArrayLast(1, N_SedDraincover, -L_SedDrainCoverSegment - S_SedDraincoverSegment)  # error: This variable is undefined.
FreezeSedDrainCover := FreezeLayer("SedDrainCover")  # viewtop1
SedJetRedirect := CylinderF([-L_SedHopper; W_Sed - W_SedBay/2; H_SedSludge + T_ConcreteMin + outerradius(ND_SedJetReverser)] + Plant_Origin, outerradius(ND_SedJetReverser), L_SedManifoldPipe, [0; 0]*deg)
GroupJetReverser := GroupAll("DeleteMe")
SubtractJetReverser := SubtractF(["SedDrainCover"], "DeleteMe")
SedDrainCoverScript := stack(SedDrainCoverLayer, viewrightside1, SedDrainCoverPline, ExtrudeSedDrainCover, viewtop1, ArraySedDrainCover, FreezeSedDrainCover, SedJetRedirect, GroupJetReverser, SubtractJetReverser)  # error: This variable is undefined.
# Draw the Lamella Pipe Frame
SedPipeFrame_Origin := [
    Plant_Origin[0] - W_SedExitChannel - T_ChannelWall - L_SedPlate*cos(60 deg) - outerradius(ND_SedFrameStub) + B_SedPlate/sin(AN_SedPlate) - T_SedPlate/sin(AN_SedPlate);
    Plant_Origin[1];
    Z_SedLamellaBottom - 2*ConRadius(ND_SedPlateFrame) + outerdiameter(ND_SedPlateFrame)/2 - Plant_Origin[2]
]
SedPipeFrameLayer := layer_new("SedPipeFrame", yellow)
PFPipeLong1 := PipeF([SedPipeFrame_Origin[0]; Plant_Origin[1] + B_SedPlateFrameVertical; SedPipeFrame_Origin[2]], SedPipeFrame_Origin[0] - Plant_Origin[0] + L_Sed, [0; 0]*deg, ND_SedPlateFrame, PS_Default)
PFPipeLong2 := PipeF([
    SedPipeFrame_Origin[0];
    Plant_Origin[1] + W_SedBay - B_SedPlateFrameVertical;
    SedPipeFrame_Origin[2]
], SedPipeFrame_Origin[0] - Plant_Origin[0] + L_Sed, [0; 0]*deg, ND_SedPlateFrame, PS_Default)
ArrayPFLong := array_all(N_SedBays, 1, W_SedBay)
PFPipePerpendicular := PipeF(SedPipeFrame_Origin, W_SedBay*N_SedBays, [270; 0]*deg, ND_SedPlateFrame, PS_Default)
ArrayPFPerp := ArrayLast(1, 3, -L_SedActive/2)
FreezePFLayer := FreezeLayer("SedPipeFrame")
PFStubLayer := layer_new("SedPipeFrameStub", yellow)
DrawPFStub := PipeF([
    SedPipeFrame_Origin[0];
    Plant_Origin[1] + B_SedPlateFrameVertical;
    SedPipeFrame_Origin[2] + outerradius(ND_SedPlateFrame)
], H_SedFrameStub, [0; 90]*deg, ND_SedFrameStub, 1)
ArrayPFStubRow := array_all(1, N_SedModules + 1, -B_SedFrameStub)
ArrayPFStubColumn := array_all(2, 1, W_SedBay - 2*B_SedPlateFrameVertical)
FreezePFStub := FreezeLayer("SedPipeFrameStub")
PFSLayer := layer_new("SedPipeFrameSupport", yellow)
DrawPFSFlange := CylinderF([
    SedPipeFrame_Origin[0];
    SedPipeFrame_Origin[1] + W_SedBay;
    SedPipeFrame_Origin[2] - outerdiameter(ND_SedPlateFrame)/2
], D_Flange/2, T_Flange, [0; 270]*deg)
DrawPFSPipe := CylinderF([
    SedPipeFrame_Origin[0];
    SedPipeFrame_Origin[1] + W_SedBay;
    SedPipeFrame_Origin[2] - outerdiameter(ND_SedPlateFrame)/2 - T_Flange
], outerradius(ND_SedPlateFrame), SedPipeFrame_Origin[2] - outerradius(ND_SedPlateFrame) - T_Flange - (((W_SedBay - W_SedSludge)/2 - 2*T_ConcreteMin)*tan(AN_SedSlope) + H_SedSludge + H_SedDrainCoverTotal), [0; 270]*deg)
ArrayPFS := array_all(1, 3, -L_SedActive/2)
FreezePFS := FreezeLayer("SedPipeFrameSupport")
SedPipeFrameScript :=
    stack(SedPipeFrameLayer, PFPipeLong1, PFPipeLong2, ArrayPFLong, PFPipePerpendicular, ArrayPFPerp, FreezePFLayer, PFStubLayer, DrawPFStub, ArrayPFStubRow, ArrayPFStubColumn, FreezePFStub, PFSLayer, DrawPFSFlange, DrawPFSPipe, ArrayPFS, FreezePFS) if N_SedBays > 1 and Z_SedLamellaBottom - (Plant_Origin[2] + H_SedSideSlopes + 2*ConRadius(ND_SedPlateFrame)) ≠ 0 m
    stack(SedPipeFrameLayer, PFPipeLong1, PFPipeLong2, ArrayPFLong, PFPipePerpendicular, ArrayPFPerp, FreezePFLayer, PFStubLayer, DrawPFStub, ArrayPFStubRow, ArrayPFStubColumn, FreezePFStub) otherwise
# Draw the sed lamella
SedLaminaLayer := layer_new("SedLamina", purple)
Lamina_Origin := [
    W_SedInletChannel + T_ChannelWall - (L_SedPlate*cos(AN_SedPlate) + Plant_Origin[0]) - L_Sed;
    Plant_Origin[1];
    Z_SedLamellaBottom + Plant_Origin[2]
]
DrawSedLamina := laminascript2(Lamina_Origin, W_SedBay, L_SedPlate, T_SedPlate, AN_SedPlate, N_SedModulePlates, N_SedModules, ND_SedModulePipe, ND_SedModulePipeSpace, (B_SedPlate - T_SedPlate)/tan(AN_SedPlate), S_SedModulePipes, L_SedModulePipe, N_SedPlateCol, B_SedPlate/tan(AN_SedPlate))
MirrorSedLamina := Mirror3dAll("yz", Lamina_Origin, "y")
# not arraying the lamina for now
ArraySedLamina := array_all(N_SedBays, 1, W_SedBay)
FreezeSedLam := FreezeLayer("SedLamina")
SedTankLaminaScript := stack(SedLaminaLayer, DrawSedLamina, MirrorSedLamina, viewtop1, FreezeSedLam)
# 1) Short Drain cover and orifices
# 2) Sludge drain
# 3) Lamella
# 4) Pipe Frame
# 5) Sed tank array
# 6) Inlet and exit channel weirs
# 7) Drain Pipes
AC_SedTank := stack(SedTankScript, SedChannelScript, SedManifoldScript, SedLaunderScript, SedHopperDrainScript, SedPipeFrameScript, SedTankLaminaScript)
# [component: inputs AC_SedTank]
