# Sedimentation Tank Drawing
# high flow scripts
# mid flow scripts
# Sedimentation Tank Concrete (excluding lamella support ledge)
# Side Slopes and Launder Support Ledge
SedTankLayer := layer_new("SedTankCon", grey)
SelectSedCon := SelectLayer("SedTankCon")
DrawSedTank := ChannelDrawing(Plant_Origin + [-L_Sed; W_SedBay + T_PlantWall; 0 m], [W_SedBay + 2*T_PlantWall; L_Sed; H_Sed], T_PlantWall, [270; 0; 0]*deg)
# Draw as a channel so that it can be arrayed. All side walls at end.
SedSlopePolyline := Pline3D([
    [Plant_Origin[0]; Plant_Origin[1] + W_SedBay; Plant_Origin[2]] + [0 m; T_ConcreteMin; 0 m];
    [Plant_Origin[0]; Plant_Origin[1] + W_SedBay; Plant_Origin[2]] + [Plant_Origin[0]; -W_SedBay/2 + W_SedSludge/2; 0 m];
    [Plant_Origin[0]; Plant_Origin[1] + W_SedBay; Plant_Origin[2]] + [0 m; -W_SedBay/2 + W_SedSludge/2; H_SedSludge];
    [Plant_Origin[0]; Plant_Origin[1] + W_SedBay; Plant_Origin[2]] + [0 m; -W_SedBay/2 + W_SedSludge/2 + T_SedDrainCoverLedge; H_SedSludge];
    [Plant_Origin[0]; Plant_Origin[1] + W_SedBay; Plant_Origin[2]] + [0 m; -W_SedBay/2 + W_SedSludge/2 + T_SedDrainCoverLedge; H_SedSludge + H_SedDrainCoverTotal];
    [Plant_Origin[0]; Plant_Origin[1] + W_SedBay - T_ConcreteMin; Plant_Origin[2]] + [0 m; 0 m; Z_SedSideSlopes - T_ConcreteMin*tan(AN_SedSlope)];
    [Plant_Origin[0]; Plant_Origin[1] + W_SedBay - T_ConcreteMin; Z_SedLamellaBottom];
    [Plant_Origin[0]; Plant_Origin[1] + W_SedBay; Plant_Origin[2]] + [0 m; T_ConcreteMin; Z_SedLamellaBottom];
    [Plant_Origin[0]; Plant_Origin[1] + W_SedBay; Plant_Origin[2]] + [0 m; T_ConcreteMin; 0 m]
])
ExtrudeSedSlopes := ExtrudeLast(-L_Sed)
MirrorSedSlopes := Mirror3dLast("zx", [Plant_Origin[0]; Plant_Origin[1] + W_SedBay - W_SedBay/2], "n")
SedLaunderLedge := BoxF([0; W_SedBay - 1/2*W_SedBay + ConRadius(ND_SedLaunder); Z_SedLaunder - ConRadius(ND_SedLaunder)] + Plant_Origin, [
    -2*SocketDepth(ND_SedLaunder);
    W_SedBay - 1/2*W_SedBay - ConRadius(ND_SedLaunder);
    Z_SedLaunder - ConRadius(ND_SedLaunder) - T_ConcreteMin
] + Plant_Origin, [0; 0; 0]*deg)
SedSlopeLedgeScript := stack(SedTankLayer, DrawSedTank, SedSlopePolyline, ExtrudeSedSlopes, MirrorSedSlopes, SedLaunderLedge)
# Inlet and Exit Channels
SedChannelVertBoxMid := BoxF([
    -L_Sed + W_SedInletChannel + W_SedExitChannel + T_SedWeir;
    W_SedBay + T_PlantWall;
    Z_SedExitChannelBottom
] + Plant_Origin, [-L_Sed + W_SedInletChannel + W_SedExitChannel + T_SedWeir + T_ChannelWall; -T_PlantWall; H_Sed] + Plant_Origin, [0; 0; 0]*deg)
SedChannelHorizBoxMid := BoxF([-L_Sed; W_SedBay + T_PlantWall; Z_SedExitChannelBottom] + Plant_Origin, [
    -L_Sed + W_SedExitChannel + T_SedWeir + W_SedInletChannel + T_ChannelWall;
    -T_PlantWall;
    Z_SedExitChannelBottom - T_ChannelWall
] + Plant_Origin, [0; 0; 0]*deg)
SedChannelScriptMid := stack(SedChannelVertBoxMid, SedChannelHorizBoxMid)
SedExitChannelHorizBoxHigh := BoxF([-L_Sed + W_SedInletChannelPreWeir; W_SedBay + T_PlantWall; Z_SedExitChannelBottom] + Plant_Origin, [
    -L_Sed + W_SedInletChannelPreWeir + T_SedWeir + W_SedExitChannel + T_ChannelWall;
    -T_PlantWall;
    Z_SedExitChannelBottom - T_ChannelWall
] + Plant_Origin, [0; 0; 0]*deg)
SedExitChannelVertBoxHigh := BoxF([
    -L_Sed + W_SedInletChannelPreWeir + T_SedWeir + W_SedExitChannel;
    W_SedBay + T_PlantWall;
    Z_SedExitChannelBottom
] + Plant_Origin, [
    -L_Sed + W_SedInletChannelPreWeir + T_SedWeir + W_SedExitChannel + T_ChannelWall;
    -T_PlantWall;
    H_Sed
] + Plant_Origin, [0; 0; 0]*deg)
SedInletChannelWallHigh := BoxF([-L_Sed + W_SedInletChannelPreWeir; W_SedBay + T_PlantWall; 0] + Plant_Origin, [-L_Sed + W_SedInletChannelPreWeir + T_ChannelWall; -T_PlantWall; H_Sed - H_SedExitChannel] + Plant_Origin, [0; 0; 0]*deg)
SedInletChannelPostHorizBoxHigh := BoxF([-L_Sed - T_ChannelWall; W_SedBay + T_PlantWall; Z_SedExitChannelBottom] + Plant_Origin, [
    -L_Sed - W_SedInletChannelPostWeir - T_SedWeir - T_ChannelWall;
    -T_PlantWall;
    Z_SedExitChannelBottom - T_ChannelWall
] + Plant_Origin, [0; 0; 0]*deg)
SedInletChannelPostVertBoxHigh := BoxF([
    -L_Sed - W_SedInletChannelPostWeir - T_SedWeir - T_ChannelWall;
    W_SedBay + T_PlantWall;
    Z_SedExitChannelBottom
] + Plant_Origin, [-L_Sed - W_SedInletChannelPostWeir - T_SedWeir; -T_PlantWall; H_Sed] + Plant_Origin, [0; 0; 0]*deg)
SedChannelScriptHigh := stack(SedExitChannelHorizBoxHigh, SedExitChannelVertBoxHigh, SedInletChannelWallHigh, SedInletChannelPostHorizBoxHigh, SedInletChannelPostVertBoxHigh)
SedChannelScript :=
    SedChannelScriptMid if EN_InletChannelGeom ≠ Cantilever
    SedChannelScriptHigh otherwise
# Floc Hopper Front and Back Slopes
SedHopperPeakMid := [
    [Plant_Origin[0] - L_Sed; Plant_Origin[1]; Plant_Origin[2]];
    [Plant_Origin[0] - L_Sed + L_SedHopper; Plant_Origin[1]; Plant_Origin[2]];
    [Plant_Origin[0] - L_Sed + L_SedHopper; Plant_Origin[1]; Z_SedManifoldPipe];
    [Plant_Origin[0] - L_Sed + L_SedHopper - T_ConcreteMin; Plant_Origin[1]; Z_SedManifoldPipe];
    [X_SedHopperBottom; Plant_Origin[1]; Z_SedHopperIntersect];
    [Plant_Origin[0] - L_Sed; Plant_Origin[1]; Z_SedHopperBackSlope];
    [Plant_Origin[0] - L_Sed; Plant_Origin[1]; Plant_Origin[2]]
]
SedHopperFlatMid := [
    [Plant_Origin[0] - L_Sed; Plant_Origin[1]; Plant_Origin[2]];
    [Plant_Origin[0] - L_Sed + L_SedHopper; Plant_Origin[1]; Plant_Origin[2]];
    [Plant_Origin[0] - L_Sed + L_SedHopper; Plant_Origin[1]; Z_SedManifoldPipe];
    [Plant_Origin[0] - L_Sed + L_SedHopper - T_ConcreteMin; Plant_Origin[1]; Z_SedManifoldPipe];
    [Plant_Origin[0] - L_Sed + L_SedHopper - T_ConcreteMin; Plant_Origin[1]; Z_SedHopperFrontSlope];
    [Plant_Origin[0] - L_Sed + L_SedHopperBackSlope; Plant_Origin[1]; Z_SedHopperIntersect];
    [Plant_Origin[0] - L_Sed; Plant_Origin[1]; Z_SedHopperBackSlope];
    [Plant_Origin[0] - L_Sed; Plant_Origin[1]; Plant_Origin[2]]
] = [
    [-9.70578; 0; 0]; [-8.44232; 0; 0]; [-8.44232; 0; 0.470552]; [-8.49232; 0; 0.470552]; [-8.49232; 0; 0.17057]; [-8.91335; 0; 0.17057]; [-9.70578; 0; 0.963]; [-9.70578; 0; 0]
] m
SedHopperPeakHigh :=
    for i ∈ 0 .. last(SedHopperPeakMid)
        Pline[i] ← SedHopperPeakMid[i] + [0; 0; W_SedInletChannelPreWeir + T_ChannelWall]
    Pline
SedHopperFlatHigh :=
    for i ∈ 0 .. last(SedHopperFlatMid)
        Pline[i] ← SedHopperFlatMid[i] + [0; 0; W_SedInletChannelPreWeir + T_ChannelWall]
    Pline
SedHopperFlat :=
    SedHopperFlatMid if EN_InletChannelGeom ≠ Cantilever
    SedHopperFlatHigh otherwise
SedHopperPeak :=
    SedHopperPeakMid if EN_InletChannelGeom ≠ Cantilever
    SedHopperPeakHigh otherwise
SedHopperPlineMatrix :=
    SedHopperFlat if L_SedHopperFrontSlopeMax + L_SedHopperBackSlope < L_SedHopper - T_ConcreteMin
    SedHopperPeak otherwise
SedHopperPline := Pline3D(SedHopperPlineMatrix)
ExtrudeSedHopper := ExtrudeLast(W_SedBay)
SedHopperScript := stack(SedHopperPline, ExtrudeSedHopper)
# Manifold Ledge
SedManifoldLedge := BoxF([
    Plant_Origin[0];
    Plant_Origin[1] + W_SedBay/2 - ConRadius(ND_SedManifold);
    Z_SedManifoldPipe - ConRadius(ND_SedManifold)
], [
    Plant_Origin[0] - SocketDepth(ND_SedManifold) - CapThickness(ND_SedManifold);
    Plant_Origin[1] + W_SedBay/2 + ConRadius(ND_SedManifold);
    Z_SedManifoldPipe - ConRadius(ND_SedManifold) - T_ConcreteMin
], [0; 0; 0]*deg)
FreezeSedTank := FreezeLayer("SedTankCon")
SedConScript := stack(SedSlopeLedgeScript, SedChannelScript, SedHopperScript, SedManifoldLedge, FreezeSedTank)
# Sludge Drain Cover
SedDrainCoverLayer := layer_new("SedDrainCoverCon", ltgrey)
SedDrainCoverPline := Pline3D([
    [
        Plant_Origin[0];
        Plant_Origin[1] + W_SedBay - (W_SedBay + W_SedDrainCover)/2;
        Plant_Origin[2] + H_SedSludge
    ];
    [
        Plant_Origin[0];
        Plant_Origin[1] + W_SedBay - (W_SedBay + W_SedDrainCover)/2;
        Plant_Origin[2] + H_SedSludge + H_SedDrainCoverTotal
    ];
    [
        Plant_Origin[0];
        Plant_Origin[1] + W_SedBay - W_SedBay/2 - outerradius(ND_SedJetReverser);
        T_ConcreteMin + outerradius(ND_SedJetReverser) + H_SedSludge
    ];
    [
        Plant_Origin[0];
        Plant_Origin[1] + W_SedBay - W_SedBay/2 + outerradius(ND_SedJetReverser);
        T_ConcreteMin + outerradius(ND_SedJetReverser) + H_SedSludge
    ];
    [
        Plant_Origin[0];
        Plant_Origin[1] + W_SedBay - (W_SedBay - W_SedDrainCover)/2;
        Plant_Origin[2] + H_SedSludge + H_SedDrainCoverTotal
    ];
    [
        Plant_Origin[0];
        Plant_Origin[1] + W_SedBay - (W_SedBay - W_SedDrainCover)/2;
        Plant_Origin[2] + H_SedSludge
    ];
    [
        Plant_Origin[0];
        Plant_Origin[1] + W_SedBay - (W_SedBay + W_SedDrainCover)/2;
        Plant_Origin[2] + H_SedSludge
    ]
])
ExtrudeSedDrainCover := ExtrudeLast(-L_SedDrainCoverSegment)
SedDrainCoverBox := BoxF(Plant_Origin + [0; W_SedBay - (W_SedBay + W_SedDrainCover)/2; H_SedSludge], Plant_Origin + [0; W_SedBay - (W_SedBay + W_SedDrainCover)/2; H_SedSludge] + [-L_SedDrainCoverSegment; W_SedDrainCover; H_SedDrainCoverTotal], [0; 0; 0]*deg)
FreezeSedDrainCover := FreezeLayer("SedDrainCoverCon")
SedJetRedirect := CylinderF([0 m; W_SedBay - W_SedBay/2; H_SedSludge + T_ConcreteMin + outerradius(ND_SedJetReverser)] + Plant_Origin, outerradius(ND_SedJetReverser), L_SedDrainCoverSegment + zc, [0; 0]*deg)
N_SedDrainCoverSegmentOrifices
SedDrainCoverOrifices := CylinderF([-B_SedSludgeOrifices/2; W_SedBay - W_SedBay/2; H_SedSludge + H_SedDrainCoverTotal + zc] + Plant_Origin, D_SedSludgeOrifice/2, H_SedDrainCoverTotal + 2*zc, [0; 270]*deg)
ArraySedDrainOrifices := ArrayLast(1, N_SedDrainCoverSegmentOrifices, -B_SedSludgeOrifices)
GroupSedDrainCuts := GroupAll("DeleteMe")
SubtractSedDrainCuts := SubtractF(["SedDrainCoverCon"], "DeleteMe")
ThawSedDrainCover := SelectLayer("SedDrainCoverCon")
ArraySedDrainCover := ArrayLast(1, N_SedDrainCover, -L_SedDrainCoverSegment - S_SedDrainCoverSegment)
SedDrainCoverScript :=
    stack(SedDrainCoverLayer, SedDrainCoverBox, FreezeSedDrainCover, SedJetRedirect, SedDrainCoverOrifices, ArraySedDrainOrifices, GroupSedDrainCuts, SubtractSedDrainCuts, ThawSedDrainCover, ArraySedDrainCover, FreezeSedDrainCover) if W_SedDrainCover == outerdiameter(ND_SedJetReverser)
    stack(SedDrainCoverLayer, SedDrainCoverPline, ExtrudeSedDrainCover, FreezeSedDrainCover, SedJetRedirect, SedDrainCoverOrifices, ArraySedDrainOrifices, GroupSedDrainCuts, SubtractSedDrainCuts, ThawSedDrainCover, ArraySedDrainCover, FreezeSedDrainCover) otherwise
# Inlet Manifold
# Origins and Dimensions
SedManPipeHigh_Origin := [Plant_Origin[0] - CapThickness(ND_SedManifold); Plant_Origin[1] + W_SedBay/2; Z_SedManifoldPipe]
SedManPipeMid_Origin := [
    {
        0 if EN_InletChannelGeom == Cantilever
        (X_SedManPipeAngledBottom + ElbowRadius(ND_SedManifold)/sqrt(2)) otherwise
    };
    Plant_Origin[1] + W_SedBay/2;
    Z_SedManifoldPipe
]
SedManHorizCouplingHigh_Origin := SedManPipeHigh_Origin + [-L_SedManifoldPipe; 0; 0]
X_SedManStub := Plant_Origin[0] - L_Sed + W_SedInletChannelPreWeir - S_Fitting - ConRadius(ND_SedManifold)
SedManElbow2Mid_Origin := SedManPipeMid_Origin
SedManNippleHigh_Origin := [-CouplingLength(ND_SedManifold) + 2*SocketDepth(ND_SedManifold); 0; 0] + SedManHorizCouplingHigh_Origin
SedMan45PipeMid_Origin := [
    {
        0 if EN_InletChannelGeom == Cantilever
        X_SedManPipeAngledBottom otherwise
    };
    SedManPipeMid_Origin[1];
    Z_SedManPipeAngledBottom
]
SedManElbowHigh_Origin := [
    Plant_Origin[0] - L_Sed + W_SedInletChannelPreWeir - SocketDepth(ND_SedManifold);
    Plant_Origin[1] + W_SedBay/2;
    Z_SedManifoldPipe
]
L_SedManNipple := max(2*SocketDepth(ND_SedManifold), SedManHorizCouplingHigh_Origin[0] - SedManNippleHigh_Origin[0])
SedManCapMid_Origin := SedManPipeMid_Origin + [L_SedManifoldPipe; 0 m; 0 m]
SedManVertCouplingMid_Origin := [
    Plant_Origin[0] - L_Sed + W_SedInletChannelPreWeir - S_Fitting - ConRadius(ND_SedManifold);
    Plant_Origin[1] + W_SedBay/2;
    Z_SedInletChannelBottom - SocketDepth(ND_SedManifold)
]
SedManVertPipeMid_Origin := [0 m; 0 m; -CouplingLength(ND_SedManifold) + 2*SocketDepth(ND_SedManifold)] + SedManVertCouplingMid_Origin
SedManElbow1Mid_Origin := [
    SedManVertPipeMid_Origin[0];
    SedManVertPipeMid_Origin[1];
    {
        0 if EN_InletChannelGeom == Cantilever
        Z_SedManElbow1 otherwise
    }
]
# Manifold Pipes
SedPipeLayer := layer_new("SedPipePlu", blue)
SelectSedPipes := SelectLayer("SedPipePlu")
SedPipeFrz := FreezeLayer("SedPipePlu")
SedRemovableLayer := layer_new("SedRemovablePlu", red)
SelectSedRemovables := SelectLayer("SedRemovablePlu")
SedRemovableFrz := FreezeLayer("SedRemovablePlu")
SedMan45PipeMid := PipeF(SedMan45PipeMid_Origin, {
    0 if EN_InletChannelGeom == Cantilever
    L_SedMan45Pipe otherwise
}, [0; 45; 0]*deg, ND_SedManifold, PS_Default)
SedManPipeMid := PipeSUBF(SedManPipeMid_Origin, L_SedManifoldPipe, [0; 180]*deg, ND_SedManifold, PS_Default, ["SedTankCon"])
SedManVertPipeMid := PipeSUBF(SedManVertPipeMid_Origin, SedManVertPipeMid_Origin[2] - SedManElbow1Mid_Origin[2], [0; 270]*deg, ND_SedManifold, PS_Default, ["SedTankCon"])
SedManStopperMid := PipeF([X_SedManStub; Plant_Origin[1] + W_SedBay/2; Z_SedInletChannelBottom - SocketDepth(ND_SedManifold)], H_SedInletChannel + SocketDepth(ND_SedManifold), [0; 90]*deg, ND_SedManifold, PS_Default)
SedManPipeMidScript :=
    stack(SedPipeLayer, SedMan45PipeMid, SedManPipeMid, SedPipeFrz, SedRemovableLayer, SedManStopperMid, SedRemovableFrz) if EN_SedChannelCoupling == 0
    stack(SedPipeLayer, SedMan45PipeMid, SedManPipeMid, SedManVertPipeMid, SedPipeFrz, SedRemovableLayer, SedManStopperMid, SedRemovableFrz) otherwise
SedManPipeHigh := PipeF(SedManPipeHigh_Origin, L_SedManifoldPipe, [0; 45; 0]*deg, ND_SedManifold, PS_Default)
SedManNippleHigh := PipeF(SedManPipeHigh_Origin, L_SedManifoldPipe, [0; 45; 0]*deg, ND_SedManifold, PS_Default)
SedManPipeHighScript := stack(SedPipeLayer, SedManPipeHigh, SedManNippleHigh, SedPipeFrz)
SedManPipeScript :=
    SedManPipeMidScript if EN_InletChannelGeom ≠ Cantilever
    SedManPipeHighScript otherwise
# Manifold Fittings
SedFittingLayer := layer_new("SedFittingPlu", green)
SelectSedFittings := SelectLayer("SedFittingPlu")
SedFittingFrz := FreezeLayer("SedFittingPlu")
SedManElbow2Mid := Elbow45F(SedManElbow2Mid_Origin, [90; 0; 270]*deg, ND_SedManifold, PS_Default)
SedManCapMid := CapF(SedManCapMid_Origin, [0; 0; 0]*deg, ND_SedManifold)
SedManVertCouplingMid := CouplingSUBF(SedManVertCouplingMid_Origin, [0; 270]*deg, ND_SedManifold, PS_Default, ["SedTankCon"])
SedManElbow1Mid := Elbow45SUBF(SedManElbow1Mid_Origin, [180; 0; 90]*deg, ND_SedManifold, PS_Default, ["SedTankCon"])
SedManFittingScriptMid :=
    stack(SedFittingLayer, SedManElbow2Mid, SedManCapMid, SedManElbow1Mid, SedManVertCouplingMid, SedFittingFrz) if EN_SedChannelCoupling == 1
    stack(SedFittingLayer, SedManElbow2Mid, SedManCapMid, SedManElbow1Mid, SedFittingFrz) otherwise
SedManElbowHigh := ElbowF(SedManElbowHigh_Origin, [90; 0; 270]*deg, ND_SedManifold, PS_Default)
SedManCapHigh := CapF(SedManPipeHigh_Origin, [0; 0; 0]*deg, ND_SedManifold)
SedManCouplingHigh := CouplingSUBF(SedManHorizCouplingHigh_Origin, [0; 270]*deg, ND_SedManifold, PS_Default, ["SedTankCon"])
SedManFittingScriptHigh := stack(SedFittingLayer, SedManElbowHigh, SedManCapHigh, SedManCouplingHigh, SedFittingFrz)
SedManFittingScript :=
    SedManFittingScriptMid if EN_InletChannelGeom ≠ Cantilever
    SedManFittingScriptHigh otherwise
# Manifold Orifices
SedManOrifice := CylinderF([
    Plant_Origin[0] - L_Sed + L_SedHopper + (W_SedInletChannelPreWeir + T_ChannelWall)*(EN_InletChannelGeom == Cantilever) + L_SedDiffuserOutlet/2 + T_SedDiffuserWall;
    SedManPipeHigh_Origin[1];
    Z_SedManifoldPipe
], D_SedManifoldPort/2, ND_SedManifold, [0; 270]*deg)
ArraySedManOrifice := array_all(1, N_SedManifoldPorts, B_SedManifoldPort)
SubtractFromSedPipes := SubtractF(["SedPipePlu"], "DeleteMe")
SubtractFromSedFittings := SubtractF(["SedFittingPlu"], "DeleteMe")
SedManOrificeScript := stack(SedManOrifice, ArraySedManOrifice, GroupDelete, SubtractFromSedPipes, SedManOrifice, ArraySedManOrifice, GroupDelete, SubtractFromSedFittings)
SedManifoldScript := stack(SedManPipeScript, SedManFittingScript, SedManOrificeScript)
# Exit Launder
# Origins and Dimensions
SedLaunderPipe_Origin :=
    if T_ChannelWall > CouplingLength(ND_SedLaunder)
        [
            Plant_Origin[0] - L_SedChannelToWall + max(0 m, 2*CouplingLength(ND_SedLaunder) - T_ChannelWall) - SocketDepth(ND_SedLaunder);
            Plant_Origin[1] + W_SedBay/2;
            Z_SedLaunder
        ]
    otherwise
        [
            Plant_Origin[0] - L_SedChannelToWall - T_ChannelWall + CouplingLength(ND_SedLaunder) - SocketDepth(ND_SedLaunder);
            Plant_Origin[1] + W_SedBay/2;
            Z_SedLaunder
        ]
SedLaunderCap_Origin := SedLaunderPipe_Origin + [L_SedLaunder; 0 m; 0 m]
SedLaunderCoupling1_Origin := [
    Plant_Origin[0] - L_Sed + W_SedExitChannel + W_SedInletChannel + T_SedWeir + SocketDepth(ND_SedLaunder);
    Plant_Origin[1] + W_SedBay/2;
    Z_SedLaunder
]
SedLaunderCoupling2_Origin := [
    Plant_Origin[0] - L_SedChannelToWall + max(0 m, 2*CouplingLength(ND_SedLaunder) - T_ChannelWall) - SocketDepth(ND_SedLaunder);
    Plant_Origin[1] + W_SedBay/2;
    Z_SedLaunder
]
SedLaunderNipple_Origin := SedLaunderCoupling1_Origin + [CouplingLength(ND_SedLaunder) - 2*SocketDepth(ND_SedLaunder); 0 m; 0 m]
# Launder Fittings
SedLaunderEndCap := CapF(SedLaunderCap_Origin, [0; 0]*deg, ND_SedLaunder)
SedLaunderPlugCap := CapF([
    Plant_Origin[0] - L_SedChannelToWall - T_ChannelWall - CapHeight(ND_SedLaunder) + CapThickness(ND_SedLaunder);
    Plant_Origin[1] + W_SedBay/2;
    Z_SedLaunder
], [180; 0]*deg, ND_SedLaunder)
SedLaunderCoupling1 := CouplingSUBF(SedLaunderCoupling1_Origin, [0; 180]*deg, ND_SedLaunder, PS_Default, ["SedTankCon"])
SedLaunderCoupling2 := CouplingSUBF(SedLaunderCoupling2_Origin, [0; 0]*deg, ND_SedLaunder, PS_Default, ["SedTankCon"])
SedLaunderFittingScript :=
    stack(SelectSedFittings, SedLaunderEndCap, SedLaunderCoupling1, SedFittingFrz, SelectSedRemovables, SedLaunderPlugCap, SedRemovableFrz) if CouplingLength(ND_SedLaunder) ≥ T_ChannelWall
    stack(SelectSedFittings, SedLaunderEndCap, SedLaunderCoupling1, SedLaunderCoupling2, SedFittingFrz, SelectSedRemovables, SedLaunderPlugCap, SedRemovableFrz) otherwise
# Launder Pipes
SedLaunderPipe := PipeF(SedLaunderPipe_Origin, L_SedLaunder, [0; 180]*deg, ND_SedLaunder, PS_Default)
SedLaunderPlugNipple := PipeF([
    Plant_Origin[0] - L_SedChannelToWall - T_ChannelWall + L_SedLaunderCapExcess;
    Plant_Origin[1] + W_SedBay/2;
    Z_SedLaunder
], CapHeight(ND_SedLaunder) - CapThickness(ND_SedLaunder) + L_SedLaunderCapExcess, [0; 0]*deg, ND_SedLaunder, PS_Default)
SedLaunderNipple := PipeSUBF(SedLaunderNipple_Origin, T_ChannelWall - 2*CouplingLength(ND_SedLaunder) + 2*SocketDepth(ND_SedLaunder), [0; 180]*deg, ND_SedLaunder, PS_Default, ["SedTankCon"])
SedLaunderPipeScript :=
    stack(SelectSedPipes, SedLaunderPipe, SedPipeFrz, SelectSedRemovables, SedLaunderPlugNipple, SedRemovableFrz) if CouplingLength(ND_SedLaunder) ≥ T_ChannelWall
    stack(SelectSedPipes, SedLaunderPipe, SedLaunderNipple, SedPipeFrz, SelectSedRemovables, SedLaunderPlugNipple, SedRemovableFrz) otherwise
# Launder Orifices
SedLaunderOrifice := CylinderF([SocketDepth(ND_SedLaunder) + 1/2*B_SedLaunderOrifices; 0 m; 0 m] + SedLaunderPipe_Origin, D_SedLaunderOrifice/2, ND_SedLaunder, [0; 90]*deg)
ArraySedLaunderOrifices := array_all(1, N_SedLaunderOrifices, B_SedLaunderOrifices)
SedLaunderOrificeScript := stack(SedLaunderOrifice, ArraySedLaunderOrifices, GroupDelete, SubtractFromSedPipes, SedLaunderOrifice, ArraySedLaunderOrifices, GroupDelete, SubtractFromSedFittings)
SedLaunderScript := stack(SedLaunderFittingScript, SedLaunderPipeScript, SedLaunderOrificeScript)
# Floc Hopper Drain
# Origins
SedHopperDrainAdapter1_Origin := Plant_Origin + [
    -L_Sed - T_PlantWall - SocketDepth(ND_SedHopperDrain);
    W_SedBay/2;
    Z_SedHopperIntersect + outerradius(ND_SedHopperDrain)
]
SedHopperDrainValve_Origin := SedHopperDrainAdapter1_Origin + [
    -MaleAdapterLength(ND_SedHopperDrain) + ValveSocket(ND_SedHopperDrain) + SocketDepth(ND_SedHopperDrain);
    0 m;
    0 m
]
SedHopperDrainAdapter2_Origin := SedHopperDrainValve_Origin + [
    ValveSocket(ND_SedHopperDrain) - ValveLength(ND_SedHopperDrain) + SocketDepth(ND_SedHopperDrain) - MaleAdapterLength(ND_SedHopperDrain);
    0 m;
    0 m
]
SedHopperDrainElbow_Origin := SedHopperDrainAdapter2_Origin + [-2*SocketDepth(ND_SedHopperDrain); 0 m; 0 m]
SedHopperDrainCoupling_Origin := SedHopperDrainAdapter1_Origin + [CouplingLength(ND_SedHopperDrain); 0 m; 0 m]
SedHopperDrainPipe_Origin := [
    X_SedHopperBottom;
    SedHopperDrainCoupling_Origin[1];
    Z_SedHopperIntersect + outerradius(ND_SedHopperDrain)
]
# Hopper Drain Pipes
SedHopperDrainNipple1 := PipeF(SedHopperDrainAdapter1_Origin + [2*SocketDepth(ND_SedHopperDrain); 0; 0], 2*SocketDepth(ND_SedHopperDrain), [0; 0]*deg, ND_SedHopperDrain, PS_Default)
SedHopperDrainNipple2 := PipeF(SedHopperDrainAdapter2_Origin, 2*SocketDepth(ND_SedHopperDrain), [0; 0]*deg, ND_SedHopperDrain, PS_Default)
L_SedHopperDrainPipe := X_SedHopperBottom - (Plant_Origin[0] - L_Sed - T_PlantWall + CouplingLength(ND_SedHopperDrain) - SocketDepth(ND_SedHopperDrain))
SedHopperDrainPipe := PipeSUBF(SedHopperDrainPipe_Origin, L_SedHopperDrainPipe, [0; 0]*deg, ND_SedHopperDrain, PS_Default, ["SedTankCon"])
SedHopperDrainPipeWedge := WedgeF([0; outerradius(ND_SedHopperDrain); outerradius(ND_SedHopperDrain)] + SedHopperDrainPipe_Origin, [
    -2*outerradius(ND_SedHopperDrain)/tan(AN_SedHopperSlope);
    -outerradius(ND_SedHopperDrain);
    -outerradius(ND_SedHopperDrain)
] + SedHopperDrainPipe_Origin, [0; 0; 0])
SubtractSedHopperDrainPipeWedge := SubtractF(["SedPipePlu"], "DeleteMe")
SedHopperDrainPipeScript := stack(SelectSedPipes, SedHopperDrainNipple1, SedHopperDrainNipple2, SedHopperDrainPipe, SedPipeFrz, SedHopperDrainPipeWedge, GroupDelete, SubtractSedHopperDrainPipeWedge)
# Hopper Drain Fittings
SedValveLayer := layer_new("SedValvePlu", blue3)
SelectSedValves := SelectLayer("SedValvePlu")
SedValveFrz := FreezeLayer("SedValvePlu")
SedAdapterLayer := layer_new("SedAdapterPlu", blue2)
SelectSedAdapters := SelectLayer("SedAdapterPlu")
SedAdapterFrz := FreezeLayer("SedAdapterPlu")
SedHopperDrainCoupling := CouplingSUBF(SedHopperDrainCoupling_Origin, [0; 0]*deg, ND_SedHopperDrain, PS_Default, ["SedTankCon"])
SedHopperDrainElbow := ElbowF(SedHopperDrainElbow_Origin, [90; 0; 45]*deg, ND_SedHopperDrain, PS_Default)
SedHopperDrainAdapter1 := MaleAdapterF(SedHopperDrainAdapter1_Origin, [0; 0]*deg, ND_SedHopperDrain, PS_Default)
SedHopperDrainAdapter2 := MaleAdapterF(SedHopperDrainAdapter2_Origin, [180; 0]*deg, ND_SedHopperDrain, PS_Default)
SedHopperDrainValve := insertdwg("https://confluence.cornell.edu/download/attachments/173604905/Sed-Scaled-Gate-Valve-Threaded.dwg", SedHopperDrainValve_Origin, 2*outerradius(ND_SedHopperDrain)/(1.16 m), 2*outerradius(ND_SedHopperDrain)/(1.16 m), 0 deg)
SedHopperDrainFittingScript := stack(SelectSedFittings, SedHopperDrainCoupling, SedFittingFrz, SedValveLayer, SedHopperDrainValve, SedValveFrz, SedAdapterLayer, SedHopperDrainAdapter1, SedHopperDrainAdapter2, SedAdapterFrz, SelectSedFittings, SedHopperDrainElbow, SedFittingFrz)
SedHopperDrainScript := stack(SedHopperDrainPipeScript, SedHopperDrainFittingScript)
# Sludge Drain Plumbing
# Origins and Dimensions
SedSludgeDrainCoupling_Origin := [
    CouplingLength(ND_SedSludgePipe) - SocketDepth(ND_SedSludgePipe) - T_PlantWall - L_Sed;
    W_SedBay/2;
    H_SedSludge - outerradius(ND_SedSludgePipe)
] + Plant_Origin
SedSludgeDrainPipe_Origin := Plant_Origin + [-L_Sed + L_SedHopper + T_ConcreteMin; W_SedBay/2; H_SedSludge - outerradius(ND_SedSludgePipe)]
# the ten centimeters to ensure you can wrap your hand between two valves
L_SedSludgeValvePipe := -(SedHopperDrainElbow_Origin[0] - ElbowRadius(ND_SedHopperDrain) - ConRadius(ND_SedHopperDrain)) + (Plant_Origin[0] - L_Sed - T_PlantWall) + 10 cm
L_SedSludgeEmbeddedPipe := L_SedHopper + T_SedWeir + T_PlantWall - CouplingLength(ND_SedSludgePipe) + SocketDepth(ND_SedSludgePipe)
SedSludgeDrainAdapter1_Origin := Plant_Origin + [
    -L_Sed - T_PlantWall + SocketDepth(ND_SedSludgePipe) - L_SedSludgeValvePipe;
    W_SedBay/2;
    H_SedSludge - outerradius(ND_SedSludgePipe)
]
SedSludgeDrainValve_Origin := SedSludgeDrainAdapter1_Origin + [
    -MaleAdapterLength(ND_SedSludgePipe) + SocketDepth(ND_SedSludgePipe) + ValveSocket(ND_SedSludgePipe);
    0 m;
    0 m
]
# Sludge Drain Pipes
SedSludgeValvePipe := PipeF(SedSludgeDrainAdapter1_Origin + [L_SedSludgeValvePipe; 0; 0], L_SedSludgeValvePipe, [0; 0]*deg, ND_SedSludgePipe, PS_Default)
SedSludgePipe := PipeSUBF(SedSludgeDrainPipe_Origin, L_SedSludgeEmbeddedPipe, [0; 0]*deg, ND_SedSludgePipe, PS_Default, ["SedTankCon"])
SedSludgeDrainPipeScript := stack(SelectSedPipes, SedSludgePipe, SedSludgeValvePipe, SedPipeFrz)
# Sludge Drain Fittings
SedSludgeDrainAdapter1 := MaleAdapterF(SedSludgeDrainAdapter1_Origin, [0; 0]*deg, ND_SedSludgePipe, PS_Default)
SedSludgeDrainValve := insertdwg("https://confluence.cornell.edu/download/attachments/173604905/Sed-Scaled-Gate-Valve-Threaded.dwg", SedSludgeDrainValve_Origin, 2*outerradius(ND_SedSludgePipe)/(1.16 m), 2*outerradius(ND_SedSludgePipe)/(1.16 m), 0 deg)
SedSludgeCoupling := CouplingSUBF(SedSludgeDrainCoupling_Origin, [0; 0]*deg, ND_SedSludgePipe, PS_Default, ["SedTankCon"])
SedSludgeDrainFittingScript := stack(SelectSedAdapters, SedSludgeDrainAdapter1, SedAdapterFrz, SelectSedValves, SedSludgeDrainValve, SedValveFrz, SelectSedFittings, SedSludgeCoupling, SedFittingFrz)
SedSludgeDrainScript := stack(SedSludgeDrainPipeScript, SedSludgeDrainFittingScript)
# Lamella
# Origins and Dimensions
Lamina_Origin := [
    Plant_Origin[0] - cos(AN_SedPlate)*L_SedPlate;
    Plant_Origin[1];
    Z_SedLamellaBottom + Plant_Origin[2]
]
SedModCap_Origin := Lamina_Origin + [
    ConRadius(ND_SedModulePipe)*cos(AN_SedPlate) + sin(AN_SedPlate)*(CapHeight(ND_SedModulePipe) - ConRadius(ND_SedModulePipe) + outerradius(ND_SedModulePipe));
    S_Fitting + ConRadius(ND_SedModulePipe);
    ConRadius(ND_SedModulePipe)*sin(AN_SedPlate) - cos(AN_SedPlate)*(CapHeight(ND_SedModulePipe) - ConRadius(ND_SedModulePipe) + outerradius(ND_SedModulePipe))
]
SedModMirrorLineX := SedModCap_Origin[0] - (CapHeight(ND_SedModulePipe) - CapThickness(ND_SedModulePipe))*sin(AN_SedPlate) + (L_SedPlate - B_SedPlate*(N_SedModulePlates - 1)/tan(AN_SedPlate) - 2*(SedModCap_Origin[2] + (CapHeight(ND_SedModulePipe) - CapThickness(ND_SedModulePipe))*cos(AN_SedPlate) - Lamina_Origin[2])/sin(AN_SedPlate))*cos(AN_SedPlate)/2
SedModMirrorLineZ := SedModCap_Origin[2] + (CapHeight(ND_SedModulePipe) - CapThickness(ND_SedModulePipe))*cos(AN_SedPlate) + (L_SedPlate - B_SedPlate*(N_SedModulePlates - 1)/tan(AN_SedPlate) - 2*(SedModCap_Origin[2] + (CapHeight(ND_SedModulePipe) - CapThickness(ND_SedModulePipe))*cos(AN_SedPlate) - Lamina_Origin[2])/sin(AN_SedPlate))*sin(AN_SedPlate)/2
# Lamella
SedLaminaLayer := layer_new("SedModLamella", purple)
MakeSedLamina := BoxF(Lamina_Origin, Lamina_Origin + [-T_SedPlate; W_SedBay; L_SedPlate], [0; 90 deg - AN_SedPlate; 0])
ArraySedLamina := ArrayLast(1, N_SedModulePlates, -B_SedPlate/sin(AN_SedPlate))
SedLaminaFrz := FreezeLayer("SedModLamella")
SedLaminaScript := stack(SedLaminaLayer, MakeSedLamina, ArraySedLamina, SedLaminaFrz)
# Module Connector Caps
SedModCapLayer := layer_new("SedModCapPlu", red)
SedModCapRight := CapF(SedModCap_Origin, [0; 0; 0], ND_SedModulePipe)
SedModCapLeft := CapF(SedModCap_Origin - [
    B_SedPlate*(N_SedModulePlates - 1) + T_SedPlate + 2*(CapHeight(ND_SedModulePipe) - ConRadius(ND_SedModulePipe) + outerradius(ND_SedModulePipe));
    0 m;
    0 m
], [0; 180 deg; 0], ND_SedModulePipe)
SedModCapFrz := FreezeLayer("SedModCapPlu")
SedModCapScript := stack(SedModCapLayer, SedModCapRight, SedModCapLeft, SedModCapFrz)
# Module Connector Pipes and Spacers
SedModPipeLayer := layer_new("SedModPipePlu", blue3)
SedModPipe := PipeF(SedModCap_Origin, B_SedPlate*(N_SedModulePlates - 1) + T_SedPlate + 2*(CapHeight(ND_SedModulePipe) - ConRadius(ND_SedModulePipe) + outerradius(ND_SedModulePipe)), [0; 0; 0], ND_SedModulePipe, PS_Modules)
SedModPipeFrz := FreezeLayer("SedModPipePlu")
SedModSpacerLayer := layer_new("SedModSpacerPlu", blue)
SedModSpacers := PipeF(SedModCap_Origin - [CapHeight(ND_SedModulePipe) + T_SedPlate - CapThickness(ND_SedModulePipe); 0; 0], B_SedPlate - T_SedPlate, [0; 0; 0], ND_SedModulePipeSpacer, PS_Modules)
ArraySedModSpacers := ArrayLast(1, N_SedModulePlates - 1, -B_SedPlate)
SedModSpacerFrz := FreezeLayer("SedModSpacerPlu")
SedModPipeScript := stack(SedModPipeLayer, SedModPipe, SedModPipeFrz, SedModSpacerLayer, SedModSpacers, ArraySedModSpacers, SedModSpacerFrz)
# Rotate and Array Connectors and Array Modules
ThawSedModPiping := ThawMultiple(["SedMod*Plu"])
RotateSedModPiping := Rotate_All([SedModCap_Origin[0]; SedModCap_Origin[2]; SedModCap_Origin[1]], AN_SedPlate - 90 deg)
MirrorSedModPipingUp := MirrorAll([SedModMirrorLineX; SedModMirrorLineZ], [SedModMirrorLineX; SedModMirrorLineZ] + [zc; -zc/tan(AN_SedPlate)], "n")
TripleSedModPiping := array_all(3, 1, (W_SedPlate - 2*(S_Fitting + ConRadius(ND_SedModulePipe)))/2)
ThawSedModLamella := ThawMultiple(["SedModLamella"])
ArraySedMod := array_all(1, N_SedModules, -B_SedPlate*N_SedModulePlates/sin(AN_SedPlate))
FreezeSedModComponents := FreezeMultiple(["SedMod*"])
SedModArrayScript := stack(ThawSedModPiping, view("f"), RotateSedModPiping, MirrorSedModPipingUp, view("t"), TripleSedModPiping, ThawSedModLamella, ArraySedMod, FreezeSedModComponents)
SedLamellaScript := stack(SedLaminaScript, SedModCapScript, SedModPipeScript, SedModArrayScript)
# Floc Skimmer
# Origins and Dimensions
# The floc skimmer is a 2 inch nominal diameter pipe that starts at a coupling in the wall of the sedimentation tank under the exit channel, wraps around the exit channel and ends a few centimeters below the surface of the water in the sed tank.Its purpose is to capture any flocs that pass up through the plate settlers when the cap on the top of the pipe is removed.
H_SkimmerToSurface := (HW_Sed - Z_SedLaunder - outerradius(ND_SedLaunder))/2 = 3.74098 cm
SedSkimmerCoupling_Origin := [
    Plant_Origin[0] - L_Sed - T_PlantWall + SocketDepth(ND_SedSkimmer);
    Plant_Origin[1] + W_SedBay/2 - ConRadius(ND_SedLaunder) - S_Fitting - ConRadius(ND_SedSkimmer);
    Z_SedExitChannelBottom - T_ChannelWall - S_Fitting - ConRadius(ND_SedSkimmer)
]
SedSkimmerCap_Origin := [
    Plant_Origin[0] - L_Sed + W_SedExitChannel + W_SedInletChannel + T_SedWeir + T_ChannelWall + CapDiameter(ND_SedSkimmer)/2;
    SedSkimmerCoupling_Origin[1];
    Plant_Origin[2] + HW_Sed - H_SkimmerToSurface
]
SedSkimmerHorizPipe_Origin := [
    SedSkimmerCap_Origin[0] - ElbowRadius(ND_SedSkimmer);
    SedSkimmerCoupling_Origin[1];
    SedSkimmerCoupling_Origin[2]
]
SedSkimmerElbow_Origin := SedSkimmerHorizPipe_Origin + [ElbowRadius(ND_SedSkimmer); 0; ElbowRadius(ND_SedSkimmer)]
SedSkimmerVertPipe_Origin := SedSkimmerCap_Origin
# Skimmer Fittings
SedSkimmerCap := CapF(SedSkimmerCap_Origin, [0; -90]*deg, ND_SedSkimmer)
SedSkimmerElbow := ElbowSUBF(SedSkimmerElbow_Origin, [0; 0; 270]*deg, ND_SedSkimmer, PS_Default, ["SedModLamella"])
SedSkimmerCoupling := CouplingSUBF(SedSkimmerCoupling_Origin, [0; 0; 90]*deg, ND_SedSkimmer, PS_Default, ["SedTankCon"])
SedSkimmerFittingScript := stack(SelectSedRemovables, SedSkimmerCap, SedRemovableFrz, SelectSedFittings, SedSkimmerElbow, SedSkimmerCoupling, SedFittingFrz)
# Skimmer Pipes
SedSkimmerHorizPipe := PipeSUBF(SedSkimmerHorizPipe_Origin, W_SedInletChannel + W_SedExitChannel + T_SedWeir + T_ChannelWall + T_PlantWall - CouplingLength(ND_SedSkimmer) + ConRadius(ND_SedSkimmer) + SocketDepth(ND_SedSkimmer) - ElbowRadius(ND_SedSkimmer), [0; 0]*deg, ND_SedSkimmer, PS_Default, ["SedTankCon"])
SedSkimmerVertPipe := PipeSUBF(SedSkimmerVertPipe_Origin, SedSkimmerVertPipe_Origin[2] - SedSkimmerElbow_Origin[2], [0; -90]*deg, ND_SedSkimmer, PS_Default, ["SedModLamella"])
SedSkimmerPipeScript := stack(SelectSedPipes, SedSkimmerHorizPipe, SedSkimmerVertPipe, SedPipeFrz)
SedSkimmerScript := stack(SedSkimmerFittingScript, SedSkimmerPipeScript)
# Hopper Viewer
SedHopperViewerStub_Origin := [
    Plant_Origin[0] - L_Sed + W_SedInletChannel - (W_SedInletChannelPostWeir - T_SedWeir)*(EN_InletChannelGeom == Cantilever) + 2*T_SedWeir + W_SedExitChannelPostWeir + W_SedExitChannelPreWeir/2;
    SedManPipeHigh_Origin[1] - ConRadius(ND_SedManifold) - 2*ConRadius(ND_SedSkimmer) - 2*S_Fitting - ConRadius(ND_SedHopperViewer);
    Z_SedExitChannelBottom - SocketDepth(ND_SedHopperViewer)
]
SedHopperViewerCoupling_Origin := SedHopperViewerStub_Origin
SedHopperViewerPipe_Origin := SedHopperViewerCoupling_Origin + [0 m; 0 m; -CouplingLength(ND_SedHopperViewer) + 2*SocketDepth(ND_SedHopperViewer)]
SedHopperViewerStub := PipeF(SedHopperViewerStub_Origin, SocketDepth(ND_SedHopperViewer) + H_SedInletChannel, [0; 90]*deg, ND_SedHopperViewer, PS_Default)
SedHopperViewerCoupling := CouplingSUBF(SedHopperViewerCoupling_Origin, [0; 270]*deg, ND_SedHopperViewer, PS_Default, ["SedTankCon"])
SedHopperViewerPipe := PipeSUBF(SedHopperViewerPipe_Origin, T_ChannelWall - CouplingLength(ND_SedHopperViewer) + SocketDepth(ND_SedHopperViewer), [0; 270]*deg, ND_SedHopperViewer, PS_Default, ["SedTankCon"])
SedHopperViewerScript := stack(SelectSedRemovables, SedHopperViewerStub, SedRemovableFrz, SelectSedFittings, SedHopperViewerCoupling, SedFittingFrz, SelectSedPipes, SedHopperViewerPipe, SedPipeFrz)
# Complete A Single Sed Tank (array and add walls) (diffusers added later since they are not arrayed)
ThawSedBayArray := ThawMultiple(["Sed*"])
ArraySedBay := array_all(N_SedBays, 1, W_SedBay)
FreezeSedBayArray := FreezeMultiple(["Sed*"])
ArraySedBayScript := stack(ThawSedBayArray, FreezeSedModComponents, ArraySedBay, FreezeSedBayArray)
SedWallUnderChannel := BoxF([0 m; W_Sed; 0 m] + Plant_Origin, [
    -L_Sed + Plant_Origin[0];
    W_Sed + T_PlantWall + Plant_Origin[1];
    Z_SedExitChannelBottom - T_ChannelWall
], [0; 0; 0]*deg)
SedWallAboveChannel := BoxF([0 m; W_Sed; H_Sed] + Plant_Origin, [
    -L_Sed + W_SedInletChannel + W_SedExitChannel + T_ChannelWall + T_SedWeir;
    W_Sed + T_PlantWall;
    H_Sed - Z_SedExitChannelBottom - T_ChannelWall
] + Plant_Origin, [0; 0; 0]*deg)
SedPlateSupportLedgeScript := stack(SelectSedCon, SedWallUnderChannel, SedWallAboveChannel, FreezeSedTank)
CompleteSedTank :=
    SedPlateSupportLedgeScript if N_SedBays == 1
    stack(ArraySedBayScript, SedPlateSupportLedgeScript) otherwise
# Array Sed Tanks
ThawAllSed := ThawMultiple(["Sed*"])
ArraySedTank := Array_All(N_SedTanks, 1, W_Sed + T_PlantWall)
FreezeAllSed := FreezeMultiple(["Sed*"])
SelectSedConcrete := SelectLayer("SedTankCon")
SedTankArrayScript := stack(ThawAllSed, FreezeSedModComponents, ArraySedTank, FreezeAllSed, SelectSedConcrete, BrepAll, Union_All, FreezeSedTank)
# Floc Weir Baffle and Slot
# Note: Because we had to mirror instead of array the baffle components between sed bays, this section of code only works for 1 or 2 sed bays.
# Origins and Dimensions
L_SedBaffleWedge2Y := W_SedBay/2 - outerradius(ND_SedJetReverser) - (Z_SedManifoldPipe - (Z_SedSludge + T_ConcreteMin + outerradius(ND_SedJetReverser)))/tan(AN_SedSlope) - H_SedSlotDepth/sin(AN_SedSlope) - T_ConcreteMin + H_SedSlotDepth = 0.22289 m
L_SedBaffleWedge1Y :=
    L_SedBaffleWedge2Y if N_SedBays == 1
    (H_SedSlotDepth + W_SedBay/2 - (outerradius(ND_SedJetReverser) + (Z_SedManifoldPipe - (Z_SedSludge + T_ConcreteMin + outerradius(ND_SedJetReverser)))/tan(AN_SedSlope) + H_SedSlotDepth/sin(AN_SedSlope))) otherwise
    = 0.22289 m
SedBaffleWedge1_Origin := [
    Plant_Origin[0] - L_SedUpflow - T_ConcreteMin/2 - T_SedWeirBaffle/2;
    Plant_Origin[1] + W_SedBay/2 - outerradius(ND_SedJetReverser) - (Z_SedManifoldPipe - (Z_SedSludge + T_ConcreteMin + outerradius(ND_SedJetReverser)))/tan(AN_SedSlope) - H_SedSlotDepth/sin(AN_SedSlope);
    Z_SedSideSlopes - T_ConcreteMin*tan(AN_SedSlope)*(N_SedBays == 1)
]
SedBaffleWedge2_Origin := [
    Plant_Origin[0] - L_SedUpflow - T_ConcreteMin/2 - T_SedWeirBaffle/2;
    Plant_Origin[1] + W_SedBay/2 + outerradius(ND_SedJetReverser) + (Z_SedManifoldPipe - (Z_SedSludge + T_ConcreteMin + outerradius(ND_SedJetReverser)))/tan(AN_SedSlope) + H_SedSlotDepth/sin(AN_SedSlope);
    Z_SedSideSlopes - T_ConcreteMin*tan(AN_SedSlope)
]
# Cutting the Baffle Slot
SedBaffleSlot1 := BoxF([
    Plant_Origin[0] - L_SedUpflow - T_ConcreteMin/2 + T_SedWeirBaffle/2;
    Plant_Origin[1] + W_SedBay/2 - outerradius(ND_SedJetReverser) - (Z_SedManifoldPipe - (Z_SedSludge + T_ConcreteMin + outerradius(ND_SedJetReverser)))/tan(AN_SedSlope) - H_SedSlotDepth/sin(AN_SedSlope);
    Z_SedManifoldPipe
], [
    Plant_Origin[0] - L_SedUpflow - T_ConcreteMin/2 - T_SedWeirBaffle/2;
    Plant_Origin[1] + W_SedBay/2 + outerradius(ND_SedJetReverser) + (Z_SedManifoldPipe - (Z_SedSludge + T_ConcreteMin + outerradius(ND_SedJetReverser)))/tan(AN_SedSlope) + H_SedSlotDepth/sin(AN_SedSlope);
    Plant_Origin[2] + H_Sed
], [0; 0; 0]*deg)
SedBaffleSlot2 := WedgeF(SedBaffleWedge1_Origin, [
    SedBaffleWedge1_Origin[0] - L_SedBaffleWedge1Y;
    SedBaffleWedge1_Origin[1] - T_SedWeirBaffle;
    Z_SedManifoldPipe
], [90; 0; 0]*deg)
SedBaffleSlot3 := WedgeF(SedBaffleWedge2_Origin, [
    SedBaffleWedge2_Origin[0] - L_SedBaffleWedge2Y;
    SedBaffleWedge2_Origin[1] + T_SedWeirBaffle;
    Z_SedManifoldPipe
], [270; 0; 0]*deg)
SedBaffleSlot4 := BoxF([
    Plant_Origin[0] - L_SedUpflow - T_ConcreteMin/2 + T_SedWeirBaffle/2;
    Plant_Origin[1] + W_SedBay + H_SedSlotDepth - T_ConcreteMin;
    Z_SedSideSlopes - T_ConcreteMin*tan(AN_SedSlope)
], [
    Plant_Origin[0] - L_SedUpflow - T_ConcreteMin/2 - T_SedWeirBaffle/2;
    Plant_Origin[1] + W_SedBay/2 + outerradius(ND_SedJetReverser) + (Z_SedManifoldPipe - (Z_SedSludge + T_ConcreteMin + outerradius(ND_SedJetReverser)))/tan(AN_SedSlope) + H_SedSlotDepth/sin(AN_SedSlope);
    Plant_Origin[2] + H_Sed
], [0; 0; 0]*deg)
SedBaffleSlot5 := BoxF([
    Plant_Origin[0] - L_SedUpflow - T_ConcreteMin/2 + T_SedWeirBaffle/2;
    Plant_Origin[1] - H_SedSlotDepth + T_ConcreteMin*(N_SedBays == 1);
    Z_SedSideSlopes - T_ConcreteMin*tan(AN_SedSlope)*(N_SedBays == 1)
], [
    Plant_Origin[0] - L_SedUpflow - T_ConcreteMin/2 - T_SedWeirBaffle/2;
    Plant_Origin[1] + W_SedBay/2 - outerradius(ND_SedJetReverser) - (Z_SedManifoldPipe - (Z_SedSludge + T_ConcreteMin + outerradius(ND_SedJetReverser)))/tan(AN_SedSlope) - H_SedSlotDepth/sin(AN_SedSlope);
    Plant_Origin[2] + H_Sed
], [0; 0; 0]*deg)
MirrorSedBaffleBays := MirrorAll([Plant_Origin[0]; Plant_Origin[1] + W_Sed - W_SedBay], [Plant_Origin[0] + zc; Plant_Origin[1] + W_Sed - W_SedBay], "n")
SubtractSedConCutouts := SubtractF(["SedTankCon"], "DeleteMe")
SedBaffleSlotScript :=
    stack(SedBaffleSlot1, SedBaffleSlot2, SedBaffleSlot3, SedBaffleSlot4, SedBaffleSlot5, ArraySedTank, GroupDelete, SubtractSedConCutouts) if N_SedBays == 1
    stack(SedBaffleSlot1, SedBaffleSlot2, SedBaffleSlot3, SedBaffleSlot4, SedBaffleSlot5, MirrorSedBaffleBays, ArraySedTank, GroupDelete, SubtractSedConCutouts) otherwise
# Floc Weir Baffle
SedBaffleLayer := layer_new("SedBaffle", yellow)
SelectSedBaffle := SelectLayer("SedBaffle")
SedBafflePiece1 := BoxF([
    Plant_Origin[0] - L_SedUpflow - T_ConcreteMin/2 + T_SedWeirBaffle/2;
    Plant_Origin[1] + W_SedBay/2 - outerradius(ND_SedJetReverser) - (Z_SedManifoldPipe - (Z_SedSludge + T_ConcreteMin + outerradius(ND_SedJetReverser)))/tan(AN_SedSlope) - H_SedSlotDepth/sin(AN_SedSlope);
    Z_SedManifoldPipe
], [
    Plant_Origin[0] - L_SedUpflow - T_ConcreteMin/2 - T_SedWeirBaffle/2;
    Plant_Origin[1] + W_SedBay/2 + outerradius(ND_SedJetReverser) + (Z_SedManifoldPipe - (Z_SedSludge + T_ConcreteMin + outerradius(ND_SedJetReverser)))/tan(AN_SedSlope) + H_SedSlotDepth/sin(AN_SedSlope);
    Z_SedFlocWeir
], [0; 0; 0]*deg)
SedBafflePiece2 := WedgeF(SedBaffleWedge1_Origin, [
    SedBaffleWedge1_Origin[0] - L_SedBaffleWedge1Y;
    SedBaffleWedge1_Origin[1] - T_SedWeirBaffle;
    Z_SedManifoldPipe
], [90; 0; 0]*deg)
SedBafflePiece3 := WedgeF(SedBaffleWedge2_Origin, [
    SedBaffleWedge2_Origin[0] - L_SedBaffleWedge2Y;
    SedBaffleWedge2_Origin[1] + T_SedWeirBaffle;
    Z_SedManifoldPipe
], [270; 0; 0]*deg)
SedBafflePiece4 := BoxF([
    Plant_Origin[0] - L_SedUpflow - T_ConcreteMin/2 + T_SedWeirBaffle/2;
    Plant_Origin[1] + W_SedBay + H_SedSlotDepth - T_ConcreteMin;
    Z_SedSideSlopes - T_ConcreteMin*tan(AN_SedSlope)
], [
    Plant_Origin[0] - L_SedUpflow - T_ConcreteMin/2 - T_SedWeirBaffle/2;
    Plant_Origin[1] + W_SedBay/2 + outerradius(ND_SedJetReverser) + (Z_SedManifoldPipe - (Z_SedSludge + T_ConcreteMin + outerradius(ND_SedJetReverser)))/tan(AN_SedSlope) + H_SedSlotDepth/sin(AN_SedSlope);
    Z_SedFlocWeir
], [0; 0; 0]*deg)
SedBafflePiece5 := BoxF([
    Plant_Origin[0] - L_SedUpflow - T_ConcreteMin/2 + T_SedWeirBaffle/2;
    Plant_Origin[1] - H_SedSlotDepth + T_ConcreteMin*(N_SedBays == 1);
    Z_SedSideSlopes - T_ConcreteMin*tan(AN_SedSlope)*(N_SedBays == 1)
], [
    Plant_Origin[0] - L_SedUpflow - T_ConcreteMin/2 - T_SedWeirBaffle/2;
    Plant_Origin[1] + W_SedBay/2 - outerradius(ND_SedJetReverser) - (Z_SedManifoldPipe - (Z_SedSludge + T_ConcreteMin + outerradius(ND_SedJetReverser)))/tan(AN_SedSlope) - H_SedSlotDepth/sin(AN_SedSlope);
    Z_SedFlocWeir
], [0; 0; 0]*deg)
SedBaffleFrz := FreezeLayer("SedBaffle")
SedManifoldRestCutout := CylinderF([-L_Sed + L_SedHopper + T_ConcreteMin; W_SedBay/2; Z_SedManifoldPipe] + Plant_Origin, ConRadius(ND_SedManifold), 2*T_ConcreteMin, [0; 0]*deg)
SedBaffleSemicircleCut := SubtractF(["SedBaffle"], "DeleteMe")
SedBaffleScript :=
    stack(SedBaffleLayer, SedBafflePiece1, SedBafflePiece2, SedBafflePiece3, SedBafflePiece4, SedBafflePiece5, Union_All, SedBaffleFrz, SedManifoldRestCutout, GroupDelete, SedBaffleSemicircleCut, SelectSedBaffle, ArraySedTank, SedBaffleFrz) if N_SedBays == 1
    stack(SedBaffleLayer, SedBafflePiece1, SedBafflePiece2, SedBafflePiece3, SedBafflePiece4, SedBafflePiece5, Union_All, SedBaffleFrz, SedManifoldRestCutout, GroupDelete, SedBaffleSemicircleCut, SelectSedBaffle, MirrorSedBaffleBays, ArraySedTank, SedBaffleFrz) otherwise
SedFlocWeirScript := stack(SedBaffleSlotScript, SedBaffleScript)
# Inlet Manifold Diffusers
SedDiffuser_Origin := [
    Plant_Origin[0] - L_Sed + L_SedHopper + L_SedDiffuserOutlet/2 + T_SedDiffuserWall;
    SedManPipeHigh_Origin[1];
    -innerdiameter(ND_SedManifold, PS_Default)/2 + Z_SedManifoldPipe
]
SedDiffLayer := layer_new("SedManifoldDiffuserPlu", blue)
SedDiffOuterCircleSection := circle([SedDiffuser_Origin[0]; SedDiffuser_Origin[1]; SedDiffuser_Origin[2]], outerradius(ND_SedDiffuser))
SedDiffOuterRectangleSection := Pline3D([
    [
        SedDiffuser_Origin[0] + L_SedDiffuserOutlet/2 + T_SedDiffuserWall;
        SedDiffuser_Origin[1] + W_SedDiffuserOutlet/2 + T_SedDiffuserWall;
        SedDiffuser_Origin[2] - L_SedManifoldDiffuser
    ];
    [
        SedDiffuser_Origin[0] - L_SedDiffuserOutlet/2 - T_SedDiffuserWall;
        SedDiffuser_Origin[1] + W_SedDiffuserOutlet/2 + T_SedDiffuserWall;
        SedDiffuser_Origin[2] - L_SedManifoldDiffuser
    ];
    [
        SedDiffuser_Origin[0] - L_SedDiffuserOutlet/2 - T_SedDiffuserWall;
        SedDiffuser_Origin[1] - W_SedDiffuserOutlet/2 - T_SedDiffuserWall;
        SedDiffuser_Origin[2] - L_SedManifoldDiffuser
    ];
    [
        SedDiffuser_Origin[0] + L_SedDiffuserOutlet/2 + T_SedDiffuserWall;
        SedDiffuser_Origin[1] - W_SedDiffuserOutlet/2 - T_SedDiffuserWall;
        SedDiffuser_Origin[2] - L_SedManifoldDiffuser
    ];
    [
        SedDiffuser_Origin[0] + L_SedDiffuserOutlet/2 + T_SedDiffuserWall;
        SedDiffuser_Origin[1] + W_SedDiffuserOutlet/2 + T_SedDiffuserWall;
        SedDiffuser_Origin[2] - L_SedManifoldDiffuser
    ]
])
SedDiffZoomOuter := ZoomWindow([SedDiffuser_Origin[0] - L_SedDiffuserOutlet; SedDiffuser_Origin[1] + W_SedDiffuserOutlet], [SedDiffuser_Origin[0] + L_SedDiffuserOutlet; SedDiffuser_Origin[1] - W_SedDiffuserOutlet])
SedDiffOuterLoft := Loft([SedDiffuser_Origin[0] + outerradius(ND_SedDiffuser); SedDiffuser_Origin[1]; SedDiffuser_Origin[2]], [
    SedDiffuser_Origin[0] + L_SedDiffuserOutlet/2 + T_SedDiffuserWall;
    SedDiffuser_Origin[1] + W_SedDiffuserOutlet/2 + T_SedDiffuserWall;
    SedDiffuser_Origin[2] - L_SedManifoldDiffuser
])
SedDiffuserFreeze := FreezeLayer("SedManifoldDiffuserPlu")
SedDiffInnerCircleSection := circle([SedDiffuser_Origin[0]; SedDiffuser_Origin[1]; SedDiffuser_Origin[2]], innerdiameter(ND_SedDiffuser, PS_Default)/2)
SedDiffInnerRectangleSection := Pline3D([
    [
        SedDiffuser_Origin[0] + L_SedDiffuserOutlet/2;
        SedDiffuser_Origin[1] + W_SedDiffuserOutlet/2;
        SedDiffuser_Origin[2] - L_SedManifoldDiffuser
    ];
    [
        SedDiffuser_Origin[0] - L_SedDiffuserOutlet/2;
        SedDiffuser_Origin[1] + W_SedDiffuserOutlet/2;
        SedDiffuser_Origin[2] - L_SedManifoldDiffuser
    ];
    [
        SedDiffuser_Origin[0] - L_SedDiffuserOutlet/2;
        SedDiffuser_Origin[1] - W_SedDiffuserOutlet/2;
        SedDiffuser_Origin[2] - L_SedManifoldDiffuser
    ];
    [
        SedDiffuser_Origin[0] + L_SedDiffuserOutlet/2;
        SedDiffuser_Origin[1] - W_SedDiffuserOutlet/2;
        SedDiffuser_Origin[2] - L_SedManifoldDiffuser
    ];
    [
        SedDiffuser_Origin[0] + L_SedDiffuserOutlet/2;
        SedDiffuser_Origin[1] + W_SedDiffuserOutlet/2;
        SedDiffuser_Origin[2] - L_SedManifoldDiffuser
    ]
])
SedDiffZoomInner := ZoomWindow([SedDiffuser_Origin[0] - L_SedDiffuserOutlet; SedDiffuser_Origin[1] + W_SedDiffuserOutlet], [SedDiffuser_Origin[0] + L_SedDiffuserOutlet; SedDiffuser_Origin[1] - W_SedDiffuserOutlet])
SedDiffInnerLoft := Loft([
    SedDiffuser_Origin[0] + innerdiameter(ND_SedDiffuser, PS_Default)/2;
    SedDiffuser_Origin[1];
    SedDiffuser_Origin[2]
], [
    SedDiffuser_Origin[0] + L_SedDiffuserOutlet/2;
    SedDiffuser_Origin[1] + W_SedDiffuserOutlet/2;
    SedDiffuser_Origin[2] - L_SedManifoldDiffuser
])
SedDiffGroupInner := GroupAll("DeleteMe")
SedDiffSubtract := SubtractF(["SedManifoldDiffuserPlu"], "DeleteMe")
SedDiffSelect := SelectLayer("SedManifoldDiffuserPlu")
SedDiffArray := Array_All(1, N_SedManifoldPorts, B_SedManifoldPort)
SedDiffuserScript := stack(SedDiffLayer, SedDiffOuterCircleSection, SedDiffOuterRectangleSection, SedDiffZoomOuter, SedDiffOuterLoft, SedDiffuserFreeze, SedDiffInnerCircleSection, SedDiffInnerRectangleSection, SedDiffZoomInner, SedDiffInnerLoft, SedDiffGroupInner, SedDiffSubtract, SedDiffSelect, SedDiffArray, SedDiffuserFreeze)
# Finish Inlet and Exit Channels, and add last wall
# Finish tank walls
SelectSedCon
SedLowerWall := BoxF([-L_Sed; -T_PlantWall; H_Sed] + Plant_Origin, Plant_Origin, [0; 0; 0]*deg)
SedChannelCap := BoxF([-L_Sed + W_SedInletChannelPreWeir; (W_Sed + T_PlantWall)*N_SedTanks; H_Sed] + Plant_Origin, [
    -L_Sed + W_SedInletChannel + W_SedExitChannel + T_SedWeir + Plant_Origin[0];
    -T_PlantWall + (W_Sed + T_PlantWall)*N_SedTanks + Plant_Origin[1];
    Z_SedExitChannelBottom
], [0; 0; 0]*deg) = "_box -9.30574,3.6504,2.08982 -8.69232,3.5004,1.6372"
SedTankWalls := stack(SelectSedCon, SedLowerWall, SedChannelCap)
# Channel Weirs and Dividing Wall
SedInletChannelYWeir := BoxF([
    Plant_Origin[0] - L_Sed + W_SedInletChannelPreWeir;
    Plant_Origin[1] + 2*(S_Fitting + ConRadius(ND_SedChannelDrain));
    Z_SedExitChannelBottom
], [
    Plant_Origin[0] - L_Sed + W_SedInletChannelPreWeir + T_SedWeir;
    Plant_Origin[1] - T_PlantWall + (W_SedBay*N_SedBays + T_PlantWall)*N_SedTanks;
    Z_SedExitChannelBottom + H_SedWeirInlet
], [0; 0; 0]*deg)
SedInletChannelXWeir := BoxF([
    Plant_Origin[0] - L_Sed + W_SedInletChannelPreWeir;
    Plant_Origin[1] + 2*(S_Fitting + ConRadius(ND_SedChannelDrain));
    Z_SedExitChannelBottom
], [
    Plant_Origin[0] - L_Sed;
    Plant_Origin[1] + 2*(S_Fitting + ConRadius(ND_SedChannelDrain)) + T_SedWeir;
    Z_SedExitChannelBottom + H_SedWeirInlet
], [0; 0; 0]*deg)
SedChannelDivider := BoxF([Plant_Origin[0] - L_Sed + W_SedInletChannel; Plant_Origin[1]; Z_SedExitChannelBottom], [
    Plant_Origin[0] - L_Sed + W_SedInletChannel + T_SedWeir;
    Plant_Origin[1] - T_PlantWall + (W_SedBay*N_SedBays + T_PlantWall)*N_SedTanks;
    Z_SedExitChannelBottom + H_SedInletChannel
], [0; 0; 0]*deg)
SedExitChannelWeirY := BoxF([
    Plant_Origin[0] - L_Sed + W_SedInletChannel + T_SedWeir + W_SedExitChannelPostWeir;
    Plant_Origin[1];
    Z_SedExitChannelBottom
], [
    Plant_Origin[0] - L_Sed + W_SedInletChannel + 2*T_SedWeir + W_SedExitChannelPostWeir;
    Plant_Origin[1] - T_PlantWall + (W_SedBay*N_SedBays + T_PlantWall)*N_SedTanks - S_Fitting - OuterDiameterFittingPVC(ND_FiEntrancePipe);
    Z_SedExitChannelBottom + H_SedWeirExit
], [0; 0; 0]*deg)
SedExitChannelWeirX := BoxF([
    Plant_Origin[0] - L_Sed + W_SedInletChannel + T_SedWeir + W_SedExitChannelPostWeir;
    Plant_Origin[1] - T_PlantWall + (W_Sed + T_PlantWall)*N_SedTanks - OuterDiameterFittingPVC(ND_FiEntrancePipe) - S_Fitting - T_SedWeir;
    Z_SedExitChannelBottom
], [
    Plant_Origin[0] - L_Sed + W_SedInletChannel + 2*T_SedWeir + W_SedExitChannelPostWeir + W_SedExitChannelPreWeir;
    Plant_Origin[1] - T_PlantWall + (W_Sed + T_PlantWall)*N_SedTanks - S_Fitting - OuterDiameterFittingPVC(ND_FiEntrancePipe);
    Z_SedExitChannelBottom + H_SedWeirExit
], [0; 0; 0]*deg)
SedChannelWeirScript := stack(SedInletChannelYWeir, SedInletChannelXWeir, SedChannelDivider, SedExitChannelWeirY, SedExitChannelWeirX, Union_All, FreezeSedTank)
FinishSedChannelScript := stack(SedTankWalls, SedChannelWeirScript)
# Inlet Channel Drain
# Origins and Dimensions
SedIChannelDrainVertCoupling_Origin := [
    Plant_Origin[0] - L_Sed - T_PlantWall + max(T_PlantWall, CouplingLength(ND_SedInletChannelDrain)) + SocketDepth(ND_SedInletChannelDrain) + ElbowRadius(ND_SedInletChannelDrain);
    Plant_Origin[1] + S_Fitting + ConRadius(ND_SedInletChannelDrain);
    Plant_Origin[2] + Z_SedExitChannelBottom - CouplingLength(ND_SedInletChannelDrain) + SocketDepth(ND_SedInletChannelDrain)
]
L_SedIChannelVertPipe := Z_SedExitChannelBottom - CouplingLength(ND_SedInletChannelDrain) - ElbowRadius(ND_SedInletChannelDrain) - ConRadius(ND_SedInletChannelDrain)
L_SedIChannelHorizPipe := SedIChannelDrainVertCoupling_Origin[0] - (Plant_Origin[0] - L_Sed - T_PlantWall) - CouplingLength(ND_SedInletChannelDrain) + SocketDepth(ND_SedInletChannelDrain) - ElbowRadius(ND_SedInletChannelDrain)
SedIChannelDrainHorizCoupling_Origin := [
    Plant_Origin[0] - T_PlantWall - SocketDepth(ND_SedChannelDrain) - L_Sed + CouplingLength(ND_SedChannelDrain);
    SedIChannelDrainVertCoupling_Origin[1];
    SedIChannelDrainVertCoupling_Origin[2] - L_SedIChannelVertPipe - ElbowRadius(ND_SedChannelDrain)
]
# Inlet Channel Drain Fittings
SedIChannelDrainVertCoupling := CouplingSUBF(SedIChannelDrainVertCoupling_Origin, [0; 90; 0]*deg, ND_SedInletChannelDrain, PS_Default, ["SedTankCon"])
SedIChannelDrainElbow := ElbowSUBF(SedIChannelDrainVertCoupling_Origin + [0 m; 0 m; -L_SedIChannelVertPipe], [0; 0; 270]*deg, ND_SedInletChannelDrain, PS_Default, ["SedTankCon"])
SedIChannelHorizCoupling := CouplingSUBF(SedIChannelDrainHorizCoupling_Origin, [0; 0; 0]*deg, ND_SedChannelDrain, PS_Default, ["SedTankCon"])
SedInletChannelDrainFittingScript := stack(SelectSedFittings, SedIChannelDrainVertCoupling, SedIChannelDrainElbow, SedIChannelHorizCoupling, SedFittingFrz)
# Inlet Channel Drain Pipes
SedIChannelDrainHorizPipe := PipeSUBF([
    SedIChannelDrainVertCoupling_Origin[0] - ElbowRadius(ND_SedInletChannelDrain);
    SedIChannelDrainVertCoupling_Origin[1];
    SedIChannelDrainHorizCoupling_Origin[2]
], L_SedIChannelHorizPipe, [0; 0; 0]*deg, ND_SedInletChannelDrain, PS_Default, ["SedTankCon"])
SedIChannelDrainVertPipe := PipeSUBF(SedIChannelDrainVertCoupling_Origin, L_SedIChannelVertPipe, [0; 270; 0]*deg, ND_SedInletChannelDrain, PS_Default, ["SedTankCon"])
SedIChannelDrainStub := PipeF(SedIChannelDrainVertCoupling_Origin + [0 m; 0 m; CouplingLength(ND_SedInletChannelDrain) - 2*SocketDepth(ND_SedInletChannelDrain)], H_SedInletChannel + SocketDepth(ND_SedInletChannelDrain), [0; 90; 0]*deg, ND_SedInletChannelDrain, PS_Default)
SedInletChannelDrainPipeScript := stack(SelectSedPipes, SedIChannelDrainHorizPipe, SedIChannelDrainVertPipe, SedPipeFrz, SelectSedRemovables, SedIChannelDrainStub, SedRemovableFrz)
SedInletDrainScript := stack(SedInletChannelDrainFittingScript, SedInletChannelDrainPipeScript)
# Outlets to Filter
# Origins and Dimensions
SedOutletCoupling1_Origin(N) := [
    Plant_Origin[0] - L_Sed + W_SedInletChannel + T_SedWeir + ConRadius(ND_FiEntrancePipe);
    Plant_Origin[1] - T_PlantWall + (W_SedBay*N_SedBays + T_PlantWall)*N_SedTanks - ConRadius(ND_FiEntrancePipe) - S_Fitting - (N - 1)*W_SedBay - T_PlantWall*floor((N - 1)/N_SedBays);
    Z_SedExitChannelBottom - SocketDepth(ND_FiEntrancePipe)
]
SedOutletVertPipe_Origin(N) := SedOutletCoupling1_Origin(N) + [0; 0; 2*SocketDepth(ND_FiEntrancePipe) - CouplingLength(ND_FiEntrancePipe)]
L_SedOutletVertPipe := 2*SocketDepth(ND_FiEntrancePipe) + max(0, T_ChannelWall - CouplingLength(ND_FiEntrancePipe))
SedOutletElbow_Origin(N) := SedOutletVertPipe_Origin(N) - [0; 0; L_SedOutletVertPipe]
SedOutletCoupling2_Origin(N) := [
    Plant_Origin[0] - T_PlantWall - L_Sed + CouplingLength(ND_FiEntrancePipe) - SocketDepth(ND_FiEntrancePipe);
    SedOutletElbow_Origin(N)[1];
    -ElbowRadius(ND_FiEntrancePipe) + SedOutletElbow_Origin(N)[2]
]
SedOutletHorizPipe_Origin(N) := [-ElbowRadius(ND_FiEntrancePipe); 0; -ElbowRadius(ND_FiEntrancePipe)] + SedOutletElbow_Origin(N)
# Sed Outlet Fittings
SedOutletCoupling1Script :=
    Local ← SelectSedFittings
    for i ∈ 1 .. N_FiEntrancePipes
        OutletCoupling ← CouplingSUBF(SedOutletCoupling1_Origin(i), [0; 270]*deg, ND_FiEntrancePipe, PS_Default, ["SedTankCon"])
        Local ← stack(Local, OutletCoupling)
    Local ← stack(Local, SedFittingFrz)
    return Local
SedOutletElbowScript :=
    Local ← SelectSedFittings
    for i ∈ 1 .. N_FiEntrancePipes
        OutletElbow ← ElbowSUBF(SedOutletElbow_Origin(i), [0; 0; 270]*deg, ND_FiEntrancePipe, PS_Default, ["SedTankCon"])
        Local ← stack(Local, OutletElbow)
    Local ← stack(Local, SedFittingFrz)
    return Local
SedOutletCoupling2Script :=
    Local ← SelectSedFittings
    for i ∈ 1 .. N_FiEntrancePipes
        OutletCoupling ← CouplingSUBF(SedOutletCoupling2_Origin(i), [0; 0]*deg, ND_FiEntrancePipe, PS_Default, ["SedTankCon"])
        Local ← stack(Local, OutletCoupling)
    Local ← stack(Local, SedFittingFrz)
    return Local
# Sed Outlet Pipes
SedOutletVertPipeScript :=
    Local ← SelectSedPipes
    for i ∈ 1 .. N_FiEntrancePipes
        OutletPipe ← PipeSUBF(SedOutletVertPipe_Origin(i), L_SedOutletVertPipe, [0; 270]*deg, ND_FiEntrancePipe, PS_Default, ["SedTankCon"])
        Local ← stack(Local, OutletPipe)
    Local ← stack(Local, SedPipeFrz)
    return Local
SedOutletHorizPipeScript :=
    Local ← SelectSedPipes
    for i ∈ 1 .. N_FiEntrancePipes
        OutletPipe ← PipeSUBF(SedOutletHorizPipe_Origin(i), SedOutletElbow_Origin(i)[0] - ElbowRadius(ND_FiEntrancePipe) - (Plant_Origin[0] - T_PlantWall - L_Sed + CouplingLength(ND_FiEntrancePipe) - SocketDepth(ND_FiEntrancePipe)), [0; 0]*deg, ND_FiEntrancePipe, PS_Default, ["SedTankCon"])
        Local ← stack(Local, OutletPipe)
    Local ← stack(Local, SedPipeFrz)
    return Local
SedOutletScript := stack(SedOutletCoupling1Script, SedOutletElbowScript, SedOutletCoupling2Script, SedOutletVertPipeScript, SedOutletHorizPipeScript)
# Add Water Levels
SedWaterLayer := layer_new("SedWater", blue2)
SedWaterBox := BoxF(Plant_Origin, [-L_SedUpflow; W_Sed; HW_Sed] + Plant_Origin, [0; 0; 0]*deg)
SedIChannelWater := BoxF([Plant_Origin[0] - L_Sed; Plant_Origin[1]; Z_SedInletChannelBottom], [Plant_Origin[0] - L_Sed; Plant_Origin[1]; Z_SedInletChannelBottom] + [W_SedInletChannelPreWeir + T_SedWeir + W_SedInletChannelPostWeir; W_Sed; HW_SedInletChannel], [0; 0; 0]*deg)
SedEChannelWater := BoxF([
    Plant_Origin[0] - L_Sed + W_SedInletChannel + 2*T_SedWeir + W_SedExitChannelPostWeir;
    Plant_Origin[1];
    Z_SedExitChannelBottom
], [
    Plant_Origin[0] - L_Sed + W_SedInletChannel + T_SedWeir + W_SedExitChannel;
    Plant_Origin[1] + W_Sed;
    Z_SedExitChannelBottom + HW_SedExitChannel
], [0; 0; 0]*deg)
SedWaterFrz := FreezeLayer("SedWater")
SedWaterScript := stack(SedWaterLayer, SedWaterBox, SedIChannelWater, SedEChannelWater, SedWaterFrz)
AC_SedTankWater := stack(SedConScript, SedDrainCoverScript, SedManifoldScript, SedLaunderScript, SedHopperDrainScript, SedSludgeDrainScript, SedLamellaScript, SedSkimmerScript, SedHopperViewerScript, CompleteSedTank, SedTankArrayScript, SedFlocWeirScript, SedDiffuserScript, FinishSedChannelScript, SedInletDrainScript, SedOutletScript, SedWaterScript)
AC_SedTank := stack(SedConScript, SedDrainCoverScript, SedManifoldScript, SedLaunderScript, SedHopperDrainScript, SedSludgeDrainScript, SedLamellaScript, SedSkimmerScript, SedHopperViewerScript, CompleteSedTank, SedTankArrayScript, SedFlocWeirScript, SedDiffuserScript, FinishSedChannelScript, SedInletDrainScript, SedOutletScript)
AC_SedTank :=
    AC_SedTank if EN_Water == 0
    AC_SedTankWater otherwise
