# [reference: MasterProgram.xmcd]
# Automated Design: AutoCAD: Flocculation Tank
L_Sed = 9.52822 m
# Dimensions
totalfloc_dim := [
    L_FlocTank/N_FlocChannels;
    (N_FlocChannels*W_FlocChannel) + ((N_FlocChannels - 1)*T_PlantWall);
    H_Floc
]
wall_dim := [totalfloc_dim[0] + (2*T_PlantWall); T_PlantWall; totalfloc_dim[2]]
flocport_dim :=
    for i ∈ 0 .. (N_FlocChannels - 2)
        flocport_dim[0, i] ← [W_FlocPort[N_FlocChannels - 2 - i]; T_PlantWall; (-H_FlocPort)[i]]
    return flocport_dim
H_FlocPort = [0.82347; 0.80065; 0.760698; 0.760698; 0.760698] m
flocport_dim[0, 1] = [0.866822; 0.15; -0.80065] m
channelopening_dim := [W_InletChannel; T_PlantWall; H_InletChannel]
# Origin Points
floc_origin := [Plant_Origin[0]; Plant_Origin[1] + N_SedTanks*(W_Sed + T_PlantWall); Plant_Origin[2]]
wall_origin :=
    for i ∈ 0 .. (N_FlocChannels - 2)
        wall_origin[0, i] ← [
            Plant_Origin[0] - totalfloc_dim[0] - T_PlantWall;
            floc_origin[1] + (W_FlocChannel*(1 + i)) + (T_PlantWall*i);
            Plant_Origin[2]
        ]
    return wall_origin
flocport_origin :=
    for i ∈ 0 .. (N_FlocChannels - 2)
        if mod(i, 2) == 0
            flocport_origin[0, i] ← [
                Plant_Origin[0] - W_FlocPort[N_FlocChannels - 2 - i];
                floc_origin[1] + (W_FlocChannel*(1 + i)) + (T_PlantWall*i);
                H_Floc
            ]
        otherwise
            flocport_origin[0, i] ← [
                Plant_Origin[0] - totalfloc_dim[0];
                floc_origin[1] + (W_FlocChannel*(1 + i)) + (T_PlantWall*i);
                H_Floc
            ]
    return flocport_origin
flocport_origin = [[-0.866822; 7.64621; 2.34764], [-9.52822; 8.51542; 2.34764], [-0.441568; 9.38464; 2.34764], [-9.52822; 10.2538; 2.34764]] m
# The x values were negative. I don't understand how the change in the floc code caused this problem.
channelopening_origin := [
    floc_origin[0] - totalfloc_dim[0];
    floc_origin[1] - T_PlantWall;
    floc_origin[2] + totalfloc_dim[2] - H_InletChannel
]
Y_FlocBaffles :=
    for j ∈ 0 .. (N_FlocChannels - 1)
        Y_FlocBaffles[0, j] ← Plant_Origin[1] + (N_SedTanks*(W_Sed + T_PlantWall)) + ((N_FlocChannels - j - 1)*(W_FlocChannel + T_PlantWall))
    return Y_FlocBaffles
flocport_origin[0, 0] = [-0.866822; 7.64621; 2.34764] m
flocport_dim[0, 0] = [0.866822; 0.15; -0.82347] m
# Flocculation Tank Script
Floctanktankscript :=
    layer1 ← layer_new("floctank", dkgrey)
    tank1 ← Tank(floc_origin, totalfloc_dim, T_PlantWall)
    layerset1 ← layer_set("0")
    layerfreeze1 ← layer_freeze("floctank")
    one ← stack(layer1, tank1, layerset1, layerfreeze1)
    return one
Floctankwallscript :=
    local ← layer_new("floctankwall", dkgrey)
    for i ∈ 0 .. (N_FlocChannels - 2)
        local ← stack(local, box(wall_origin[0, i], wall_origin[0, i] + wall_dim), box(flocport_origin[0, i], flocport_origin[0, i] + flocport_dim[0, i]), subtractD(wall_origin[0, i], flocport_origin[0, i]))
        local
    layerset2 ← layer_set("0")
    layerthaw2 ← layer_thaw("floctank")
    bigunion1 ← union_allA
    layerfreeze2 ← layer_freeze("floctankwall")
    local ← stack(local, layerset2, layerthaw2, bigunion1, layerset2, layerfreeze2)
    return local
Floctankchannelopeningscript :=
    layer3 ← layer_new("flocchannelhole", dkgrey)
    box3 ← box(channelopening_origin, channelopening_origin + channelopening_dim)
    layerset3 ← layer_set("0")
    layerthaw3 ← layer_thaw("floctankwall")
    viewtop ← viewtop1
    subtract3 ← subtractD(floc_origin, [
        floc_origin[0] - totalfloc_dim[0];
        floc_origin[1] - T_PlantWall;
        floc_origin[2] + totalfloc_dim[2] - H_InletChannel
    ])
    bigunion ← union_allA
    layerfreeze3 ← layer_freeze("floctankwall")
    one ← stack(layer3, box3, layerset3, layerthaw3, viewtop, subtract3, bigunion, layerfreeze3)
    return ← one
Floctankbafflescript :=
    local ← layer_new("baffle", ltpurple)
    x(j) ←
        a ← 0
        for t ∈ 0 .. (rows(X_FlocBaffles) - 1)
            a ← a + 1 if X_FlocBaffles[t, j] ≠ 0
        return a
    for j ∈ 0 .. (N_FlocChannels - 1)
        for i ∈ 0 .. (x(j) - 1)
            baffle_origin[i] ← [Plant_Origin[0] - L_Sed; 0; Plant_Origin[2]] + [X_FlocBaffles[i, j]; Y_FlocBaffles[0, j]; Z_FlocBaffles[i, j]]
            baffle_length[i] ← L_FlocBaffles[i, j]
            local ← stack(local, lamina(baffle_origin[i], Amp_FlocBaffle, W_FlocChannel, baffle_length[i], T_FlocBaffle, Per_FlocBaffle, AN_FlocBaffle, N_Baffle, N_FlocBaffleCol, X_FlocBaffle, Y_FlocBaffle)) if Baffle_complex == 1
            local ← stack(local, laminaplain1(baffle_origin[i], W_FlocChannel, baffle_length[i], T_FlocBaffle, AN_FlocBaffle, N_Baffle, N_FlocBaffleCol, X_FlocBaffle)) otherwise
            local
        local
    return local
Floctankendscript :=
    layerset ← layer_set("0")
    layerfreeze1 ← layer_freeze("baffle")
    one ← stack(layerset, layerfreeze1)
    return one
FlocTank := stack(Floctanktankscript, Floctankwallscript, Floctankchannelopeningscript, Floctankbafflescript, Floctankendscript)
# [component: inputs FlocTank]
