# [reference: MasterProgram.xmcd]
s1 := W_Sed/(3 m) = 0.666667
lamina1(origin, amp, w, l, t, periods, angle, l_platetotal, l_module, ND_pipe, num_bafflecols, xspace, yspace) :=
    n_modules ← l_platetotal/l_module
    n_moduleplates ← ceil(l_module/xspace)
    origin_pipe1 ← [origin[1]; origin[2] + (l - l_module*cos(angle)); origin[0]]
    origin_pipe2 ← [origin_pipe1[0]; origin_pipe1[1] + 0.5*l_module*cos(angle); origin_pipe1[2]]
    length_pipe1 ← l_module*sin(angle)
    length_pipe2 ← 0.5*length_pipe1
    lamina[0] ← concat(zoom_wina([origin[0] - w - zc; origin[1]; origin[2]], [origin[0] + w + zc; origin[1] + l + zc; origin[2]]), "spline")
    for i ∈ 0 .. periods*4
        lamina_last ← origin + [sin(π/2*i)*amp; i*w/(periods*4); 0]
        lamina[i + 1] ← point(lamina_last)
    lamina[i + 2] ← concat(sp, point(origin - zc_point))
    lamina[i + 3] ← point(lamina_last + zc_point)
    lamina[i + 4] ← "offset"
    lamina[i + 5] ← stringit(t)
    lamina[i + 6] ← point(origin)
    lamina[i + 7] ← point(origin + [t; 0; 0])
    line[0] ← concat(point(origin), sp, point(origin + [t; 0; 0]))
    line[1] ← concat(point(lamina_last), sp, point(lamina_last + [t; 0; 0]))
    lamina[i + 8] ← concat(sp, "line", sp, line[0], sp)
    lamina[i + 9] ← concat("line", sp, line[1], sp)
    lamina[i + 10] ← concat("z e region w", sp, point(origin - [amp; 0; 0]), sp, point(lamina_last + [t + amp; 0; 0]), sp)
    lamina[i + 11] ← concat("extrude", sp, point(origin), sp, sp, stringit(l), sp, "0")
    lamina[i + 12] ← viewrightside1
    lamina[i + 13] ← Pipe(origin_pipe1, ND_pipe, length_pipe1, EN_PipeSpec)
    lamina[i + 14] ← Pipe(origin_pipe2, ND_pipe, length_pipe2, EN_PipeSpec)
    lamina[i + 15] ← viewrightside1
    lamina[i + 16] ← concat("move", sp, point([origin_pipe1[0]; origin_pipe1[1] + innerdiameter(ND_pipe, EN_PipeSpec)/2; origin_pipe1[2]]), sp, point([origin_pipe2[0]; origin_pipe2[1] + innerdiameter(ND_pipe, EN_PipeSpec)/2; origin_pipe1[2]]), sp, sp, point(origin_pipe1), sp, point([origin_pipe1[0] + W_Sed/6; origin_pipe1[1]; origin_pipe1[2]]))
    lamina[i + 17] ← concat("-array", sp, point([
        origin_pipe1[0] + W_Sed/6;
        origin_pipe1[1] + innerdiameter(ND_pipe, EN_PipeSpec)/2;
        origin_pipe1[2]
    ]), sp, point([
        origin_pipe2[0] + W_Sed/6;
        origin_pipe2[1] + innerdiameter(ND_pipe, EN_PipeSpec)/2;
        origin_pipe1[2]
    ]), sp, sp, "R", sp, "1", sp, "3", sp, num2str(s1))
    lamina[i + 18] ← viewfront1
    lamina[i + 19] ← concat("rotate3d", sp, "all", sp, sp, "z", sp, point([origin[0]; origin[2]; origin[1]]), sp, num2str(90 - angle/deg)) if angle ≠ 90 deg
    lamina[i + 20] ← concat("-array", sp, point([origin[0]; origin[2]; origin[1]]), sp, sp, "R", sp, num2str(num_bafflecols), sp, num2str(n_moduleplates), sp)
    lamina[i + 21] ← concat(stringit(xspace)) if n_moduleplates > 1
    lamina[i + 21] ← "" otherwise
    lamina[i + 22] ← concat(stringit(yspace)) if num_bafflecols > 1
    lamina[i + 22] ← "" otherwise
    lamina[i + 23] ← " z e"
    lamina
W_Sed/3 = 0.666667 m
laminar := lamina1(lamina_origin, Amp_SedPlate, W_Sed, L_SedPlate, T_SedPlate, Per_SedPlate, AN_SedPlate, L_SedActive, L_SedModule, ND_SedModulePipe, N_SedPlateCol, B_SedPlateHorizontal, Y_SedPlate)
2/3
# [component: inputs laminar]
