# [reference: MasterProgram.xmcd]
T_LaunderCap := outerradius(ND_SedLaunder) - innerdiameter(ND_SedLaunder, EN_PipeSpec)/2
L_SedLaunder :=
    (L_Sed - W_InletChannel - W_ExitChannel - T_ChannelWall - CouplingLength(ND_SedLaunder) - CouplingLengthFlex(ND_SedLaunder) + SocketDepthFlex(ND_SedLaunder)) - T_LaunderCap if CouplingLength(ND_SedLaunder) ≥ T_ChannelWall
    (L_Sed - W_InletChannel - W_ExitChannel - 2*T_ChannelWall - CouplingLengthFlex(ND_SedLaunder) + SocketDepthFlex(ND_SedLaunder)) - T_LaunderCap otherwise
# [component: inputs SedLaunderscript]
PVCCouplingNew_origin := [
    Plant_Origin[0] - W_ExitChannel - SocketDepth(ND_SedLaunder);
    Plant_Origin[1] + W_Sed/(N_SedLaunders*N_SedBays*2);
    Plant_Origin[2] + HW_Sed - H_SedAbove + outerradius(ND_SedLaunder)
]
FlexCouplingNew_origin := [
    {
        (Plant_Origin[0] - W_ExitChannel - CouplingLength(ND_SedLaunder)) if CouplingLength(ND_SedLaunder) ≥ T_PlantWall
        Plant_Origin[0] - W_ExitChannel - T_ChannelWall otherwise
    };
    Plant_Origin[1] + W_Sed/(N_SedLaunders*N_SedBays*2);
    Plant_Origin[2] + HW_Sed - H_SedAbove + outerradius(ND_SedLaunder)
]
SedLaunderNippleNew_origin := [
    PVCCouplingNew_origin[0] - CouplingLength(ND_SedLaunder) + (2*SocketDepth(ND_SedLaunder));
    Plant_Origin[1] + W_Sed/(N_SedLaunders*N_SedBays*2);
    Plant_Origin[2] + HW_Sed - H_SedAbove + outerradius(ND_SedLaunder)
]
SedLaunderNew_origin := [
    FlexCouplingNew_origin[0] - SocketDepthFlex(ND_SedLaunder);
    Plant_Origin[1] + W_Sed/(N_SedLaunders*N_SedBays*2);
    Plant_Origin[2] + HW_Sed - H_SedAbove + outerradius(ND_SedLaunder)
]
LaunderCapNew_origin := [
    SedLaunderNew_origin[0] - L_SedLaunder;
    Plant_Origin[1] + W_Sed/(N_SedLaunders*N_SedBays*2);
    Plant_Origin[2] + HW_Sed - H_SedAbove + outerradius(ND_SedLaunder)
]
LengthSedLaunderNipple :=
    (SocketDepth(ND_SedLaunder) + SocketDepthFlex(ND_SedLaunder)) if CouplingLength(ND_SedLaunder) ≥ T_PlantWall
    (SocketDepth(ND_SedLaunder) + SocketDepthFlex(ND_SedLaunder) + (T_PlantWall - CouplingLength(ND_SedLaunder))) otherwise
CylinderF(OriginPoint, Radius, Length, AngleVector)
T_PVCCoupling := T_LaunderCap
array_all(nrow, ncol, dist) := concat("-array", sp, "all", sp, sp, "R", sp, stringit_nounits(nrow), sp, stringit_nounits(ncol), sp, stringit(dist))
SedLaunderScriptNEW :=
    LayerNew1 ← layer_new("launder", pastelgreen)
    LaunderPipe ← PipeF(SedLaunderNew_origin, L_SedLaunder, [0 deg; 0 deg], ND_SedLaunder, EN_PipeSpec)
    FreezeLaunder ← FreezeLayer("launder")
    Orifice1 ← CylinderF([SedLaunderNew_origin[0] - B_SedLaunderOrifices; SedLaunderNew_origin[1]; SedLaunderNew_origin[2]], D_SedLaunderOrifice/2, outerdiameter(ND_SedLaunder), [-60 deg; 90 deg; 0 deg])
    Orifice2 ← CylinderF([SedLaunderNew_origin[0] - B_SedLaunderOrifices; SedLaunderNew_origin[1]; SedLaunderNew_origin[2]], D_SedLaunderOrifice/2, outerdiameter(ND_SedLaunder), [60 deg; 90 deg; 0 deg])
    OrificeArray ← array_all(1, N_SedLaunderOrifices, -B_SedLaunderOrifices)
    GroupOrifice ← GroupAll("DeleteMe")
    SubtractOrifices ← SubtractF(["launder"], "DeleteMe")
    ThawLaunder ← SelectLayer("launder")
    FreezeLaunderAgain ← FreezeLayer("launder")
    LayerNew2 ← layer_new("PVCCoupling", turquoise)
    PVCCoupling ← CouplingSUBF(PVCCouplingNew_origin, [0 deg; 0 deg], ND_SedLaunder, EN_PipeSpec, ["tank"])
    FreezePVCCoupling ← FreezeLayer("PVCCoupling")
    LayerNew3 ← layer_new("SedLaunderNipple", red)
    SedLaunderNipple ←
        PipeF(SedLaunderNippleNew_origin, LengthSedLaunderNipple, [0 deg; 0 deg], ND_SedLaunder, EN_PipeSpec) if CouplingLength(ND_SedLaunder) ≥ T_ChannelWall
        PipeSUBF(SedLaunderNippleNew_origin, LengthSedLaunderNipple, [0 deg; 0 deg], ND_SedLaunder, EN_PipeSpec, ["tank"]) otherwise
    FreezeSedLaunderNipple ← FreezeLayer("SedLaunderNipple")
    LayerNew4 ← layer_new("FlexCoupling", pastelyellow)
    FlexCoupling ← FlexCouplingF(FlexCouplingNew_origin, [0 deg; 0 deg], ND_SedLaunder)
    FreezeFlexCoupling ← FreezeLayer("FlexCoupling")
    LayerNew5 ← layer_new("LaunderCap", yellow)
    LaunderCap ← CapF(LaunderCapNew_origin, [0 deg; 180 deg], ND_SedLaunder)
    FreezeLaunderCap ← FreezeLayer("LaunderCap")
    StackEverything ← stack(LayerNew1, LaunderPipe, FreezeLaunder, Orifice1, Orifice2, OrificeArray, GroupOrifice, SubtractOrifices, ThawLaunder, FreezeLaunderAgain, LayerNew2, PVCCoupling, FreezePVCCoupling, LayerNew3, SedLaunderNipple, FreezeSedLaunderNipple, LayerNew4, FlexCoupling, FreezeFlexCoupling, LayerNew5, LaunderCap, FreezeLaunderCap)
    return StackEverything
# [component: inputs SedLaunderScriptNEW]
SedLaunderScriptNEW = [
    "-layer m launder"; "c t 212,255,170"; "launder"; "  "; "_cylinder -0.57397,0.54,1.54533 0.05715 c -3.25796,0.54,1.54533"; "_cylinder -0.56397,0.54,1.54533 0.0525 c -3.26796,0.54,1.54533"; "_zoom w -3.26796,0.47285,1.54533 -3.24796,0.60715,1.54533"; "_subtract -3.25796,0.59715,1.54533  -3.26796,0.5925,1.54533 "; "-group c launder y "; "all "
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]
