# BASIC INPUTS
# Overall Plant Inputs
# Only parameters with units need to be entered in this file. The units must be attached as SI (meters, kg, s)
Q_Plant := 10*L/s
T_PlantWall := .15*m
T_ConcreteMin := 5 cm
EN_DrillSeries := 1
# Chemical Storage Tanks, Entrance Tank
# and Rapid Mixer Inputs
C_AlumDoseMax := 90*mg/L
C_AlumStock := 120*gm/L
Ti_AlumStock := 30 hr
# Flocculator Inputs
T_FlocBaffleRigidH := 10 cm
T_FlocBaffleRigidV := 5 cm
T_FlocBaffle := 4 cm
H_FlocOption := 0
# Sedimentation Inputs
N_SedTanks := 2
N_SedBaysEst := 2
W_SedPlate := 1*m
L_SedPlateSheet := 12 ft
T_SedPlate := 3 mm
T_SedWeir := 4 cm
# code fixes to handle poor definition of input variables. These variables need to be replaced in all code and in the VNG
EN_FcmTube := 0
EN_PipeSpec := 0
W_SedBay := W_SedPlate
W_Plastic := W_SedPlate
C_FcmDoseMax := C_AlumDoseMax
C_FcmAlum := C_AlumStock
Ti_StockMin := Ti_AlumStock
