# Stand alone chemical dosers for India
# MathCAD References
# [reference: ExpertInputs.xmcd]
# Variables Changed after Expert Inputs:
HL_LfomMin := 20 cm  # Changed to 10 cm to shorten the chemical dosing tubes
HL_LfomMax := 20 cm
HL_CdcCoag := HL_LfomMin
HL_CdcChlorine := HL_LfomMin
C_ChlorineStockMax := 3*gm/L
EN_Chlorine := 2
C_CoagStockMax = 200 gm/L
# Note that the ratio of stock to max dose is the same for chlorine and coagulant and that gives the same design for each doser (given that the viscosity is almost the same for both stocks).
C_ChlorineDoseMax = 2 mgm/L
# [reference: MathFunctions.xmcd]
# [reference: PipeDatabase - may.xmcd]
# [reference: MaterialsDatabase.xmcd]
# power supply for afternoon 3-4 hrs
# fill up tank, no outflow
# 6-9 supply AM, no inflow
# in 3 hrs 3/4 empty, wait for power
# fill up, no outflow
# 6-8 in PM provide service
# [reference: FluidsFunctions.xmcd]
# [reference: CdcFunctions.xmcd]
D_TubeAvailable := [2; 3; 4; 5; 6]*in/16
# Assumptions
ND_FiDrainValve := 1 in
T_TankWall := 25 cm
L_Wall := 3 m
T_EtBaffle := 5 cm
PS_Fi := 2
H_Bucket5Gal := 50 cm
T_Separator := 15 cm
W_Wall := 3 m
T_Et := 7.5 cm
V_FiUpflow := 11*mm/s
H_Freeboard := 10 cm
D_Bucket5Gal := 30 cm
L_TankOffset := 1.2 m
H_Wall := 3 m
T_FiLayer := 20 cm
S_FiInletMan := 40 cm
Z_BottomLowerTank := 6 m
Vol_OverheadTank := L_Wall*W_Wall*H_Wall
L_CdcTubeMax := L_Wall
S_Walkway := 60 cm
T_Platform := 15 cm
S_Walkway := 60 cm
# This is actual ID for 2.5 kg/cm^2 pipe
H_Room := 5.09 m
ND_SystemDrain := D_pipeschedule(3*L/s, PS_Fi, Z_BottomLowerTank + H_Room, Z_BottomLowerTank + H_Room, Nu_Water, E_Pvc, K_PipeExit + K_PipeEnt + K_El90*2) = 1.5 in
Q_Plant := 15*L/s
ND_ChemPlatformDrain := D_pipeschedule(3*L/s, PS_Fi, H_Room/2, 1.2*W_Wall, Nu_Water, E_Pvc, K_PipeExit + K_PipeEnt + K_El90*3) = 1.5 in
# LFOM, Entrance Tank
# [reference: LFOM.xmcd]
ND_RMPipe = 8 in
ND_EtFloat := 6 in
L_Et := 50 cm
W_Et := 50 cm
H_Et := 50 cm
HW_Et := H_Et - H_Freeboard
# Chem Doser, Storage, Calibration Columns
C_ChlorineStockMax := 10*gm/L
L_CdcChlorineTube := L_CdcTube(Q_Plant, C_ChlorineDoseMax, C_ChlorineStockMax, D_TubeAvailable, HL_CdcChlorine, L_CdcTubeMax, EN_Chlorine, K_CdcTube) = 1.51122 m
N_CdcChlorineTubes := N_CdcTube(Q_Plant, C_ChlorineDoseMax, C_ChlorineStockMax, D_TubeAvailable, HL_CdcChlorine, L_CdcTubeMax, EN_Chlorine, K_CdcTube) = 1
D_CdcChlorine := D_CdcTube(Q_Plant, C_ChlorineDoseMax, C_ChlorineStockMax, D_TubeAvailable, HL_CdcChlorine, L_CdcTubeMax, EN_Chlorine, K_CdcTube) = 2 in/16
Q_ChlorineStock := Q_Plant*C_ChlorineDoseMax/C_ChlorineStockMax = 3 mL/s
# Supplier Information:
# http://www.rotoplas.com/assets/files/industria/catalogo.pdf
# 5 gallon bucket
# Tank Diameter | Tank Height
# Tank Volume | http://www.mcmaster.com/#storage-buckets/=kd23oh
# 35 gallon drum
# http://www.jlmovingsupplies.com/c31/DIXIE-OPEN-CLOSED-HEAD-DRUMS-p36721.html
Vol_SupplierChemTank := [18.93 L; 113.56 L; 208.198 L; 450 L; 600 L; 750 L; 1100 L; 2500 L]
Dimensions_SupplierChemTank := [
    11.875 in, 17.75 in;
    20.75 in, 31.75 in;
    22.5 in, 33.5 in;
    0.85 m, 0.99 m;
    0.96 m, 1.10 m;
    1.10 m, 1.02 m;
    1.10 m, 1.39 m;
    1.55 m, 1.65 m
]
Ti_ChlorineStock := 20 day
Vol_ChlorineTank := CeilNearest(Ti_ChlorineStock*C_ChlorineDoseMax*L_Wall*W_Wall*H_Wall/day/C_ChlorineStockMax, Vol_SupplierChemTank) = 113.56 L
R_ChlorineTank := Dimensions_SupplierChemTank[:, 0][index(Vol_ChlorineTank, Vol_SupplierChemTank)]/2 = 0.263525 m
H_ChlorineTank := Dimensions_SupplierChemTank[:, 1][index(Vol_ChlorineTank, Vol_SupplierChemTank)] = 0.80645 m
L_ChemPlatform := 4*S_Fitting + 2*R_ChlorineTank + 2*R_ChlorineTank = 1.2541 m
W_ChemPlatform := 2*max(R_ChlorineTank, R_ChlorineTank) + 2*S_Fitting + S_Walkway = 1.22705 m
D_ChlorineFloatValveOrifice :=
    i ← 0
    while h_orifice(D_FltVlvOrificesAvail[i], Pi_VenaContractaOrifice, Q_ChlorineStock) ≥ H_CoagTankAboveHeadTank
        i ← i + 1
    return D_FltVlvOrificesAvail[i]
D_ChlorineFloatValveOrifice = 0.093 in
HL_ChlorineFloatValveOrifice := h_orifice(D_ChlorineFloatValveOrifice, Pi_VenaContractaOrifice, Q_ChlorineStock) = 6.01955 cm
HL_ChlorineTubeStockToCHMax := H_CoagTankAboveHeadTank - HL_ChlorineFloatValveOrifice = 23.9804 cm
D_ChlorineTubeStockToCHEst := NextLargest((128*Nu_Water*1*m*Q_ChlorineStock/(π*g*HL_ChlorineTubeStockToCHMax))^(1/4), D_TubeAvailable) = 1 in/8
D_ChlorineTubeStockToCH := max(3/8*in, D_ChlorineTubeStockToCHEst) = 3 in/8
HL_ChlorTubeStockToCHT := h_f(Q_ChlorineStock, D_ChlorineTubeStockToCH, 1 m, Nu_Water, E_Pvc) = 0.00151426 m
HL_ChlorStockToCHT := HL_ChlorineFloatValveOrifice + HL_ChlorTubeStockToCHT
H_CHTToStockOutlet := max(HL_ChlorStockToCHT, HL_ChlorStockToCHT, 15 cm)
H_CHTToStockBottom := H_CHTToStockOutlet - B_StockOutlet
# Calibration Column
SF_CalCol := 1.25
Ti_Res := 1.25*min
H_CalCol := 30 cm
Q_ChlorCalColMax := SF_CalCol*Q_ChlorineStock
Vol_ChlorCalCol := Ti_Res*Q_ChlorCalColMax
D_inChlorCCMin := sqrt(4*Vol_ChlorCalCol/(π*H_CalCol)) = 1.36021 in
ND_ChlorCalCol := NominalDiameter(D_inChlorCCMin, PS_Default)
D_inChlorCalCol := innerdiameter(ND_ChlorCalCol, PS_Default) = 1.734 in
# AutoCAD References
# AutoCAD drawing programs:
# Translators:
# These are the codes that take MathCAD outputs and create AutoCAD scripts that are used to draw the plant (formerly Basics)
# [reference: MtoATranslators.xmcd]
# The wrapped MtoA translator contains the functions that the user will want to access. These functions will draw pieces with full functionality - specifying the location, dimension, and orientation of the object. Also, it contains layer control and subtraction capabilities for grouped objects.
# [reference: MtoATranslatorsWrapped.xmcd]
# Drawing functions:
# [reference: ChannelF.xmcd]
# [reference: PlumbingF.xmcd]
# [reference: TankF.xmcd]
# [reference: StairsF.xmcd]
# Chemical Dose Controller For Overhead Tanks
# Storage Tank, Entrance Tank, Distribution Channel
Tank_Origin := [0; 0; 0]*m
FlowMeteringTank_Origin := [0; 0; H_Wall + T_TankWall] + Tank_Origin
RoomLyr := layer_new("Room", grey)
Room := Tank(Tank_Origin + [0; 0; H_Wall + T_TankWall], [L_Wall; W_Wall; H_Room], T_TankWall)
RoomFrz := FreezeLayer("Room")
StorageTankLyr := layer_new("StorageTank", grey)
FiTank := Tank(Tank_Origin, [L_Wall; W_Wall; H_Wall], T_TankWall)
StorageTanksFrz := FreezeLayer("StorageTank")
FlowMeteringTankLyr := layer_new("FlowMeteringTank", grey)
FlowMeteringTank := Tank(FlowMeteringTank_Origin, [L_Et; W_Et; H_Et], T_Et)
FlowMeteringTankFrz := FreezeLayer("FlowMeteringTank")
BaffleLyr := layer_new("Baffle", purple)
Baffle := BoxSUBF([-15 cm; -S_Fitting; 1.5*S_Fitting] + FlowMeteringTank_Origin, [-15 cm - T_SedWeir; W_Et + S_Fitting; H_Et] + FlowMeteringTank_Origin, [0; 0; 0]*deg, ["FlowMeteringTank"])
BaffleFrz := FreezeLayer("Baffle")
EtScript := stack(FlowMeteringTankLyr, FlowMeteringTank, FlowMeteringTankFrz, BaffleLyr, Baffle, BaffleFrz)
Tanks := stack(RoomLyr, Room, RoomFrz, StorageTankLyr, FiTank, StorageTanksFrz, EtScript)
# LFOM Plumbing
LfomCoupling_Origin := [-L_Et + S_Fitting + ConRadius(ND_RMPipe); W_Et/2; -SocketDepth(ND_RMPipe)] + FlowMeteringTank_Origin
RMPipeLyr := layer_new("RapidMixPipes", blue)
Lfom := PipeF(LfomCoupling_Origin, H_Et, [0; 90]*deg, ND_RMPipe, PS_Fi)
LfomOrifices :=
    Local ← Lfom
    for h ∈ 0 .. last(H_LfomOrifices)
        if N_LfomOrifices[h] ≠ 0
            Local ← stack(Local, CylinderF([
                LfomCoupling_Origin[0];
                LfomCoupling_Origin[1];
                FlowMeteringTank_Origin[2] + CapHeight(ND_EtFloat) + S_Fitting + H_LfomOrifices[h]
            ], D_LfomOrifices/2, outerradius(ND_RMPipe) + zc, [
                (asin(0.5*S_LfomOrificesMin/(2*outerradius(ND_RMPipe))) + asin(D_LfomOrifices/(2*outerradius(ND_RMPipe))))*(mod(h, 2) == 0);
                0 deg
            ]))
        if N_LfomOrifices[h] > 1
            Local ← stack(Local, ArrayLastPolar([
                LfomCoupling_Origin[0];
                LfomCoupling_Origin[1];
                FlowMeteringTank_Origin[2] + CapHeight(ND_EtFloat) + S_Fitting + H_LfomOrifices[h]
            ], N_LfomOrifices[h], (N_LfomOrifices[h] - 1)*(2*asin(D_LfomOrifices/(2*outerradius(ND_RMPipe))) + 2*asin(S_LfomOrificesMin/(2*outerradius(ND_RMPipe))))))
    return Local
SubtractLfomOrifices := stack(view("t"), SubtractAll(LfomCoupling_Origin + [0; outerradius(ND_RMPipe); 0]))
RMPipeFrz := FreezeLayer("RapidMixPipes")
RMPipes := stack(RMPipeLyr, LfomOrifices, SubtractLfomOrifices, RMPipeFrz)
RMFitLyr := layer_new("RapidMixFittings", green)
RMCoupling := CouplingSUBF(LfomCoupling_Origin, [0; 270; 0]*deg, ND_RMPipe, PS_Fi, ["FlowMeteringTank"])
RMFitFrz := FreezeLayer("RapidMixFittings")
RMFittings := stack(RMFitLyr, RMCoupling, RMFitFrz)
RMPlumbing := stack(RMPipes, RMFittings)
# Chemical Doser
LA_Origin := [
    FlowMeteringTank_Origin[0] - L_Et - T_Et;
    FlowMeteringTank_Origin[1] + S_EtFloat/2 + W_Et/2;
    FlowMeteringTank_Origin[2] + H_Et + D_LABOrigintoLAOriginZ
] = [-0.575; 0.3; 3.7754] m
LA2_Origin := [LA_Origin[0]; LA_Origin[1] - S_EtFloat - 1/8*in; LA_Origin[2]] = [-0.575; 0.196825; 3.7754] m
LADtFitting_Origin := [
    LA_Origin[0] + L_CdcLever - L_LAOriginToDtY + innerdiameter(ND_DropTube, PS_Modules)/2 - .02 in;
    LA_Origin[1] + 1/8*in + L_LAOriginToDtCenterX;
    L_LAOriginToDtZ + LA2_Origin[2]
]
LAReducerFitting_Origin := [-L_LAOriginToReducerY - T_CdcReducer + L_CdcLever/2; L_LAOriginToReducerX; L_LAOriginToDtZ] + LA_Origin
LADt_Center := [
    LA_Origin[0] + L_CdcLever - L_LAOriginToDtY;
    LA_Origin[1] + L_LAOriginToDtCenterX;
    LA_Origin[2] + L_LAOriginToDtZ + H_LeverArm
]
LAReducer_Center := LA_Origin + [-L_LAOriginToReducerCenterY; L_LAOriginToReducerCenterX; L_LAOriginToDtZ]
LA2DtFitting_Origin := [
    LA2_Origin[0] + L_CdcLever - L_LAOriginToDtY + innerdiameter(ND_DropTube, PS_Modules)/2 - .02 in;
    LA2_Origin[1] + 1/8*in + L_LAOriginToDtCenterX;
    LA2_Origin[2] + L_LAOriginToDtZ
]
LA2ReducerFitting_Origin := [-L_LAOriginToReducerY - T_CdcReducer + L_CdcLever/2; L_LAOriginToReducerX; L_LAOriginToDtZ] + LA2_Origin
LA2Dt_Center := [
    LA2_Origin[0] + L_CdcLever - L_LAOriginToDtY;
    LA2_Origin[1] + L_LAOriginToDtCenterX;
    LA2_Origin[2] + L_LAOriginToDtZ + H_LeverArm
]
LA2Reducer_Center := LA2_Origin + [-L_LAOriginToReducerCenterY; L_LAOriginToReducerCenterX; L_LAOriginToDtZ]
CdcSliderLyr := layer_new("CdcSlider", grey)
SliderNorth := BoxF([LADt_Center[0] - 1 in; LADt_Center[1] - outerradius(ND_DropTube); LA_Origin[2] - 1/4*in], [
    LADt_Center[0] + 1 in;
    LADt_Center[1] - outerradius(ND_DropTube) - 3/4*in;
    LA_Origin[2] + H_LeverArm - 1/4*in
], [0; 0; 0]*deg)
SliderSouth := BoxF([
    LA2Dt_Center[0] - 1 in;
    LADt_Center[1] - outerradius(ND_DropTube) - S_EtFloat - 1/8*in;
    LA_Origin[2] - 1/4*in
], [
    LA2Dt_Center[0] + 1 in;
    LADt_Center[1] - outerradius(ND_DropTube) - 3/4*in - S_EtFloat - 1/8*in;
    LA_Origin[2] + H_LeverArm - 1/4*in
], [0; 0; 0]*deg)
CdcSliderFrz := FreezeLayer("CdcSlider")
NorthLArmSubBox := BoxF([LADt_Center[0] - 2 in; LA_Origin[1] + 1/8*in; LA_Origin[2]], [LADt_Center[0] + 2 in; LA_Origin[1]; LA_Origin[2] + H_LeverArm], [0; 0; 0]*deg)
SouthLArmSubBox := BoxF([LA2Dt_Center[0] - 2 in; LA_Origin[1] - S_EtFloat - 1/8*in; LA_Origin[2]], [LA2Dt_Center[0] + 2 in; LA_Origin[1] - S_EtFloat; LA_Origin[2] + H_LeverArm], [0; 0; 0]*deg)
SubtractLArm := SubtractF(["CdcSlider"], "DeleteMe")
CdcSlider := stack(CdcSliderLyr, SliderNorth, SliderSouth, CdcSliderFrz, NorthLArmSubBox, SouthLArmSubBox, GroupDelete, SubtractLArm)
W_Bracket := 2 in
CdcBracketLyr := layer_new("CdcBracket", ltgrey)
BracketOuter := BoxF([LA_Origin[0]; LA_Origin[1] + 1/4*in; FlowMeteringTank_Origin[2] + H_Et], [LA_Origin[0] + W_Bracket; LA_Origin[1] - S_EtFloat - 1/4*in; LA_Origin[2] + H_LeverArm], [0; 0; 0]*deg)
CdcBracketFrz := FreezeLayer("CdcBracket")
BracketInner := BoxF([LA_Origin[0] - zc; LA_Origin[1] + 1/8*in; FlowMeteringTank_Origin[2] + H_Et + 1/8*in], [LA_Origin[0] + 2 in + zc; LA_Origin[1] - S_EtFloat - 1/8*in; LA_Origin[2] + H_LeverArm + 1/8*in], [0; 0; 0]*deg)
SubtractBracket := SubtractF(["CdcBracket"], "DeleteMe")
CdcBracket := stack(CdcBracketLyr, BracketOuter, CdcBracketFrz, BracketInner, GroupDelete, SubtractBracket)
CdcLayer := layer_new("CdcLayer", ltgrey)
LArmOuter := BoxF([LA_Origin[0] - L_CdcLever - 1/2*in; LA_Origin[1] + 1/8*in; LA_Origin[2]], [LA_Origin[0] + L_CdcLever + 1/2*in; LA_Origin[1] - S_EtFloat - 1/8*in; LA_Origin[2] + H_LeverArm], [0; 0; 0]*deg)
LArmInner := BoxF([LA_Origin[0] - L_CdcLever; LA_Origin[1]; LA_Origin[2] - zc], [LA_Origin[0] + L_CdcLever; LA_Origin[1] - S_EtFloat; LA_Origin[2] + H_LeverArm + zc], [0; 0; 0]*deg)
SubtractLArmInner := SubtractF(["CdcLayer"], "DeleteMe")
SelectCdcLyr := SelectLayer("CdcLayer")
LArmBar := CylinderSUBF([LA_Origin[0] + W_Bracket/2; LA_Origin[1] + 1/2*in; LA_Origin[2] + H_LeverArm/2], R_LArmBar, S_EtFloat + 1 in, [90; 0]*deg, ["CdcLayer"])
DropTube1 := PipeF(LADt_Center, L_DropTube, [0; -90]*deg, ND_DropTube, PS_Modules)
InsertCht := insertdwg("https://confluence.cornell.edu/download/attachments/173604905/CdcCht.dwg", CHT_Origin, 1, 1, 90 deg)
DropTube2 := PipeF(LA2Dt_Center, L_DropTube, [0; -90]*deg, ND_DropTube, PS_Modules)
InsertCht2 := insertdwg("https://confluence.cornell.edu/download/attachments/173604905/CdcCht.dwg", CHT2_Origin, 1, 1, 90 deg)
FreezeCdcLayer := FreezeLayer("CdcLayer")
CdcFloatLyr := layer_new("CdcFloat", yellow)
L_CdcFloat := LA_Origin[2] - (FlowMeteringTank_Origin[2] + H_Et - H_Freeboard - HL_Lfom + CapHeight(ND_EtFloat)) = 0.1984 m
FloatCable := CylinderF([
    LA_Origin[0] + L_CdcLever;
    FlowMeteringTank_Origin[1] + W_Et/2;
    FlowMeteringTank_Origin[2] + H_Et - H_Freeboard - HL_Lfom + CapHeight(ND_EtFloat)
], D_Cable, L_CdcFloat, [0; 90]*deg)
CdcFloatCapTop := CapF([
    LA_Origin[0] + L_CdcLever;
    FlowMeteringTank_Origin[1] + W_Et/2;
    FlowMeteringTank_Origin[2] + H_Et - H_Freeboard - HL_Lfom + CapHeight(ND_EtFloat) - CapThickness(ND_EtFloat)
], [0; -90]*deg, ND_EtFloat)
CdcFloatCapBottom := CapF([
    LA_Origin[0] + L_CdcLever;
    FlowMeteringTank_Origin[1] + W_Et/2;
    FlowMeteringTank_Origin[2] + H_Et - H_Freeboard - HL_Lfom - CapHeight(ND_EtFloat) + CapThickness(ND_EtFloat)
], [0; 90]*deg, ND_EtFloat)
CdcFloatPipe := PipeF([
    LA_Origin[0] + L_CdcLever;
    FlowMeteringTank_Origin[1] + W_Et/2;
    FlowMeteringTank_Origin[2] + H_Et - H_Freeboard - HL_Lfom + CapHeight(ND_EtFloat) - CapThickness(ND_EtFloat)
], 2*CapHeight(ND_EtFloat) - 2*CapThickness(ND_EtFloat), [0; -90]*deg, ND_EtFloat, PS_Default)
CdcFloatFrz := FreezeLayer("CdcFloat")
CdcFloat := stack(CdcFloatLyr, FloatCable, CdcFloatCapTop, CdcFloatCapBottom, CdcFloatPipe, CdcFloatFrz)
ChemDoser := stack(CdcSlider, CdcBracket, CdcLayer, LArmOuter, FreezeCdcLayer, LArmInner, GroupDelete, SubtractLArmInner, SelectCdcLyr, LArmBar, DropTube1, DropTube2, FreezeCdcLayer, CdcFloat)
# Chem Tanks
CoagTank_Origin := [
    -R_ChlorineTank + ChemPlatform_Origin[0] - S_Fitting/2;
    -(S_Fitting/2 + R_CoagTank) + ChemPlatform_Origin[1] + W_ChemPlatform;
    ChemPlatform_Origin[2]
]
ChemTankLyr := layer_new("ChemicalTanks", yellow)
CoagTank := CylinderF(CoagTank_Origin, R_CoagTank + T_ChemTankWall, H_CoagTank + T_ChemTankWall, [0; 90]*deg)
ChemTankFrz := FreezeLayer("ChemicalTanks")
CoagTankInner := CylinderF(CoagTank_Origin + [0; 0; T_ChemTankWall], R_CoagTank, H_CoagTank, [0; 90]*deg)
HollowTanks := SubtractF(["ChemicalTanks"], "DeleteMe")
ChemTanksScript := stack(ChemTankLyr, CoagTank, ChemTankFrz, CoagTankInner, GroupDelete, HollowTanks)
