# [reference: MasterProgram.xmcd]
Q_AlumStockMax := Q_Plant*C_FcmDoseMax/C_FcmAlum
# Currently defined in VNG as the volume of the stock tank IN the FCM. Is this correct?
H_AlumTank := (Q_AlumStockMax/(Pi_VenaContractaOrifice*(.5*D_FcmValveOrifice)^2*π))^2/(2*g) + .1 m
V_AlumTank := Ti_StockMin*Q_AlumStockMax
W_AlumTank := (V_AlumTank/H_AlumTank)^.5
# Correction To make tanks at least as high as they are wide
H_AlumTank :=
    H_AlumTank if (H_AlumTank ≥ W_AlumTank)
    W_AlumTank if H_AlumTank < W_AlumTank
W_AlumTank := (V_AlumTank/H_AlumTank)^.5
L_AlumTank := W_AlumTank
