# INDEX
# Basis of Design Assumptions | Click on these titles to go to that section:
# Drum  Parameters
# Flocculation tank assumptions
# Used throughout program
sedlayout := 2
Plant_Origin := [0; 0; 0]*m
Rho_H2O := 1000*kg/m^3  # Density of water
Rho_FB := 1001*kg/m^3  # Density of Flocs
# Sedimentation tank assumptions
Nu_Water := 1*10^-6*m^2/s  # The kinematic viscosity of water.  # Launder Design and Sludge Assumptions
Re_PipeTransition := 2100  # Sedtank Drain assumptions
E_Pvc := 0.12 mm
# Plant Leveling Tank assumptions
E_Concrete := 2 mm
# Grit Chamber assumptions
E_ConcreteLedge := 0.014 mm
# Channel assumptions
# Chemical Feed Stock Assumptions:
# Plant Elevation Design Assumptions
# Minor Loss Coefficients
S_Walkway := 1.5 m
S_Elbow := 5 cm
S_Fitting := 5 cm  # minimum space between fittings in a tank
T_PltWall := T_PlantWall  # error: This variable is undefined.
T_EtWall := T_PlantWall  # error: This variable is undefined.
T_ChannelWall := T_PlantWall  # error: This variable is undefined.
# Inlet Channel Assumptions:
S_SedInletChannelMin := 3 cm  # This is the space needed around the pipe delivering water from the inlet channel to the sed tank
Perpindicular_Weir := 0
Parallel_Weir := 1
# Sedimentation tank assumptions
Pi_SedAboveW := 0.12
# This is the ratio between the depth of the water between the top of the plate settlers and the effluent launders and the spacing between effluent launders
# height of water above the lamella over the width of the sed tank
# 12cm/42in
Pi_SedCell := 2
# This is equivalent to saying that all of the kinetic energy contained in the flow will be dissipated over a length scale of 2 times the smallest dimension of flow.
# SedPlate Characteristics
N_SedPlateCol := 1  # number of columns of Plate Settlers - this is a constant!
Y_SedPlate := 0 cm
# Entrance Tank assumptions
HL_EtFloc := 5 cm
H_LfomSF := 5 cm
N_Lfom := 1
HW_EtMin := 20 cm  # Minimum water level in the entrance tank
# Difference between the height of the water in floc tank and the bottom set of holes on the linear flow orifice meter
H_LfomFreefall := 5 cm
# Both of these assumptions were tested over a range of flow rates and found to give reasonable Lfom configurations.
L_RmPipe := 20 cm
# The total pipe length between the orifices and the flocculator (rapid mix pipe) .
N_RmEl := 0
# Pipe connecting the Grit chamber to the floc tank has three elbows. Based on how the AutoCAD team draws this pipe. The minor loss coefficient for this is K.el90
N_RmTee := 0
# Pipe connecting the Grit chamber to the floc tank has one T. Based on how the AutoCAD team draws this pipe. The minor loss coefficient for this is either K.Tflowbr
HL_RmDesign := 20 cm
# This is the allowable head loss through the rapid mix pipe and is what is used to size the pipes from the grit chamber to the flocculator AND the flow measurement tubes in the grit chamber
HL_Lfom := 20 cm  # Head loss through the Lfom, and the minimum height of the water in the entrance tank.
B_LfomOrifice := 2 cm  # Veritical distance between orifices
H_dmax := 20 cm
Pi_Sutro := 0.1
Pi_Lfomorifice := 20
D_DrillEng :=
    i ← 0
    D_DrillEng[0] ← 1/32*in
    while D_DrillEng[i] ≤ 3/16*in - 1/128*in
        i ← i + 1
        D_DrillEng[i] ← D_DrillEng[i - 1] + 1/128*in
    while D_DrillEng[i] < 1 in - 1/16*in
        i ← i + 1
        D_DrillEng[i] ← D_DrillEng[i - 1] + 1/16*in
    while D_DrillEng[i] < 2 in
        i ← i + 1
        D_DrillEng[i] ← D_DrillEng[i - 1] + 1/4*in
    return D_DrillEng
D_DrillMet :=
    i ← 0
    D_DrillMet[0] ← 0.5 mm
    while D_DrillMet[i] ≤ 5 mm - 0.1 mm
        i ← i + 1
        D_DrillMet[i] ← D_DrillMet[i - 1] + 0.1 mm
    while D_DrillMet[i] < 20 mm
        i ← i + 1
        D_DrillMet[i] ← D_DrillMet[i - 1] + 1 mm
    while D_DrillMet[i] < 50 mm
        i ← i + 1
        D_DrillMet[i] ← D_DrillMet[i - 1] + 2 mm
    return D_DrillMet
D_Drill :=
    D_Drill ← D_DrillEng if EN_DrillSeries == 0
    D_Drill ← D_DrillMet otherwise  # error: This variable is undefined.
# Rapid Mix assumptions
Pi_Dmix := 2.4  # ratio of diffusion length scale to kolmogorov length scale (smallest eddies in turbulent flow)
Tau_diffusion := 10 s  # time scale of diffusion
D_m := 0.673*10^-5*cm^2/s  # Diffusion coefficient
# Channel assumptions
S_ChannelPipeWall := 2 cm  # Extra space allowed on both sides of pipe to avoid interference with the channel walls
# Chemical Feed Stock Assumptions:
HL_FcmTube := 20 cm
HL_FcmValveFreefall := 5 cm
D_FcmValveOrifice := 0.093 in
C_CoagDoseMax := 60*mg/L
HL_FcmInletDesign := 20 cm
H_StockTankPort := 10 cm
L_FcmTubeMax := 3 m
ID_FcmTubeEnglish := [0.0625; 0.125; 0.17; 0.25; 0.3125; 0.375]*in
ID_FcmTubeMetric := [2; 3; 4; 5; 6; 7]*mm
# AutoCAD Assumptions:
H_Text := .05 m
Disclaimer := "Disclaimer: This drawing is a PRELIMINARY DESIGN and must be reviewed and approved by a professional engineer."
