# Assumptions:
AN_EtSlope := 60 deg  # angle of the slopes of the entrance tank Hoppers
# This drawing is for reference showing the geometric assumptions.
# Note that the pulleys are likely not going to be used and instead the lever arm will be centered on the tank wall.
HW_EtMax := 1.5 m  # this is the maximum total water depth of the entrance tank to ensure easy access to drain plugs
ND_EtFloat := 6 in
S_EtFloat := 10 cm  # Extra space around the float (Increase in effective diameter) to ensure that float has free travel
# The entrance tank will be parallel to the flocculator channels but separated by a walkway. It is longer to accomodate the float
L_Et := L_Sed + S_EtFloat + ND_EtFloat = 4.08288 m
ND_EtDrainMin := 3 in  # Minimum pipe size to handle grit and to ensure that the pipe can be easily unclogged
Ti_EtDrain := 1 min
# Time required to have contents of one hopper drain. Note that during this time it is assumed that the water level in the entrance tank remains constant.
ND_EtDrain := 3 in  # this is constant for now
Q_Plant = l/s
# disregard Hopper area when calculating velocities
EN_LinearFlow := 1  # 1 if using Lfom, zero if using nonlinear system
# Tank Design:
# This is the minimum size of the Entrance tank overflow weir to prevent flooding of the entrance tank. I am using 50% of the available freeboard to dump the water into this emergency drain. This drain must be located upstream from the trash racks so that if the trash racks clog the entrance tank doesn't spill. This weir could also be a channel in the entrance tank that is connected to a smaller drainpipe.
ND_EtOverflow := NominalPipeSize(W_rectweir(Q_Plant, H_PlantFreeboard/2)/π) = 0.2032 m
W_EtCapture := Q_Plant/(L_Et*V_EtUp) = 0.367388 m  # the minimum width required to ensure a capture velocity of 8mm/s
W_EtEst := max(W_HumanMin, W_EtCapture, 2*ConRadius(ND_EtOverflow) + 2*ConRadius(ND_EtDrain) + 3*S_Fitting)
# ensures that the width is at least big enough that a human can fit inside and construct the entrance tank
HL_Flowmeasure :=
    HL_Lfom if EN_LinearFlow
    HL_Nlfom otherwise
    = 0.2 m
# height of the top part of the entrance tank required to ensure that the horizontal velocity in the entrance tank is no greater than that in the flocculator AND that there is water above the pyramic peaks even at zero flow.
H_EtTop := max(S_FlocBaffle[0]*W_FlocChannel/W_EtEst, HL_Flowmeasure) = 0.2 m
H_EtHopperEst := HW_EtMax - H_EtTop = 1.3 m  # estimated height of the Hoppers
# added ConRadius and S.Elbow to account for the space required by the coupling
L_EtHopperEst := max(2*H_EtHopperEst/tan(60 deg), 1/2*HW_EtMax) = 1.50111 m  # estimated length of a Hopper
N_EtHoppers := ceil(L_Et/L_EtHopperEst) = 3  # the number of Hoppers in the entrance tank
# Changed to ceiling to meet our maximum depth constraint.
L_EtHopper := (L_Et - 2*T_ConcreteMin)/N_EtHoppers = 1.32763 m
# actual length of the Hopper - will change slightly if we add vertical trash racks above the first peak formed by the first Hopper
# subtracted 2*T.ConcreteMin to give space for ledge for trash racks
H_EtHopper := L_EtHopper/2*tan(60 deg) = 1.14976 m  # actual height of the Hopper
HW_Et := H_EtHopper + H_EtTop = 1.34976 m  # water depth of the entrance tank
W_Et := max(S_FlocBaffle[0]*W_FlocChannel/H_EtTop, W_EtEst)  # linear and nonlinear flow meter headloss
ZW_RMPipe := H_Sed + HL_Floc + HL_RMPipe + HL_RMMicroOrifice = 2.00313 m  # Elevation of the water inside the rapid mix pipe
ZW_Et := ZW_RMPipe + H_Freefall + HL_Flowmeasure = 2.30313 m  # elevation of the maximum water level in the entrance tank (relative to plant datum)
Z_EtTop := ZW_Et + H_PlantFreeboard = 2.40313 m  # Elevation of the top of the entrance tank walls (includes freeboard)
Z_Et := ZW_Et - HW_Et = 0.953376 m  # This is the elevation of the bottom slab of the entrance tank
# bottom elevation of entrance tank (same as the drain entrance elevation)
H_Et := Z_EtTop - Z_Et
Z_EtHopper := Z_Et + H_EtHopper = 2.10313 m  # Top elevation of the hopper. (The peak of the pyramid)
ND_RMPipe =  # error: This variable is undefined.
ID_RMPipe := innerdiameter(ND_RMPipe, EN_PipeSpec) = 0.154508 m
ED_Tee := ED_Port(Q_Plant, ID_RMPipe, Pi_VenaContractaOrifice) = 0.355369 m^2/s^3
HL_RMMicroOrifice =  # error  # This suggests that the flow through the TEE has a high enough energy dissipation rate to provide rapid mix.
D_RMMicroOrifice =  # error
# Pipe Elevations:
# This is the maximum elevation of the micromix plate to ensure that it is submerged until the plant flow stops.
Z_RmMicroMix := Z_SedWeirExit = 1.58775 m
# Linear case
Z_LfomOrifices := ZW_Et - HL_Flowmeasure = 2.10313 m  # elevation of the bottom orifices of the LFOM
# Non Linear Case
Z_PipeGap := ZW_Et - HL_Flowmeasure  # elevation of the orifice gap between pipes that the water flows through
# Drain Design: (one drain in the bottom of each hopper) All drains interconnected to a single pipe that dumps into the drain canal.
Q_EtHopper := L_EtHopper*W_Et*H_EtHopper/(2*Ti_EtDrain) = 0.00763224 m^3/s  # estimates the min flow out of each Hopper during cleaning
K_EtDrains := 2*K_El90 + K_PipeExit + K_PipeEnt = 3.3
# the water is effectively making two 90 degree turns: one through the tee/elbow at the bottom of the Hopper, and another through the elbow dumping into the drain channel
ND_EtDrainBetter := max(D_pipeschedule(Q_EtHopper, EN_PipeSpec, HW_Et, L_Et, Nu_Water, E_Pvc, K_EtDrains), ND_EtDrainMin) = 0.0762 m
# Although this calculation is approximate it is adequate for designing the drains - I am saving this calculation, but we will set the drain size to always be 3in for now.
ND_EtDrain := 3 in
Z_EtExit := min(Z_RmMicroMix + ShortTeeLength(ND_RMPipe) - SocketDepth(ND_RMPipe), Z_SedWeirExit - 3/2*D_LfomOrifices - ElbowRadius(ND_RMPipe) - SocketDepth(ND_RMPipe)) = 1.27215 m
# are we sure we want to subtract a socket depth from this?
# This is MAXIMUM centerline elevation of the pipe exiting the entrance tank. Lower is okay. However, the lower this pipe exits the entrance tank, the more difficult it will be to access the micro mix orifice.
# The minimum ensures that there is space for the Lfom.
# I am finding the distance between the micromix plate and the centerline of the Tee.
HW_RmMicroMix := ZW_RMPipe - Z_RmMicroMix = 0.415384 m  # This is how far below the water level in the rapid mix pipe the orifice plate is located
# We need calculations for the doser elevations...
## Assumptions for Cdc
H_CdCFloatvalve := 5 cm  # Distance between fluid level in constant head tank and orifice for float valve
# I am going to assume that the doser head loss is the same as the flow measurement head loss.
HL_Cdc := HL_Flowmeasure
# Therefore the constraint for the lever arm is the wall height.
# We need to calculate height of the Z_CdcDripZero with the lever arm crossing the wall.
H_CdcDripZero := 10 cm
# Estimate of the minimum elevation difference between the top of the entrance tank wall and the Cdc doser tube discharge. (Needs confirmation!)
Z_EtTop =  # error
Z_CdcDripZero := H_CdcDripZero + Z_EtTop = 2.50313 m  # End of doser tube elevation at zero dose. (also fluid level in constant head tank)
Z_CdcFloatvalveOrifice := Z_CdcDripZero + H_CdCFloatvalve = 2.55313 m
Z_CoagulantOutlet := Z_CdcFloatvalveOrifice + H_AlumTankAboveHeadTank = 2.85313 m  # This is the height of the outlet from the stock tanks
Z_CoagulantTankBottom := Z_CoagulantOutlet - B_StockOutlet = 2.75313 m  # This is the height of the coagulant stock tank base
# There must be a wall between the stock tanks and the entrance tank to prevent spills from reaching the entrance tank.
# The constant head tank can be located in front of alum stock tanks
HW_Sed =  # error
HW_FlocStart =  # error
Z_Walkway := HW_Sed - 45 cm = 1.18949 m
# Height of the entrance tank wall from the walkway
H_ETfromWalkway := Z_EtTop - Z_Walkway = 1.21364 m
H_CdcChtfromWalkway := Z_CdcDripZero - Z_Walkway = 1.31364 m  # Height of the constant head tank (fluid level) from the walkway
Z_Et =  # error
Z_Walkway - Z_Et =  # error
