Q_Plant := .8*L/s
# [reference: ExpertInputs.xmcd]
# [reference: MathFunctions.xmcd]
# [reference: PipeDatabase.xmcd]
# [reference: MaterialsDatabase.xmcd]
# [reference: FluidsFunctions.xmcd]
# [reference: CdcFunctions.xmcd]
# [reference: SedimentationTankjem384.xmcd]
# [reference: Flocculator.xmcd]
# [reference: LFOM.xmcd]
# Entrance Tank
AN_EtSlopeMin := 45 deg
L_LeverArmTotal := 36 in
AN_EtSlopeMax := 60 deg
# Flow Control Drain and Entrance Tank Walkway
# This feature is a pipe with a gate valve draining into the entrance tank drain channel from a pipe out of the entrance tank's first hopper. The purpose is to control the plant flow by wasting a certain amount of the influent. The operator will need to learn empirically how many turns of the valve handle will give the desired flow rates, which he will read off of a scale in the entrance tank.
HW_EtEst := 0.8 m
L_EtFlowControlPipeEst := 2 m
ND_EtFlowControl := D_pipeschedule(Q_Plant, PS_Default, HW_EtEst, L_EtFlowControlPipeEst, Nu_Water, E_Pvc, K_PipeExit + K_PipeEnt + K_GateValve + 2*K_El90) = 1 in
ND_EtOverflowDrain := D_PipeChannel(Q_Plant/2, PS_Default) = 1.5 in
ND_EtInlet := D_pipe(Q_Plant, AvailND, 1 m, 100 m, Nu_Water, E_Concrete, K_PipeEnt + K_PipeExit) = 3 in
ND_EtDrain := 1.5 in
# Length, Width, and Hopper Calculations (grit =0)
W_EtDCFloat := max(2*S_Fitting + 2*(ConRadius(ND_EtDrain) + ConRadius(ND_RMPipe)), L_LeverArmTotal*.75/2 - T_PlantWall + ConRadius(ND_EtFloat) + S_Fitting/5) = 0.321169 m
# Minimum width to satisfy geometric constraints
W_EtLfomFloat := 2*ConRadius(ND_EtFloat) + S_EtFloat + 2*ConRadius(ND_RMPipe) + 2*S_Fitting + 2*ConRadius(ND_EtDrain) = 0.550837 m
L_EtMax := L_Sed = 1.02005 m  # maximum length to prevent enlarging the plant footprint
H_EtHopperMin := 10 cm  # so that the hoppers aren't so small that they need to be drained frequently
H_EtHopperMax := HW_EtMax - HL_Flowmeasure  # so that the entrance tank doesn't get too deep
L_EtCaptureEffectiveMin(W_Et) := Q_Plant/V_EtUpMin/W_Et  # Length needed for grit removal
L_EtHopperLfomMin := 2*S_Fitting + 2*ConRadius(ND_RMPipe) + (2*ConRadius(ND_EtFloat) + S_EtFloat) = 0.493688 m
L_EtHopperInletMin(W_Et, L_EtHopperLfom) :=
    L_EtMax - L_EtHopperLfom - T_EtHopperLedge if (L_EtHopperLfom - S_Fitting - 2*ConRadius(ND_RMPipe)) ≥ L_EtCaptureEffectiveMin(W_Et) and L_EtHopperLfom > (L_EtMax - T_EtHopperLedge)/2
    (L_EtMax - T_EtHopperLedge)/2 if (L_EtHopperLfom - S_Fitting - 2*ConRadius(ND_RMPipe)) ≥ L_EtCaptureEffectiveMin(W_Et) and L_EtHopperLfom ≤ (L_EtMax - T_EtHopperLedge)/2
    L_EtCaptureEffectiveMin(W_Et) - (L_EtHopperLfom - S_Fitting - 2*ConRadius(ND_RMPipe)) + 2*S_Fitting + 2*ConRadius(ND_EtInlet) otherwise
L_Sed = 1.02005 m  # L.Et should be less than or equal to L.Sed
L_EtEst := L_EtHopperLfomMin + L_EtHopperInletMin(W_EtDCFloat, L_EtHopperLfomMin) + T_EtHopperLedge = 1.02005 m
L_EtHopperLfom :=
    max(2*S_Fitting + 2*ConRadius(ND_RMPipe), S_EtFloat + 2*ConRadius(ND_EtFloat)) if L_EtEst ≤ L_Sed
    L_EtHopperLfomMin otherwise
    = 0.336537 m  # L.EtCaptureEffective should be greater than or equal to L.EtCaptureEffectiveMin
[L_EtHopperInlet; L_EtHopperLfom] :=
    if L_EtEst ≤ L_Sed and L_EtHopperInletMin(W_EtLfomFloat, L_EtHopperLfom) > L_EtHopperLfom
        L_EtHopperInlet ← (L_EtHopperInletMin(W_EtLfomFloat, L_EtHopperLfom) + L_EtHopperLfom)/2
        L_EtHopperLfom ← (L_EtHopperInletMin(W_EtLfomFloat, L_EtHopperLfom) + L_EtHopperLfom)/2
    L_EtHopperInlet ← L_EtHopperInletMin(W_EtDCFloat, L_EtHopperLfomMin) otherwise
    return [L_EtHopperInlet; L_EtHopperLfom]
    = [0.385781; 0.385781] m
H_EtHopper2 := L_EtHopper2Min*tan(AN_EtSlopeMin)
H_EtHopper1 := L_EtHopper1Min*tan(AN_EtSlopeMin)
H_EtHopper := max(H_EtHopper2, H_EtHopper1)
AN_EtHopper1 := atan(H_EtHopper/(L_EtHopper1Min - S_Fitting - 2*ConRadius(ND_EtDrain)))
AN_EtHopper2 := atan(H_EtHopper/(L_EtHopper2Min - S_Fitting - 2*ConRadius(ND_EtDrain)))
L_EtHopper1 :=
    H_EtHopper/tan(AN_EtSlopeMax) if AN_EtHopper1 > AN_EtSlopeMax
    H_EtHopper/tan(AN_EtHopper1) otherwise
L_EtHopper2 :=
    H_EtHopper/tan(AN_EtSlopeMax) if AN_EtHopper2 > AN_EtSlopeMax
    H_EtHopper/tan(AN_EtHopper1) otherwise
AN_EtSlope := atan(H_EtHopper/(L_EtHopper/2 - S_Fitting - ConRadius(ND_EtDrain)))
W_EtCapture := Q_Plant/V_EtUpMin/(L_Et0 - 1/2*L_EtHopper - (S_Fitting + ConRadius(ND_EtDrain)))
W_Et0 := max(W_EtMin, W_EtCapture)
V_EtUp := Q_Plant/(W_Et0*(L_Et0 - 1/2*L_EtHopper - (S_Fitting + ConRadius(ND_EtDrain))))
HW_Et0 := H_EtHopper + HL_Flowmeasure
H_EtTop := HL_Flowmeasure + H_PlantFreeboard
H_Et0 := HW_Et0 + H_PlantFreeboard
L_EtHopperFront := L_EtSupport - (T_PlantWall - T_ChannelWall)
H_EtHopperFront := min(H_EtHopper, tan(AN_EtSlope)*L_EtHopperFront)
L_EtHopperBack := W_Et0 - 2*S_Fitting - 2*ConRadius(ND_EtDrain) - L_EtHopperFront
H_EtHopperBack := min(H_EtHopper, tan(AN_EtSlope)*L_EtHopperBack)
AN_EtHopperBackSlope := atan(H_EtHopperBack/L_EtHopperBack)
AN_EtHopperFrontSlope := atan(H_EtHopperFront/L_EtHopperFront)
# Overflow Channel
W_EtOverflowSlot := innerdiameter(ND_EtOverflowDrain, PS_Default)*sin(acos(1 - 2*0.9)) = 2.64262 cm
# This sizes the slot such that only 10% of the vertical dimension of the pipe is cut away.
L_EtChannelPipesMin :=
    (0.5*(L_EtHopper/2 + ConRadius(ND_EtDrain) + S_Fitting) - ShortTeeLength(ND_EtOverflowDrain) - CapThickness(ND_EtOverflowDrain)) if EN_EtGrit == 0
    W_rectweir(Q_Plant, 5 cm)/2 otherwise
L_EtOverflowWeirMin :=
    (2*(L_EtHopper/2 + ConRadius(ND_EtDrain) + S_Fitting)) if EN_EtGrit == 0
    (2*L_EtChannelPipesMin) otherwise
H_EtOverflowCutaway := 0.1*innerdiameter(ND_EtOverflowDrain, PS_Default) = 0.1734 in
H_EtLFOMtoOverflow := 3 cm
# Heights and Elevations
D_RMOrifice := D_PipeED(E_MaxRM, Q_Plant, Pi_VenaContractaOrifice, Pi_Jet) = 0.0444118 m
HL_RMMicroOrifice := h_orifice(D_RMOrifice, Pi_VenaContractaOrifice, Q_Plant) = 3.4259 cm
# estimate the length of RM pipe using:2*HW_EtMax + W_EtWalkway
HL_RMPipe :=
    h_l(Q_Plant, innerdiameter(ND_RMPipe, PS_Default), 2*HW_EtMax + W_EtWalkway, K_El90 + K_PipeExit, Nu_Water, E_Pvc) if Q_Plant > Q_PlantMaxLF
    h_l(Q_Plant, innerdiameter(ND_RMPipe, PS_Default), 2*HW_EtMax + W_EtWalkway, 3*K_El90 + K_PipeExit, Nu_Water, E_Pvc) otherwise
# estimate the length of RM pipe using:2*HW_EtMax + W_EtWalkway
ZW_RMPipe := HW_Sed + HL_Floc + HL_RMPipe + HL_RMMicroOrifice = 1.9615 m  # Elevation of the water inside the rapid mix pipe in the Tee outside the entrance tank
ZW_Et := ZW_RMPipe + H_Freefall + HL_Flowmeasure + HL_RMPipe = 2.35282 m
# elevation of the maximum water level in the entrance tank (relative to plant datum)
# This freefall is a safety factor inside the lfom
Z_EtTop := ZW_Et + H_PlantFreeboard = 2.45282 m  # Elevation of the top of the entrance tank walls (includes freeboard)
Z_Et := ZW_Et - HW_Et  # This is the elevation of the bottom slab of the entrance tank
# bottom elevation of entrance tank (same as the drain entrance elevation)
Z_EtHopper := Z_Et + H_EtHopper  # Top elevation of the first set of hoppers. (The peak of the pyramid)
Z_RmMicroMix := Z_SedWeirExit
# This is the maximum elevation of the micromix plate to ensure that it is submerged until the plant flow stops. Since we are putting the plate in the flocculator entrance coupling this should not be an issue.
# Linear case
Z_LfomOrifices := ZW_Et - HL_Flowmeasure + D_LfomOrifices/2
# elevation centers of the bottom orifices of the LFOM. The bottom of the bottom row of orifices is at the zero elevation
# Hopper Drains (grit only)
ND_EtDrain = 1.5 in
# Currently the drains are always set to 3in nominal diameter, but we are saving these calculations which design the drains more thoroughly.
Q_EtHopper := L_EtHopper*W_Et*H_EtHopper/(2*Ti_EtDrain)  # estimates the max flow out of each Hopper during cleaning
ND_EtDrainBetter := max(D_pipeschedule(Q_EtHopper, PS_Default, HW_Et, L_Et, Nu_Water, E_Pvc, K_PipeExit + K_PipeEnt), ND_EtDrainMin)
# Although this calculation is approximate it is adequate for designing the drains.
# Doser Elevations
ZW_CdcCht := Z_EtTop + H_DoserAssembly = 2.52052 m  # End of doser tube elevation at zero flow. (also fluid level in constant head tank)
Z_CdcFloatValveOrifice := ZW_CdcCht + H_CdcFloatvalve = 2.57052 m
Z_CoagulantOutlet := Z_CdcFloatValveOrifice + H_CoagTankAboveHeadTank = 2.87052 m  # This is the height of the outlet from the stock tanks
Z_CoagulantTankBottom := Z_CoagulantOutlet - B_StockOutlet = 2.77052 m  # This is the height of the coagulant stock tank base
## Trash Racks
N_TRSpacesV := ceil((W_Et + 4*D_Rebar)/(D_LfomOrifices/sqrt(2) + D_Rebar))  # number of spaces between rebar spanning the width of the entrance tank
B_EtRebar := (W_Et + 3*D_Rebar)/N_TRSpacesV
# number of spaces between rebar spanning the heigth of the top of the entrance tank
N_TRSpacesH := ceil((H_EtTop - H_PlantFreeboard/2 + 2*D_Rebar)/B_EtRebar)
# Coagulant Stock Tank Elevation
Z_CoagTank := Z_EtTop + H_CoagTankAboveHeadTank + H_DoserAssembly - B_StockOutlet
Z_CoagTankOutlet := Z_CoagTank + B_StockOutlet
# Drain Channel (grit only)
Q_EtDCMax := max(Q_Plant, Q_pipeminor(innerdiameter(ND_EtDrain, PS_Default), H_Et, K_PipeEnt + K_PipeExit)*(N_EtFullHopper + 1))
L_EtDC := L_Et - 2*(S_Fitting + ConRadius(ND_RMPipe))
W_EtDCOLD := max(2*ConRadius(ND_RMPipe), W_Et - max(OuterDiameterFittingPVC(ND_RMPipe) + 2*S_Fitting + T_PlantWall, S_Fitting + ConRadius(ND_EtOverflowDrain) + ElbowRadius(ND_EtOverflowDrain) + SocketDepth(ND_EtOverflowDrain)))
W_EtDC := max(3*S_Fitting + 2*ConRadius(ND_EtDrain) + 2*ConRadius(ND_EtOverflowDrain), 2*ConRadius(ND_RMPipe)) = 0.2643 m
H_EtDCMinFittingsOLD := max(OuterDiameterFittingPVC(ND_EtOverflowDrain), OuterDiameterFittingPVC(ND_EtFlowControl)) = 0.05715 m
H_EtDCMinFittings := OuterDiameterFittingPVC(ND_EtFlowControl) = 0.0396875 m
H_EtDCMinCapacity := H_HorizChannelMin(Q_EtDCMax, W_EtDC, L_EtDC, Nu_Water, E_Concrete, 1)
H_EtDC :=
    max(H_EtDCMinCapacity, H_EtDCMinFittings, 2*ConRadius(ND_RMPipe)) if Z_FlocTank + 2*S_Fitting + OuterDiameterFittingPVC(ND_RMPipe) ≤ Z_Et - T_PlantWall - max(H_EtDCMinCapacity, H_EtDCMinFittings, 2*ConRadius(ND_RMPipe)) - T_ChannelWall
    (Z_Et - Z_FlocTank - T_PlantWall) otherwise
# estimate 1/3 of back slope does not overlap with side slopes
# Other Parameters
Ti_Et0 := (W_Et*L_Et*HW_Et - ((N_EtFullHopper + 1)*0.5*H_EtHopper*W_Et*(L_EtHopper/2 - S_Fitting - ConRadius(ND_EtDrain)) - 1/3*H_EtHopperBack*L_Et*(W_Et - 2*(S_Fitting + ConRadius(ND_EtDrain)))))/Q_Plant
Ti_Et1 := HW_Et*L_Et*W_Et/Q_Plant
Ti_Et :=
    Ti_Et0 if EN_EtGrit == 0
    Ti_Et1 otherwise
.
