## Flow Control Module Design
# [reference: MasterProgram.xmcd]
Q_Plant = 12 L/s  # The user input for flow rate.
# for 1mm and 2mm used 1/16 (=1.587mm)
C_CoagulantStock = 120 gm/L  # The user input for stock concentration of the coagulant.
# for 2.4 mm, used 3/32in (=2.81mm)
D_CdcAvailable := [1; 2; 2.4; 2.9; 4; 5; 6; 6.5]*mm  # for 2.9mm, used 1/8 in (=3.175mm)
D_CdcBarb := [0.047 in; 0.047 in; 0.070 in; 0.075 in; 2.5 mm; 3 mm; 4 mm; 0.201 in]
C_CoagulantMinDose = 8 mgm/L  # The user input for the minimum coagulant concentration in the plant.
C_CoagulantMaxDose := 60*mg/L  # The maximum concentration of coagulant in the plant.
# for 6.5mm used 1/4in tube (= 6.35mm)
Q_CdcMax := Q_Plant*C_CoagulantMaxDose/C_CoagulantStock
Q_CdcMax = 6 mL/s
HL_Cdc = 20 cm
D_CdcAvailable = [0.0393701; 0.0787402; 0.0944882; 0.114173; 0.15748; 0.19685; 0.23622; 0.255906] in
D_CdcBarb = [1.1938; 1.1938; 1.778; 1.905; 2.5; 3; 4; 5.1054] mm
L_CdcDtMin := 70 cm
# The length of the dosing tube has to be at least as great as the maximum head loss with some additional length to be able to reach the ports
L_CdcDtMax := 1.5 m  # The maximum length of tubing that we are willing to use for the dosing tube.
Nu_Water = 1e-6 m^2/s  # Assume that the kinematic viscosity of coagulant is similar to that of water.
Re_PipeTransition = 2100
# **Calculate the minor loss coefficients from the barbed fitting and the dosing tube
# 1. Entrance losses in the barbed fitting.
K_Entrance := 0.5  # For a 90 degree turn
# This loss is in the barbed fitting. Translate this loss into a loss in the dosing tube.
# Use a mass balance: Qin = Qout => VinAin =  VoutAout on the minor loss equation: he = Ke *V^2/(2g). The V here is Vin so use Vin = VoutAout/Ain.
K_EntranceDt(D_CdcDt, D_CdcBarb) := K_Entrance*(A_circle(D_CdcDt)/A_circle(D_CdcBarb))^2
# 2. Expansion losses into the dosing tube from the barbed fitting.
K_Expansion(D_CdcDt, D_CdcBarb) := (A_circle(D_CdcDt)/A_circle(D_CdcBarb) - 1)^2
# 3. Exit losses from the dosing tube.
# The centerline velocity in the tube is double the average velocity, so the minor loss coeffcient is doubled from 1.
K_Exit := 2
# 4.Total minor loss coefficient
K_Total(D_CdcDt, D_CdcBarb) := K_EntranceDt(D_CdcDt, D_CdcBarb) + K_Expansion(D_CdcDt, D_CdcBarb) + K_Exit
# 1. Determine the minimum diameter required.
# a) Minimum diameter based on laminar flow contraint.
# This is the maximum flow that can be sent through the alum feeder without requiring extremely long tubes is based on eliminating diameter from the Hagen-Poiseuille equation by using the maximum Reynolds number constraint. For higher flows multiple parallel tubes could be used. However the maximum flow rate that can be handled by the float valve needs to be considered.
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Q_CdcMaxLaminar(L_max, h_fmax, ν) := (L_max*Re_PipeTransition^4*π^3*ν^5/(2*g*h_fmax))^(1/3)
Q_CdcMaxLaminar(L_CdcDtMax, HL_Cdc, Nu_Water) = 6.13215 mL/s
# Minimum diameter required to get laminar flow at max flow based on Reynolds number for transition to turbulence
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D_CdcMinLaminar(Q_max, ν) := 4*Q_max/(π*ν*Re_PipeTransition)
# Now we can calculate the diameter of tubing required to accomodate the largest flow that a flow control module can deliver without requiring an excessively long tube
# Don't understand why we're using the maximum laminar flow that can go through a dosing tube. Why aren't we using the maximum coagulant flow rate?
D_CdcMinLaminar(Q_CdcMax, Nu_Water) = 3.63783 mm
D_CdcMinLaminar(Q_CdcMaxLaminar(L_CdcDtMax, HL_Cdc, Nu_Water), Nu_Water) = 3.71795 mm
# b) Minimum diameter based on head loss constraint.
# Calculate the minimum diameter required to produce the desired head loss at the maximum flow using the minimum length of tubing. Based on the Hagen-Poiseuille equation.
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D_CdcMinHeadLoss(Q_max, L_min, h_fmax, ν) := (128*ν*Q_max*L_min/(h_fmax*g*π))^(1/4)
D_CdcMinHeadLoss(Q_CdcMax, L_CdcDtMin, HL_Cdc, Nu_Water) = 3.05626 mm
# c) Minimum diameter than satisfies both the laminar flow and head loss constraints.
D_pipetotal(Q, h_l, L, ν, ε, K)
# The minimum diameter required would be the one that maintains laminar flow at the max length of tubing and produces the necessary head loss at the minimum length of tubing. Thus, the minimum diameter chosen in the one that is the maximum of the two previous diameters calculated. The diameters can be larger than the one calculated, but they cannot be smaller.
D_CdcMin(Q_max, L_min, h_fmax, ν) := max(D_CdcMinLaminar(Q_max, ν), D_CdcMinHeadLoss(Q_max, L_min, h_fmax, ν))
D_CdcMin(Q_CdcMax, L_CdcDtMin, HL_Cdc, Nu_Water) = 3.63783 mm
# d) Tube diameter constraint
# There is also a constraint of given tube diameters. First we write a function that will round up to the up to the next available tube size.
forceround(x, xarray, direction) :=
    xarray ← sort(xarray)
    i ← 0
    while x > xarray[i]
        i ← i + 1
    return xarray[i - 1 + direction]  # direction is for rounding up (1) or rounding down (0).
D_CdcAvailable = [1; 2; 2.4; 2.9; 4; 5; 6; 6.5] mm
# Now we use the forceround function to find the design tube diameter based on the minimum tube diameter and the available tube diameters.
D_CdcMinActual(Q_max, L_min, h_fmax, ν) := forceround(D_CdcMin(Q_max, L_min, h_fmax, ν), D_CdcAvailable, 1)
D_CdcDesign := D_CdcMinActual(Q_CdcMax, L_CdcDtMin, HL_Cdc, Nu_Water)  # This is the min diameter of tube that meets laminar flow and head loss constraints.
D_CdcDesign = 4 mm
# 2) Length of tubing based on the head loss constraint
# Length of tube required to get desired head loss at maximum flow based on the Hagen-Poiseuille equation.
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L_CdcTube(Q_max, D, h_fmax, ν) := h_fmax*g*π*D^4/(128*ν*Q_max)
L_CdcTubeDesign := L_CdcTube(Q_CdcMax, D_CdcDesign, HL_Cdc, Nu_Water)
L_CdcTubeDesign = 2.0539 m
# 3) Define a range of flows that we will use to plot the results.
Q_CdcMax = 6 mL/s
Q_CdcMaxLaminar(L_CdcDtMax, HL_Cdc, Nu_Water) = 6.13215 mL/s
# want to find the maximum flow that we can get from our largest diameter tube. We need to use the laminar flow constraint because that dominates for high flows.
Q_MaxDesign := π*D_CdcDesign*Re_PipeTransition*Nu_Water/4 = 6.59734 mL/s
D == 4*Q_max/(π*ν*Re_max)
# At very low flows the design will fail given a finite set of tube diameters. Thus calculate the minimum design flow that can be produced based on the Hagen-Poiseuille equation.
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Q_min(L_max, h_fmax, D_min, ν) := h_fmax*g*π*D_min^4/(128*ν*L_max)
Q_min(L_CdcDtMax, HL_Cdc, D_CdcAvailable[0], Nu_Water) = 0.0320922 mL/s
# Redefine the flow rate to only include the feasible range given the constraints. Note that the minimum flow plotted is the minimum design flow. The design flow is the maximum flow for a flow control module.
Q_range := Q_min(L_CdcDtMax, HL_Cdc, D_CdcAvailable[0], Nu_Water), Q_min(L_CdcDtMax, HL_Cdc, D_CdcAvailable[0], Nu_Water) + 1*mL/min .. Q_CdcMaxLaminar(L_CdcDtMax, HL_Cdc, Nu_Water)
# The maximum tube length constraint may be violated if there aren't enough available tubing diameters.
D_CdcDesign = 0.004 m  # designs for the particular flow rate
L_CdcTubeDesign = 2.0539 m
D_CdcDesign = 4 mm
D_CdcDesign = 0.15748 in
L_CdcTubeDesign = 2.0539 m
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# If you set the max tubing length such that a small region meets that criteria it can cause a noncontinuos solution with a gap that has too high a tubing length.
N_TubesMax := 4
Q_Coag := 5.1*mL/s
D_MaxDesign =  # error: This variable is undefined.
Q_MaxDesign = 6.59734 mL/s
N_Tubef(Q_Coag) := ceil(Q_Coag/Q_MaxDesign)
Q_CoagMaxLinear := N_TubesMax*Q_MaxDesign
N_Tube := N_Tubef(Q_Coag) = 1
Q_Tube(Q_Coag) := Q_Coag/N_Tubef(Q_Coag)
Q_CoagRange := 2*mL/s, 2.1*mL/s .. Q_CoagMaxLinear
D_tube := D_design(Q_Tube(Q_Coag), L_min, h_fmax, ν)  # error: This variable is undefined.
L_design := L_tube(Q_Tube(Q_Coag), D_tube, h_fmax, ν)  # error: This variable is undefined.
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Q_CoagRange = [
    2e-6; 2.1e-6; 2.2e-6; 2.3e-6; 2.4e-6; 2.5e-6; 2.6e-6; 2.7e-6; 2.8e-6; 2.9e-6
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] m^3/s
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# Questions
# max flow for small float valve (where design flips to larger valve)
# Min diameter of supply flexible tubing to CHT at MAX flow of linear dose controller.
# Evaluate whether it is reasonable to always uses this large diameter of supply tubing.
# Determine appropriate diameters for calibration columns
# Is the calibration column fixed or movable?
# Is there one diameter of dosing tubing that will work for allllll flows?
#
# Is all of our logic correct in this sheet? simplify and beautify and document better than Monroe did!
#
# When calibrating a CDC you start with a piece of tubing that is too long. You measure the flow at max head loss. How do you use that information to figure out how long to make the tubing?
#
# What is the min length of tube for the diameter that you are using to maintain laminar flow? This should be reported in the design documentation as a warning to not cut the tube shorter than this length.
