# Flocculation Function
# The Flocculator program should be calculating the spacing between baffles for all sections. the number of baffles in each section and the placement of the baffles throughout the flocculator.
# References:
# The length of one channel of the flocculator is equal to the length of a sed tank . Therefore the total length is equal to the number of channels times the length of a sed tank. The width of a flocculator is equal to the width of a sed tank divided by the number of channels (to make "upward velocity" equal in the two tanks. The water depth at the end of the flocculaor must be the same as the water depth in the sed tank.
# I changed the Π.FlocBod. This is great because this parameter actually makes sense with the model predictions. I had reduced the value from the model predictions previously to get the value of 30 m^2/3 because I erroneously thought that the model predictions were giving too large a residence time.
# Floc Calculations:
# Add equation here to check for minimum width that gives a baffle spacing that is
HW_FlocEnd := HW_Sed = 2 m
# possible ED values
S_FlocBaffleEnd := 1/2*HW_FlocEnd = 1 m
6.4, 1.6, 0.4
W_FlocChannel := max(2*Q_Plant/HW_FlocEnd*(K_FlocBaffle180/(2*Pi_Epsilon*HW_FlocEnd*ED_Floc[last(ED_Floc)]))^(1/3), W_FlocChannelMin) = 45 cm
# Change the Bod to have ED.FlocBod insteadof G to eliminate this step
S_FlocBaffle := Q_Plant/W_FlocChannel*(K_FlocBaffle180/(2*Pi_Epsilon*HW_FlocEnd*ED_Floc))^(1/3) = [8.03403; 12.7532; 20.2445] cm
# The distance between baffles was set by the energy dissipation desired for each section. The Width
# of the flocculator was set to be the equal to the large baffle spacing and the depth of the flocculator was set to be Pi.FlocCell times the largest baffle spacing.
B_FlocBaffle := S_FlocBaffle + T_FlocBaffle = [8.43403; 13.1532; 20.6445] cm
Pi_FlocBaffleCP := (K_FlocBaffle180*(Pi_Epsilon*HW_FlocEnd)^2/2)^(1/3) = 1.78053 m^(2/3)
i := 0 .. last(ED_Floc)
N_FlocBaffleSection[i] := ceil(Pi_FlocCP/(length(ED_Floc)*Pi_FlocBaffleCP))
# This makes the total collision potential in each baffle spacing section be the same. Hopefully someday we will have a method of choosing this section length based on theory or experiments.
N_FlocBaffleSection =  # error: This variable is undefined.  # The number of baffles in each section.
# Assume an equal number of baffles in each section
L_FlocSections := vectorize(B_FlocBaffle*N_FlocBaffleSection) = [1.77115; 2.76218; 4.33534] m
# Should this be B.FlocBaffle or S.FlocBaffle. THis isn't really important, just thinking about this conceptually. I think the answer is neither... and that we would need to figure out the volume of the submerged baffles and subtract that from the total volume of the flocculator. But I don't really care because the difference is insignificant!
L_FlocTankEst := sum(L_FlocSections) = 8.86867 m
N_FlocChannels := ceil(L_FlocTankEst/L_Sed) = 1
L_FlocTank := N_FlocChannels*L_Sed = 9.52822 m
θ_Floc := HW_FlocEnd*L_FlocTank*W_FlocChannel/Q_Plant = 22.5668 min
# A better design will use longer sed tanks and thus will have shorter channels. I think the sed tanks should be made much longer than they are currently. The total wall length including floc channel walls should be calculated and minimized.
HL_FlocBaffle := h_erect(Q_Plant, W_FlocChannel, S_FlocBaffle, K_FlocBaffle180) = [0.625867; 0.248376; 0.0985679] cm
# calculates the head loss per baffle and then finds the total headloss
# This head loss calculation is based on the ideal design that doesn't yet account for how the baffles are actually placed in the channels. The error will be small since it is the last section of baffle spacings that might have a different number of baffles
HL_Floc := HL_FlocBaffle*N_FlocBaffleSection = 20.429 cm
HW_FlocStart := HW_FlocEnd + HL_Floc = 2.20429 m  # Calculate the water level at the entrance to the floc tank
H_Floc := HW_FlocStart + H_PlantFreeboard = 2.30429 m
# G at the port is based on the G at the end of the flocculator because the low G region of the flocculator is so long.
W_FlocPort := S_FlocBaffle[last(ED_Floc)] = 20.2445 cm
A_FlocPort := A_Port(Pi_FlocDissipation, K_PipeEnt, Q_Plant, ED_FlocLarge, Pi_VenaContractaOrifice)
H_FlocPort := A_FlocPort/W_FlocPort = 52.8265 cm  # area/w  # This keeps the velocity through the port the same as the velocity in the channel
# Now we need to assign positions, lengths and elevations to floc baffles
L_FlocBaffleLower := HW_FlocEnd - S_FlocBaffle*Pi_FlocBaffle = [1.91966; 1.87247; 1.79756] m
L_FlocBaffleUpper := H_Floc - S_FlocBaffle*Pi_FlocBaffle = [2.22395; 2.17676; 2.10185] m
L_BaffleSection :=
    for i ∈ 0 .. last(N_FlocBaffleSection)
        L[i] ← N_FlocBaffleSection[i]*B_FlocBaffle[i]
    return L
    = [1.77115; 2.76218; 4.33534] m  # This calculates the length of flocculator taken up by each section of baffles
# First baffle is a lower baffle because rapid mix pipe enters low
# Ideally have odd number of baffles in first channel (enter low, exit low)
# Ideally have even number of baffles in 2nd channel (enter low, exit high), but I haven't done any coding to get the right number of baffles (odd or even). The fit of the baffles could potentially be improved by
# section is index of the spacing of baffles
Loc_FlocBaffles :=
    X[0, N_FlocChannels - 1] ← 0 m
    L[0, N_FlocChannels - 1] ← 0 m
    Z[0, N_FlocChannels - 1] ← 0 m
    section ← 0
    BafflesInSection ← 0
    W_RapidMix ← B_FlocBaffle[last(B_FlocBaffle)]
    X[0, 0] ← T_ChannelWall
    for Channel ∈ 0 .. N_FlocChannels - 1
        i ← 0
        X_FirstBaffleInChannel ← W_RapidMix if Channel == 0
        X_FirstBaffleInChannel ← W_FlocPort + S_FlocPort otherwise
        X[i, Channel] ← X_FirstBaffleInChannel
        L[i, Channel] ← L_FlocBaffleLower[section]
        Z[i, Channel] ← 0 m
        X_LastBaffleInChannel ← L_Sed - (W_InletChannel + S_FlocPort) if Channel == N_FlocChannels - 1
        X_LastBaffleInChannel ← L_Sed - (W_FlocPort + S_FlocPort) otherwise
        while X[i, Channel] + B_FlocBaffle[section] < X_LastBaffleInChannel
            i ← i + 1
            BafflesInSection ← BafflesInSection + 1
            if BafflesInSection == N_FlocBaffleSection[section] and section < last(ED_Floc)
                section ← section + 1
                BafflesInSection ← 1
            X[i, Channel] ← X[i - 1, Channel] + B_FlocBaffle[section]
            if mod(i, 2) == 1
                L[i, Channel] ← L_FlocBaffleUpper[section]
                Z[i, Channel] ← S_FlocBaffle[section]*Pi_FlocBaffle
            otherwise
                L[i, Channel] ← L_FlocBaffleLower[section]
                Z[i, Channel] ← 0 m
        for k ∈ 0 .. last(X[:, 0])
            X[k, Channel] ← L_Sed - X[k, Channel] if mod(Channel, 2) == 1 and X[k, Channel] ≠ 0
        X ← L_Sed - X if mod(N_FlocChannels, 2) == 1
    return [X, L, Z]
    = [[
        9.32178; 9.23744; 9.1531; 9.06876; 8.98441; 8.90007; 8.81573; 8.73139; 8.64705; 8.56271
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    ], [
        1.91966; 2.22395; 1.91966; 2.22395; 1.91966; 2.22395; 1.91966; 2.22395; 1.91966; 2.22395
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    ], [
        0; 0.0803403; 0; 0.0803403; 0; 0.0803403; 0; 0.0803403; 0; 0.0803403
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    ]] m
# First baffle is away from wall to allow elbow to deflect water downward
# This code works with any number of flocculator channels
# i is the number of baffles in a channel
# X placement starts with an offset equal to the channel wall thickness
# The first baffle is place in the channel by an offest required for the
# rapid mix apparatus. Which is subject to change?!
# Each channel starts with a lower baffle
# Move to the next spacing if baffles in section equals target number of baffles in section and if the section isn't the last section
# Mod handles the odd and even baffles
# Mod = 1 means the number is odd
# Mod = 0 means the numbeer is even
# Reverse the direction of odd numbered channels
X_FlocBaffles := Loc_FlocBaffles[0, 0]
L_FlocBaffles := Loc_FlocBaffles[0, 1]
Z_FlocBaffles := Loc_FlocBaffles[0, 2]
N_FlocBaffles :=
    N ← 0
    i ← 0
    Channel ← 0
    for Channel ∈ 0 .. N_FlocChannels - 1
        for i ∈ 0 .. last(X_FlocBaffles[:, 0])
            N ← N + 1 if X_FlocBaffles[i, Channel] ≠ 0 m
    return N
