# [reference: BasicInputs.xmcd]
# THIS CODE IS FOR UNTAPERED FLOCCULATION
# [reference: ExpertInputs.xmcd]
# [reference: DesignAssumptions.xmcd]
# [reference: MathFunctions.xmcd]
# [reference: PipeDatabase.xmcd]
# [reference: MinorLossCoefficients.xmcd]
# [reference: FluidsFunctions.xmcd]
# [reference: Sedimentation Tank.xmcd]
L_Sed = 6.06869 m
# Double click anywhere on Solution Algorithm to scroll through the whole thing.
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ED_Floc = 6 mW/kg
Q_Plant = 20 L/s
# These are here just to see what the input values are. They are the main parameters guiding the design so it is nice to see what they are.
# The new flocculation model more carefully distinguishes between maximum and average energydissipation rates. The flocculators should be designed based on a maximum allowed energy dissipation rate to ensure that suboptimal geometry (high h/b ratios) doesn't result in excessively high energy dissipation rates that could break flocs. However, since this model is now incorporating the concept of a maximum energy dissipation rate the energy dissipation rate guidelines need to be increased to account for the distinction between average and maximum.
# Because we are now using the concept of a maximum energy dissipation rate it should be possible to directly incorporate results from laminar flow flocculators to produce guidelines on the maximum allowable energy dissipation rates. One caveat is that the turbulent flow energy dissipation rates are time averaged and it is not yet clear what the expected temporal variability is for turbulent flow energy dissipation rates.
# CFD results and functions | This section is unchanged from vertical.
# CFD3
# Note that this data (ψ.Pdat) can not be used directly in design because it has units! It only applies to the case for b=0.1m (the case used in the CFD FLUENT analysis).
S_CFD := 0.1 m
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α_ψ(Pi_HS) :=
    α_ψ ← (4/Pi_HS)^(1/6) if Pi_HS > 5
    α_ψ ← 0.95 otherwise
    return α_ψ
2^(1/3) = 1.25992
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α_ε(Pi_JS) := max(2, 0.38^3/Pi_VenaContractaOrifice^4*2/K_FlocBaffle*Pi_JS)
# Changed the jet max energy dissipation rate coefficient from 0.34 to 0.38 to better match CFD results
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ψ_P(J, S) := α_ψ(J/S)*J^(2/3)*(K_FlocBaffle/2)^(1/3)
# Determine whether to use horizontal or vertical.
# HV1
# Generic
# Ρ
# S
# J
# Vertical
# W
# S
# H
# Horizontal
# H
# S
# W
# Change everything into generic variables so that they are less confusing and so we can easily calculate for both types of flolcculators.
# HV2
S_FlocBaffleMin := W_HumanMin = 0.45 m
# HV3
J(P, S) := P*S
J_Min := J(Pi_JSOptimal, S_FlocBaffleMin) = 1.35 m
# HV4
P_MaxHorizontal(Q, S, Pi_JS, ED, J) := Q/(S*(J*2*ED/(K_FlocBaffle*α_ε(Pi_JS)))^(1/3))
# HV5
# There will be headloss. See if
# significant.
HW_FlocEnd := HW_Sed = 1.59136 m
P_MaxHorizontal(Q_Plant, S_FlocBaffleMin, Pi_JSOptimal, ED_Floc, J_Min) = 0.278825 m
# Override user input until floc options debugged.
P_FlocChannelHIteration1 :=
    HW_FlocEnd if H_FlocOption == 0
    P_MaxHorizontal(Q_Plant, S_FlocBaffleMin, Pi_JSOptimal, ED_Floc, J_Min) if H_FlocOption == -1
    H_FlocOption*m if H_FlocOption > 0
# H.FlocOption = 0 if same as sed; -1 is minimum depth for horizontal flow or a positive number is the number a  user specified
# HV6
Q_MinHorizontal(P, S, Pi_JS, ED, J) := P*S*(J*2*ED/(K_FlocBaffle*α_ε(Pi_JS)))^(1/3)
Q_MinHorizontal(P_FlocChannelHIteration1, S_FlocBaffleMin, Pi_JSOptimal, ED_Floc, J_Min) = 114.148 L/s
# HV7
# Create a variable that will be used to distinguish between horizontal and vertical when deciding which algorithm to use in future steps.
S_FlocBaffleNonIterative(Q, P, Pi_JS, ED) := (Q/P)^(3/4)*(1/Pi_JS)^(1/4)*(K_FlocBaffle*α_ε(Pi_JS)/(2*ED))^(1/4)
N_FlocSpacesFH(L, T, S) := (Floor((L + T)/(S + T) + 1, 2) - 1)
# Floor to ensure minimum spacing constraint met for horizontal. Subtracting 1 forces it to be odd. Add one before flooring though to get more accurate estimate.
SofN_FlocBaffleF(L, T, N_Spaces) := (L + T)/N_Spaces - T
S_FlocBaffleCalcH := SofN_FlocBaffleF(L_Sed, T_FlocBaffleRigidH, N_FlocSpacesFH(L_Sed, T_FlocBaffleRigidH, S_FlocBaffleNonIterative(Q_Plant, P_FlocChannelHIteration1, Pi_JSOptimal, ED_Floc))) = 0.12847 m
N_FlocSpacesPerChannelH := N_FlocSpacesFH(L_Sed, T_FlocBaffleRigidH, S_FlocBaffleCalcH) = 27
P_FlocChannelH :=
    P_MaxHorizontal(Q_Plant, S_FlocBaffleCalcH, Pi_JSOptimal, ED_Floc, J(Pi_JSOptimal, S_FlocBaffleCalcH)) if H_FlocOption == -1
    P_FlocChannelHIteration1 otherwise
    = 1.59136 m
EN_FlocHoriz :=
    EN_FlocHoriz ← 1 if Q_Plant ≥ Q_MinHorizontal(P_FlocChannelH, S_FlocBaffleMin, Pi_JSOptimal, ED_Floc, J_Min) and H_FlocOption > -1
    EN_FlocHoriz ← 1 if H_FlocOption == -1
    EN_FlocHoriz ← 0 otherwise
HW_Sed = 1.59136 m
EN_FlocHoriz = 0
## Flocculator Functions
# FF1
# See choosing between horizontal and vertical.
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N_FlocSpacesFVMin(L, T, S) := Ceil((L + T)/(S + T), 2)  # Ceil to even number to ensure H/S not lower than 2.
N_FlocSpacesFVMax(L, T, S) := Floor((L + T)/(S + T), 2)
N_FlocSpacesFV(L, T, S) := Round((L + T)/(S + T), 2)
# FF2
# The function below can also be used directly to solve for Ρ by substituting S for Ρ
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# FF2
# recursive function
S_FlocBaffleIterative(Q, Ρ, J, S, ED) := (K_FlocBaffle*α_ε(J/S)/(2*J*ED))^(1/3)*Q/Ρ
# Monroe put this in to make step FGV2 more clear for vertical.
P_FlocBaffle(Q, J, S, ED) := (K_FlocBaffle*α_ε(J/S)/(2*J*ED))^(1/3)*Q/S
S_FlocBaffleF(Q, Ρ, J, ED) :=
    if EN_FlocHoriz == 0
        S ← S_FlocBaffleIterative(Q, Ρ, J, J/4, ED)
        error ← 1
        while error > 0.001
            S_new ← S_FlocBaffleIterative(Q, Ρ, J, S, ED)
            error ← |S - S_new|/(S + S_new)
            S ← S_new
    return S
# This function returns a spacing that gives the target energy dissipation rate.
# FF2
# From Monroe's Flocculation notes
S_FlocBaffleNonIterative(Q, P, Pi_JS, ED) := (Q/P)^(3/4)*(1/Pi_JS)^(1/4)*(K_FlocBaffle*α_ε(Pi_JS)/(2*ED))^(1/4)
EDH(Q, P, Pi_JS, S) := ((Q/P)^(3/4)*(1/Pi_JS)^(1/4)*(K_FlocBaffle*α_ε(Pi_JS)/2)^(1/4)/S)^4
# FF3
# FF4-6 are just needed for vertical. Might want to eventually change if we decide to make vertical flocculator untapered.
# FF4
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EDV(Q, J, S, Ρ) := α_ε(J/S)*K_FlocBaffle/(2*J)*(Q/(Ρ*S))^3
# FF5
# The following function cycles through each flocculator channel and checks the possible range of the number of baffles in a channel to see which number of baffles results in the correct energy dissipation rate and cumulative collision potential at the end of the channel.
# The following is Monroe's original code. Changes were made but seemed to make it not work so we reverted to original.
N_FlocSpacesPerChannelF(ED_ChannelRange, N_FlocSpacesMax, N_FlocSpacesMin) :=
    i ← 0
    while ED_ChannelRange[i] ≤ ED_Floc and i < (N_FlocSpacesMax - N_FlocSpacesMin)
        i ← i + 1
    i + N_FlocSpacesMin
# The number of baffles in the last channel needs to remain odd
# so that the water flows can flow through the exit port to
# the sed tank.
## Calculation of Flocculator Geometry
# FGH1
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# FGH2
# This should automatically be true for H.FlocOption=-1 because of the Choosing Between Horizontal and Vertical Algorithm. Check to be sure.
# FGH3
J_FlocChannelH := S_FlocBaffleCalcH*Pi_JSOptimal = 0.38541 m
# The minimum is technically zero (i.e. no baffles), but should avoid divide by zero problems (the number of baffles must be an even integer).  The number of baffles should be one less than the number of spaces
# FGH4
# FGH5
ψ_SpaceH := ψ_P(J_FlocChannelH, S_FlocBaffleCalcH) = 0.503121 m^(2/3)
# FGH6
# Calculate the number of spaces in each channel
Q_Plant = 317.006 gal/min
N_FlocChannelSpacesTotalH := ceil(CP_Floc/ψ_SpaceH) = 199
# FGH7
N_FlocChannelsH := ceil(N_FlocChannelSpacesTotalH/N_FlocSpacesPerChannelH) = 8
ChannelsH := 0 .. N_FlocChannelsH - 1  # range variable for the floc channels
# FGH8
S_FlocPortGapH := 0 m
N_FlocChannelSpacesH :=
    for i ∈ 0 .. N_FlocChannelsH - 1
        Spaces[i] ← N_FlocSpacesPerChannelH
    Spaces[last(Spaces)] ← N_FlocSpacesPerChannelH - 2 if (S_FlocPortGapH + W_InletChannelEst) > (2*S_FlocBaffleCalcH)
    return Spaces
# Should all be odd for horizontal
N_FlocChannelBafflesH := N_FlocChannelSpacesH - 1
N_FlocChannelBafflesH = [26; 26; 26; 26; 26; 26; 26; 24]
N_FlocBafflesH := sum(N_FlocChannelBafflesH) = 206  # Total number of baffles in the flocculator
# Now we need to calculate the following for each channel
# baffle center to center distance
# baffle separation distance
# head loss in each channel
# FGH9
S_FlocBaffleH := SofN_FlocBaffleF(L_Sed, T_FlocBaffleRigidH, N_FlocChannelSpacesH)
S_FlocBaffleH = [0.12847; 0.12847; 0.12847; 0.12847; 0.12847; 0.12847; 0.12847; 0.146748] m
J_FlocChannelH := Pi_JSOptimal*S_FlocBaffleH[0]  # Redefine J with actual baffle spacing
# FGV1
# If space large enough to be concrete, set width to optimal and H/S to 3. Know H so can get S. Similar to horizontal. Use non-iterative scheme to get number of spaces.
#
# If plastic, know width of channel (need to change in code). Rest of vertical same.
J_FlocChannelV :=
    H_FlocOption*m if H_FlocOption > 0
    HW_FlocEnd otherwise
T_FlocBafflePlastic := T_SedPlate
# FGV2
P_FlocChannelMin := P_FlocBaffle(Q_Plant, J_FlocChannelV, S_FlocBaffleMin, ED_Floc) = 0.263949 m
P_FlocChannelVPlastic := .5*W_Plastic = 0.53 m
L_SedModified := L_Sed - 2*S_FlocBaffleSetBackPlastic
S_FlocBafflePerChannelVPlastic := SofN_FlocBaffleF(L_SedModified, T_FlocBafflePlastic, N_FlocSpacesFVMax(L_SedModified, T_FlocBafflePlastic, S_FlocBaffleF(Q_Plant, P_FlocChannelVPlastic, J_FlocChannelV, ED_Floc))) = 0.249279 m
# FGV3
N_FlocSpacesPerChannelVPlastic := N_FlocSpacesFVMax(L_SedModified, T_FlocBafflePlastic, S_FlocBafflePerChannelVPlastic) = 24
# FGV4
J_FlocChannelV/2 = 0.795682 m
# FGV5
S_FlocBaffleOptimalVHumanMin := SofN_FlocBaffleF(L_Sed, T_FlocBaffleRigidV, N_FlocSpacesFV(L_Sed, T_FlocBaffleRigidV, J_FlocChannelV/Pi_JSOptimal)) = 0.561869 m
S_FlocBaffleMinVHumanMin := SofN_FlocBaffleF(L_Sed, T_FlocBaffleRigidV, N_FlocSpacesFVMax(L_Sed, T_FlocBaffleRigidV, S_FlocBaffleMin)) = 0.459891 m
# FGV3
S_FlocBafflePerChannelVHumanMin := max(S_FlocBaffleMinVHumanMin, S_FlocBaffleOptimalVHumanMin) = 0.561869 m
P_FlocChannelVHumanMin := P_FlocBaffle(Q_Plant, J_FlocChannelV, S_FlocBafflePerChannelVHumanMin, ED_Floc) = 0.211396 m
N_FlocSpacesPerChannelVHumanMin := N_FlocSpacesFV(L_Sed, T_FlocBaffleRigidV, S_FlocBafflePerChannelVHumanMin) = 10
P_FlocChannelV :=
    P_FlocChannelVHumanMin if P_FlocChannelMin > P_FlocChannelVPlastic
    P_FlocChannelVPlastic otherwise
    = 0.53 m
S_FlocBafflePerChannelV :=
    S_FlocBafflePerChannelVHumanMin if P_FlocChannelMin > P_FlocChannelVPlastic
    S_FlocBafflePerChannelVPlastic otherwise
    = 0.249279 m
N_FlocSpacesPerChannelV :=
    N_FlocSpacesPerChannelVHumanMin if P_FlocChannelMin > P_FlocChannelVPlastic
    N_FlocSpacesPerChannelVPlastic otherwise
    = 24
# Calculate the number of spaces in each channel
# FGV6
ψ_SpaceV := ψ_P(J_FlocChannelV, S_FlocBafflePerChannelV) = 1.26089 m^(2/3)
N_FlocChannelSpacesTotalV := ceil(CP_Floc/ψ_SpaceV) = 80
# This needs to happen here because X.FlocBaffles is returning a matrix having units of length. It will not allow us to return N.FlocChannelSpaces/Baffles because they are unitless...
N_FlocChannelsV := ceil(N_FlocChannelSpacesTotalV/N_FlocSpacesPerChannelV) = 4
ChannelsV := 0 .. N_FlocChannelsV - 1  # range variable for the floc channels
T_FlocBaffleV :=
    T_FlocBaffleRigidV if P_FlocChannelMin > P_FlocChannelVPlastic
    T_FlocBafflePlastic otherwise
    = 0.002 m
S_FlocBaffleV :=
    for i ∈ 0 .. N_FlocChannelsV - 1
        Spacing[i] ← S_FlocBafflePerChannelV
    Spacing[last(Spacing)] ← SofN_FlocBaffleF(L_Sed, T_FlocBaffleV, N_FlocSpacesPerChannelV - 1)
    return Spacing
    = [0.249279; 0.249279; 0.249279; 0.261943] m
EN_FlocBaffle :=
    EN_FlocBaffle ← 0 if (P_FlocChannelMin > P_FlocChannelVPlastic) or EN_FlocHoriz == 1
    EN_FlocBaffle ← 1 otherwise
    = 1  # Rigid is 0, Plastic is 1
EN_FlocHoriz = 0
S_FlocPortGapV :=
    T_ConcreteMin if EN_FlocBaffle == 0
    S_FlocBaffleSetBackPlastic otherwise
    = 0.02 m
N_FlocChannelSpacesV :=
    for i ∈ 0 .. N_FlocChannelsV - 1
        Spaces[i] ← N_FlocSpacesPerChannelV
    Spaces[last(Spaces)] ← N_FlocSpacesPerChannelV - 1
    return Spaces
    = [24; 24; 24; 23]
N_FlocChannelSpacesV[last(N_FlocChannelSpacesV)] :=
    N_FlocChannelSpacesV[last(N_FlocChannelSpacesV)] - 2 if (S_FlocPortGapV + W_InletChannelEst) > (2*S_FlocBaffleV[last(S_FlocBaffleV)])
    N_FlocChannelSpacesV[last(N_FlocChannelSpacesV)] otherwise
# Spacing gets reassigned later in the code if the first case is true.
N_FlocChannelBafflesV := N_FlocChannelSpacesV - 1 = [23; 23; 23; 22]
N_FlocBafflesV := sum(N_FlocChannelBafflesV) = 91  # Total number of baffles in the flocculator
## Assign Correct Variables for either Horizontal or Vertical
S_FlocBaffle :=
    S_FlocBaffle ← S_FlocBaffleH if EN_FlocHoriz == 1
    S_FlocBaffle ← S_FlocBaffleV otherwise
    = [0.249279; 0.249279; 0.249279; 0.261943] m
J_FlocChannel :=
    J_FlocChannel ← J_FlocChannelH if EN_FlocHoriz == 1
    J_FlocChannel ← J_FlocChannelV otherwise
    = 1.59136 m
P_FlocChannel :=
    P_FlocChannel ← P_FlocChannelH if EN_FlocHoriz == 1
    P_FlocChannel ← P_FlocChannelV otherwise
    = 0.53 m
J_FlocChannel = 1.59136 m
N_FlocBaffles :=
    N_FlocBaffles ← N_FlocBafflesH if EN_FlocHoriz == 1
    N_FlocBaffles ← N_FlocBafflesV otherwise
    = 91
N_FlocChannelBaffles :=
    N_FlocChannelBaffles ← N_FlocChannelBafflesH if EN_FlocHoriz == 1
    N_FlocChannelBaffles ← N_FlocChannelBafflesV otherwise
    = [23; 23; 23; 22]
N_FlocChannels :=
    N_FlocChannels ← N_FlocChannelsH if EN_FlocHoriz == 1
    N_FlocChannels ← N_FlocChannelsV otherwise
    = 4
N_FlocChannelSpaces :=
    N_FlocChannelSpaces ← N_FlocChannelSpacesH if EN_FlocHoriz == 1
    N_FlocChannelSpaces ← N_FlocChannelSpacesV otherwise
    = [24; 24; 24; 23]
Channels :=
    Channels ← ChannelsH if EN_FlocHoriz == 1
    Channels ← ChannelsV otherwise
HW_FlocEnd :=
    HW_FlocEnd ← P_FlocChannel if EN_FlocHoriz == 1
    HW_FlocEnd ← J_FlocChannel otherwise
    = 1.59136 m
# Need for drain calculations
W_FlocChannel :=
    W_FlocChannel ← J_FlocChannel if EN_FlocHoriz == 1
    W_FlocChannel ← P_FlocChannel otherwise
    = 0.53 m
# Needed for AutoCad code
HW_FlocChannel :=
    HW_FlocChannel ← P_FlocChannel if EN_FlocHoriz == 1
    HW_FlocChannel ← J_FlocChannel otherwise
T_FlocBaffle :=
    T_FlocBaffle ← T_FlocBaffleRigidH if EN_FlocHoriz == 1
    T_FlocBaffle ← T_FlocBaffleV otherwise
CP_Space :=
    CP_Space ← ψ_SpaceH if EN_FlocHoriz == 1
    CP_Space ← ψ_SpaceV otherwise
    = 1.26089 m^(2/3)
S_FlocPortGap :=
    S_FlocPortGap ← S_FlocPortGapH if EN_FlocHoriz == 1
    S_FlocPortGap ← S_FlocPortGapV otherwise
    = 0.02 m
S_FlocBaffleSetBack :=
    S_FlocBaffleSetBack ← S_FlocBaffleSetBackPlastic if EN_FlocBaffle == 1
    S_FlocBaffleSetBack ← 0 m otherwise
    = 0.02 m
W_FlocPortH := S_FlocBaffle = [0.249279; 0.249279; 0.249279; 0.261943] m
W_FlocPortV :=
    W_FlocPortV ← S_FlocBaffle - S_FlocPortGapV if EN_FlocBaffle == 0
    W_FlocPortV ← S_FlocBaffle otherwise
    = [0.249279; 0.249279; 0.249279; 0.261943] m
S_FlocBaffle = [0.249279; 0.249279; 0.249279; 0.261943] m
W_FlocPort :=
    W_FlocPort ← W_FlocPortH if EN_FlocHoriz == 1
    W_FlocPort ← W_FlocPortV otherwise
W_FlocPort0 := W_FlocPort[0] = 0.249279 m
S_FlocBaffle[last(S_FlocBaffle)] :=
    (L_Sed - W_InletChannelEst - 2*S_FlocPortGap - W_FlocPort[last(W_FlocPort) - 1] - T_FlocBaffle)/(N_FlocChannelSpaces[last(N_FlocChannelSpaces)] - 2) - T_FlocBaffle if (S_FlocPortGap + W_InletChannelEst) > S_FlocBaffle[last(S_FlocBaffle)]
    SofN_FlocBaffleF(L_Sed, T_FlocBaffle, N_FlocChannelSpaces[last(N_FlocChannelSpaces)]) otherwise
S_FlocBaffle = [0.249279; 0.249279; 0.249279; 0.257739] m
# FG1
S_FlocBaffleFirst := S_FlocBaffle[0]
S_FlocBaffleLast := S_FlocBaffle[last(S_FlocBaffle)]
N_FlocChannelBafflesFirst := N_FlocChannelBaffles[0] = 23
N_FlocChannelBafflesLast := N_FlocChannelBaffles[last(N_FlocChannelBaffles)] = 22
# Verify that the channels are all the correct length...
vectorize(N_FlocChannelSpaces*S_FlocBaffle) + (N_FlocChannelSpaces - 1)*T_FlocBaffle = [6.02869; 6.02869; 6.02869; 5.972] m
# Last one won't look right if had to be respaced because of overlap with inlet channel.
# FG2
ED_FlocChannel[Channels] :=
    ED_FlocChannel[Channels] ← EDH(Q_Plant, P_FlocChannel, Pi_JSOptimal, S_FlocBaffle[Channels]) if EN_FlocHoriz == 1
    ED_FlocChannel[Channels] ← EDV(Q_Plant, J_FlocChannel, S_FlocBaffle[Channels], P_FlocChannel) otherwise
ED_FlocChannel = [4.8474; 4.8474; 4.8474; 4.24159] mW/kg  # This is the actual energy dissipation rate in each channel
ED_FlocChannelFirst := ED_FlocChannel[0] = 4.8474 mW/kg
ED_FlocChannelLast := ED_FlocChannel[last(ED_FlocChannel)] = 4.24159 mW/kg
# Calculate the collision potential for each channel
CP_FlocChannel[Channels] := ψ_P(J_FlocChannel, S_FlocBaffle[Channels])*N_FlocChannelSpaces[Channels]
CP_FlocChannel = [30.2613; 30.2613; 30.2613; 29.1621] m^(2/3)
CP_FlocTotal := sum(CP_FlocChannel) = 119.946 m^(2/3)
# FG3
HL_FlocBaffle := K_FlocBaffle*Q_Plant^2/(2*g*(S_FlocBaffle*P_FlocChannel)^2) = [0.00233677; 0.00233677; 0.00233677; 0.00218588] m
# head loss per baffle in each channel
HL_FlocChannels := vectorize(HL_FlocBaffle*(N_FlocChannelBaffles + 1)) = [0.0560826; 0.0560826; 0.0560826; 0.0502752] m  # total head loss per channel
HL_Floc := HL_FlocBaffle*N_FlocChannelSpaces = 0.218523 m  # total head loss in the flocculator
H_Sed = 1.69136 m
HW_FlocStart :=
    (P_FlocChannel + HL_Floc) if EN_FlocHoriz == 1
    (J_FlocChannel + HL_Floc) otherwise
HW_Sed = 1.59136 m
# Here we are assuming that the entire flocculator has extra tall walls. But that isn't necessary. The walls could be different heights for each channel.
H_Floc := HW_FlocStart + H_PlantFreeboard = 1.90989 m
J_FlocChannel = 1.59136 m
# FG4
L_FlocTank := N_FlocChannels*L_Sed = 24.2748 m  # Total length of floc tanks
Ti_Floc := J_FlocChannel*L_FlocTank*P_FlocChannel/Q_Plant  # This is an estimate. It doesn't include ports, head loss, or space taken up by baffles.
# FG5
H_FlocPortH :=
    if EN_FlocHoriz == 1
        for i ∈ 0 .. N_FlocChannels - 1
            H_FlocPort[i] ← H_Floc
    return H_FlocPort
    = 0 m
A_FlocPortH := W_FlocPortH*H_FlocPortH = [0; 0; 0; 0] m^2
# FG5
W_FlocPortEstV := S_FlocBaffle = [24.9279; 24.9279; 24.9279; 25.7739] cm
H_FlocPortEstV := P_FlocChannel = 0.53 m
# This keeps the energy dissipation rate through the ports the same as through the baffles since the dimension of the port is actually exactly the same as the dimension through the baffles
A_FlocPortV := W_FlocPortEstV*H_FlocPortEstV = [0.132118; 0.132118; 0.132118; 0.136602] m^2
H_FlocPortV := A_FlocPortV/W_FlocPortV = [0.53; 0.53; 0.53; 0.521494] m
# FG5
H_FlocPort :=
    H_FlocPort ← H_FlocPortH if EN_FlocHoriz == 1
    H_FlocPort ← H_FlocPortV otherwise
    = [0.53; 0.53; 0.53; 0.521494] m
H_FlocPort0 := H_FlocPort[0] = 0.53 m
A_FlocPort :=
    A_FlocPort ← A_FlocPortH if EN_FlocHoriz == 1
    A_FlocPort ← A_FlocPortV otherwise
    = [0.132118; 0.132118; 0.132118; 0.136602] m^2
a
## Position calculations for each baffle
# Now we need to assign positions, lengths and elevations to floc baffles
# BP1
L_FlocBaffleLowerH := J_FlocChannel - S_FlocBaffle[0] = 1.34209 m  # Since we kept J.FlocChannel same for last channel too.
L_FlocBaffleUpperH := J_FlocChannel - S_FlocBaffle[0] = 1.34209 m
# BP1
L_FlocBaffleLowerV := HW_FlocEnd - S_FlocBaffle[0]*Pi_FlocBaffle = 1.34209 m
L_FlocBaffleUpperV := (H_Floc - .5*H_PlantFreeboard) - S_FlocBaffle[0]*Pi_FlocBaffle = 1.61061 m
# BP1
L_FlocBaffleLower :=
    L_FlocBaffleLower ← L_FlocBaffleLowerH if EN_FlocHoriz == 1
    L_FlocBaffleLower ← L_FlocBaffleLowerV otherwise
L_FlocBaffleUpper :=
    L_FlocBaffleUpper ← L_FlocBaffleUpperH if EN_FlocHoriz == 1
    L_FlocBaffleUpper ← L_FlocBaffleUpperV otherwise
N_FlocBaffleLowerV :=
    for i ∈ 0 .. N_FlocChannelsV - 1
        N_FlocBaffleLowerV[i] ← floor((N_FlocChannelBaffles[i] + 1)/2)
    return N_FlocBaffleLowerV
    = [12; 12; 12; 11]
N_FlocBaffleLowerTotalV := sum(N_FlocBaffleLowerV) = 47
N_FlocBaffleUpperV :=
    for i ∈ 0 .. N_FlocChannelsV - 1
        N_FlocBaffleUpperV[i] ← (N_FlocChannelBaffles[i] - N_FlocBaffleLowerV)[i]
    return N_FlocBaffleUpperV
    = [11; 11; 11; 11]
N_FlocBaffleUpperTotalV := sum(N_FlocBaffleUpperV) = 44
N_FlocBaffleLowerTotalV + N_FlocBaffleUpperTotalV + N_FlocChannelsV = 95
sum(N_FlocChannelSpaces) = 95
# BP2
L_Slot :=
    L_Slot ← T_ConcreteMin if EN_FlocBaffle == 0 and EN_FlocHoriz == 0
    L_Slot ← 0 m otherwise
W_FlocBaffle :=
    W_FlocChannel + 2*L_Slot if EN_FlocHoriz == 0
    H_Floc otherwise
B_FlocBaffle := S_FlocBaffle + T_FlocBaffle  # center to center distance
S_FlocBaffle = [0.249279; 0.249279; 0.249279; 0.257739] m
B_FlocBaffleFirst := B_FlocBaffle[0] = 0.251279 m
B_FlocBaffleLast := B_FlocBaffle[last(B_FlocBaffle)] = 0.259739 m
X_FlocBaffles :=
    for channel ∈ 0 .. N_FlocChannels - 1
        for i ∈ 0 .. N_FlocChannelBaffles[channel] - 1
            x[i, channel] ← S_FlocBaffle[channel] + S_FlocBaffleSetBack + B_FlocBaffle[channel]*i
    if (S_FlocPortGap + W_InletChannelEst) > S_FlocBaffle[last(S_FlocBaffle)]
        for i ∈ 0 .. N_FlocChannelBaffles[last(N_FlocChannelBaffles)] - 1
            x[i, N_FlocChannels - 1] ← B_FlocBaffle[last(B_FlocBaffle)]*i + S_FlocPortGap + W_InletChannelEst
        return x
    return x
# if the spacing between baffles is less than the sum of the inlet channel and the "lip" between ports and the nearest baffle, at least one baffle will be in the midst of the inlet channel (or too close to it). In this case, respace the baffles using the remaining length (Length of the sed tank - width of the inlet channel - "lip"). The remaining space should be divided by the number of calculated spaces -1 because one baffle would be aligned with the edge of the remaining space (not dividing it up into 2 spaces).
# if the spacing is not such that at least one baffle will be in the midst of the inlet channel, space normally.
S_FlocBaffle[last(S_FlocBaffle)] + B_FlocBaffle[last(S_FlocBaffle)]*0 = 0.257739 m
X_FlocBaffles = [
    0.269279, 0.269279, 0.269279, 0.34289;
    0.520558, 0.520558, 0.520558, 0.602629;
    0.771837, 0.771837, 0.771837, 0.862369;
    1.02312, 1.02312, 1.02312, 1.12211;
    1.27439, 1.27439, 1.27439, 1.38185;
    1.52567, 1.52567, 1.52567, 1.64159;
    1.77695, 1.77695, 1.77695, 1.90133;
    2.02823, 2.02823, 2.02823, 2.16106;
    2.27951, 2.27951, 2.27951, 2.4208;
    2.53079, 2.53079, 2.53079, 2.68054;
    2.78207, 2.78207, 2.78207, 2.94028;
    3.03335, 3.03335, 3.03335, 3.20002;
    3.28463, 3.28463, 3.28463, 3.45976;
    3.5359, 3.5359, 3.5359, 3.7195;
    3.78718, 3.78718, 3.78718, 3.97924;
    4.03846, 4.03846, 4.03846, 4.23898;
    4.28974, 4.28974, 4.28974, 4.49872;
    4.54102, 4.54102, 4.54102, 4.75846;
    4.7923, 4.7923, 4.7923, 5.0182;
    5.04358, 5.04358, 5.04358, 5.27794;
    5.29486, 5.29486, 5.29486, 5.53768;
    5.54614, 5.54614, 5.54614, 5.79741;
    5.79741, 5.79741, 5.79741, 0
] m
N_FlocChannelSpaces = [24; 24; 24; 23]
S_FlocBaffle = [0.249279; 0.249279; 0.249279; 0.257739] m
# Does not work for lower flow rates because there are no baffles in the floc tank, so the array cannot calculate coordinates
L_Sed = 6.06869 m
# X array is the distance from the inside of the wall of the floc tank (on the side of the plant that has the inlet channel to the sed tank) to the face of the baffle closest to that end of the floc tank
# BP3
Y_FlocBafflesH :=
    if EN_FlocHoriz == 1
        if mod(N_FlocChannels, 2) == 0
            for i ∈ 0 .. (N_FlocChannels - 1)
                for j ∈ 0 .. N_FlocChannelBaffles[i] - 1
                    Y_FlocBaffles[j, i] ← (Plant_Origin[1] + (N_SedTanks*(W_Sed + T_PlantWall)) + ((N_FlocChannels - i - 1)*(J_FlocChannel + T_PlantWall))) + mod(j, 2)*S_FlocBaffle[0] if mod(i, 2) == 1
                    Y_FlocBaffles[j, i] ← (Plant_Origin[1] + (N_SedTanks*(W_Sed + T_PlantWall)) + ((N_FlocChannels - i - 1)*(J_FlocChannel + T_PlantWall))) + mod(j + 1, 2)*S_FlocBaffle[0] otherwise
            Y_FlocBaffles[j, i]
        otherwise
            for i ∈ 0 .. (N_FlocChannels - 1)
                for j ∈ 0 .. N_FlocChannelBaffles[i] - 1
                    Y_FlocBaffles[j, i] ← (Plant_Origin[1] + (N_SedTanks*(W_Sed + T_PlantWall)) + ((N_FlocChannels - i - 1)*(J_FlocChannel + T_PlantWall))) + mod(j, 2)*S_FlocBaffle[0] if mod(i + 1, 2) == 1
                    Y_FlocBaffles[j, i] ← (Plant_Origin[1] + (N_SedTanks*(W_Sed + T_PlantWall)) + ((N_FlocChannels - i - 1)*(J_FlocChannel + T_PlantWall))) + mod(j + 1, 2)*S_FlocBaffle[0] otherwise
            Y_FlocBaffles[j, i]
    return Y_FlocBaffles
# S.FlocBaffle0 should be used because if the last channel is respaced it screws up how it is drawn so that there is a little gap between the bafflle and the edge of the channel.
# Even number of floc channels causes the entrance tank to switch sides
# Odd number of floc channels
Y_FlocBafflesV :=
    if EN_FlocHoriz == 0
        for j ∈ 0 .. (N_FlocChannels - 1)
            Y_FlocBaffles[0, j] ← Plant_Origin[1] + (N_SedTanks*(W_Sed + T_PlantWall)) + ((N_FlocChannels - j - 1)*(P_FlocChannel + T_PlantWall))
    return Y_FlocBaffles
Y_FlocBaffles :=
    Y_FlocBaffles ← Y_FlocBafflesH if EN_FlocHoriz == 1
    Y_FlocBaffles ← Y_FlocBafflesV otherwise
# BP4
S_FlocBaffle = [0.249279; 0.249279; 0.249279; 0.257739] m
Z_FlocBafflesH :=
    if EN_FlocHoriz == 1
        for channel ∈ Channels
            for i ∈ 0 .. N_FlocChannelBaffles[channel] - 1
                z[i, channel] ← 0 m
    return z
# Z array is the elevation of the bottom of the baffle
Y_FlocBaffles = [6.58, 5.9, 5.22, 4.54] m
# BP4
Channelsnew := 0 .. N_FlocChannels - 2
Z_FlocBafflesV :=
    if EN_FlocHoriz == 0
        for channel ∈ Channelsnew
            for i ∈ 0 .. N_FlocChannelBaffles[channel] - 1
                z[i, channel] ← mod(i, 2)*S_FlocBaffle[channel]
        for i ∈ 0 .. N_FlocChannelBaffles[last(N_FlocChannelBaffles)] - 1
            z[i, N_FlocChannels - 1] ← mod(i + 1, 2)*S_FlocBaffle[N_FlocChannels - 1]
    return z
# BP4
Z_FlocBaffles :=
    Z_FlocBaffles ← Z_FlocBafflesH if EN_FlocHoriz == 1
    Z_FlocBaffles ← Z_FlocBafflesV otherwise
Z_FlocBaffles = [
    0, 0, 0, 0.257739;
    0.249279, 0.249279, 0.249279, 0;
    0, 0, 0, 0.257739;
    0.249279, 0.249279, 0.249279, 0;
    0, 0, 0, 0.257739;
    0.249279, 0.249279, 0.249279, 0;
    0, 0, 0, 0.257739;
    0.249279, 0.249279, 0.249279, 0;
    0, 0, 0, 0.257739;
    0.249279, 0.249279, 0.249279, 0;
    0, 0, 0, 0.257739;
    0.249279, 0.249279, 0.249279, 0;
    0, 0, 0, 0.257739;
    0.249279, 0.249279, 0.249279, 0;
    0, 0, 0, 0.257739;
    0.249279, 0.249279, 0.249279, 0;
    0, 0, 0, 0.257739;
    0.249279, 0.249279, 0.249279, 0;
    0, 0, 0, 0.257739;
    0.249279, 0.249279, 0.249279, 0;
    0, 0, 0, 0.257739;
    0.249279, 0.249279, 0.249279, 0;
    0, 0, 0, 0
] m
# BP5
L_FlocBafflesH :=
    if EN_FlocHoriz == 1
        for channel ∈ Channels
            for i ∈ 0 .. N_FlocChannelBaffles[channel] - 1
                l[i, channel] ← L_FlocBaffleLower
    return l  # L array is the total height (length) of the baffle
# The lengths of all the baffles are the same for horizontal
# BP5
L_FlocBafflesV :=
    if EN_FlocHoriz == 0
        for channel ∈ Channelsnew
            for i ∈ 0 .. N_FlocChannelBaffles[channel] - 1
                l[i, channel] ← L_FlocBaffleUpper if mod(i, 2) == 1
                l[i, channel] ← L_FlocBaffleLower otherwise
        for i ∈ 0 .. N_FlocChannelBaffles[last(N_FlocChannelBaffles)] - 1
            l[i, N_FlocChannels - 1] ← L_FlocBaffleLower if mod(i, 2) == 1
            l[i, N_FlocChannels - 1] ← L_FlocBaffleUpper otherwise
    return l
# For the last channel, the length of the
# baffles needed to be changed since the
# up/down had been adjusted.
# BP5
L_FlocBaffles :=
    L_FlocBaffles ← L_FlocBafflesH if EN_FlocHoriz == 1
    L_FlocBaffles ← L_FlocBafflesV otherwise
L_FlocBaffles = [
    1.34209, 1.34209, 1.34209, 1.61061;
    1.61061, 1.61061, 1.61061, 1.34209;
    1.34209, 1.34209, 1.34209, 1.61061;
    1.61061, 1.61061, 1.61061, 1.34209;
    1.34209, 1.34209, 1.34209, 1.61061;
    1.61061, 1.61061, 1.61061, 1.34209;
    1.34209, 1.34209, 1.34209, 1.61061;
    1.61061, 1.61061, 1.61061, 1.34209;
    1.34209, 1.34209, 1.34209, 1.61061;
    1.61061, 1.61061, 1.61061, 1.34209;
    1.34209, 1.34209, 1.34209, 1.61061;
    1.61061, 1.61061, 1.61061, 1.34209;
    1.34209, 1.34209, 1.34209, 1.61061;
    1.61061, 1.61061, 1.61061, 1.34209;
    1.34209, 1.34209, 1.34209, 1.61061;
    1.61061, 1.61061, 1.61061, 1.34209;
    1.34209, 1.34209, 1.34209, 1.61061;
    1.61061, 1.61061, 1.61061, 1.34209;
    1.34209, 1.34209, 1.34209, 1.61061;
    1.61061, 1.61061, 1.61061, 1.34209;
    1.34209, 1.34209, 1.34209, 1.61061;
    1.61061, 1.61061, 1.61061, 1.34209;
    1.34209, 1.34209, 1.34209, 0
] m
L_FlocWithWalls := L_Sed + 2*T_PlantWall = 6.36869 m
W_FlocWithWalls := W_FlocChannel*N_FlocChannels + T_PlantWall*N_FlocChannels
# Doesnt include wall shared with sed tank because that is accounted for in sed tank.
Z_FlocTank := HW_Sed - HW_FlocChannel = 0 m
V_Floc := Q_Plant/(S_FlocBaffle[0]*P_FlocChannel) = 0.15138 m/s
Alpha_Epsilon := α_ε(J_FlocChannel/S_FlocBaffle[0]) = 2.22368
Alpha_Phi := α_ψ(J_FlocChannel/S_FlocBaffle[0]) = 0.925045
## Drain Calculations (Vertical)
# This is a program to calculate how much time is required to drain out a flocculator section. Each section of the flocculator is connected to one another with alternating holes on the bottom of the baffles. These holes are small enough not to disrupt flow over the baffles and big enough such that one drain will empty out all the sections.
# Initially, the tank is full. This is denoted at time=t(0).
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# Once the tanks start draining, at time=t(1) all the water is level.
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# At time=t(2), section 1 has begun to drain quicker than sections 2, 3 & 4.
# Each hole on the bottom of the baffles is treated as an orifice.
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# available valve diameters
ND_Valvem := [0.0508; 0.0762; 0.1016; 0.127; 0.1524; 0.1778; 0.2032]*m
Q_minor(K_minor, D, h1, h2) :=
    Q ← (π*D^2/4*sqrt(2*g*(h1 - h2)/K_minor)) if h1 - h2 > 0
    Q ← 0*m^3/s otherwise
# Base and width are defined as the base and width of a single channel
# We need to calculate 'n' different h values plus an extra 'h'
# which would be the value emptied from tank 1. The tanks are
# numbered from 1 to n
# There will only be n-1 different flows out from each tank
# . | .
t_masterV(base, width, D_Valve, K_Valve, h_initial, H_LowerBaffle, n_tanks) :=
    time ← (sqrt(h_initial) - sqrt(H_LowerBaffle))/((π*D_Valve^2/(8*n_tanks*base*width))*sqrt(2*g/K_Valve))
    Δt ← base*width*H_LowerBaffle/(Q_minor(K_Valve, D_Valve, H_LowerBaffle, 0 m)*100)
    for i ∈ 0 .. n_tanks
        h_tank[i] ← H_LowerBaffle
    h_tank[0] ← 0 m
    while h_tank[n_tanks, 0] > 1 mm
        time ← time + Δt
        for i ∈ 0 .. n_tanks
            Q[i] ← Q_minor(K_Valve, D_Valve, h_tank[i + 1], h_tank[i]) if i < n_tanks
            Q[i] ← 0*m^3/s otherwise
            h_tank[i] ← h_tank[i] + (Q[i] - Q[i - 1])*Δt/(base*width) if i > 0
            h_tank[i] ← 0 m otherwise
    return time  # initial guess for time based on the total number of tanks in each channel
# delta t is based on the height of the lower baffle in the first channel
# Solution path to get port area and valve diameter
# Find area of ports assuming all including valve are same area.
# Try solution with valve one size smaller
# find required port area
# If that doesn't work, then increase valve size
# find required port area
# These equations are from integration of the flow out of a tank with changing depth
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# If the valve is the flow limiter, the relationship is linear
# Below code has been updated 3/18/2010
# think about making this more generic?
# also exists in another form in pipe database
# The following function returns a port size based on allowable valve sizes
ND_FlocValveF(desiredT) :=
    tankDrainTime ← 100 hr
    i ← 0
    ND_Valve ← 0 m
    N_tanks ←
        N_FlocChannelBaffles[0] if N_FlocChannels > 2
        floor(N_FlocChannelBaffles[0]/2) otherwise
    ND_ValveStart ← NominalDiameter(sqrt(sqrt((HW_FlocEnd + HW_FlocStart)/2)/((π*desiredT/(8*L_Sed*2*(T_PlantWall + W_FlocChannel)))*sqrt(2*g/(K_GateValve + K_Exp)))), EN_PipeSpec)
    if EN_FlocHoriz == 0
        ND_Valve ← ND_Valvem[last(ND_Valvem)] if desiredT ≤ t_masterV(2*S_FlocBaffle[0], W_FlocChannel, innerdiameter(ND_Valvem[last(ND_Valvem)], EN_PipeSpec), K_GateValve + K_Exp, (HW_FlocEnd + HW_FlocStart)/2, L_FlocBaffleLower, N_tanks)
        i ← index(ND_ValveStart, ND_Valvem)
        while i < rows(ND_Valvem) and ND_Valve == 0 m
            tankDrainTime ← t_masterV(2*S_FlocBaffle[0], W_FlocChannel, innerdiameter(ND_Valvem[last(ND_Valvem)], EN_PipeSpec), K_GateValve + K_Exp, (HW_FlocEnd + HW_FlocStart)/2, L_FlocBaffleLower, N_tanks)
            ND_Valve ← ND_Valvem[i] if tankDrainTime < desiredT
            i ← i + 1 otherwise
            ND_Valve
    ND_Valve ← ND_ValveStart otherwise
    ND_Valve
# For vertical, the tank being drained is modeled as a series of tanks corresponding to the number of spaces between lower baffles in two channels (since valves are every other channel)
# Accounts for the case where there is only two channels and there will be a valve in both; divides the number of tanks by 2 in that case
# In the event the desired drain time cannot eb acheived by the alrgest valve size, the valve size is assigned to be the largest size
# For horizontal, calculates the ideal diameter then finds the next highest allowable diameter.  Assigns the largest valve size if the guess is larger than that.
ND_FlocValve := ND_FlocValveF(Ti_FlocDrain) = 3 in
D_FlocValve := 2*outerradius(ND_FlocValve) = 0.0889 m
H_FlocSlope := D_FlocValve/2
# Uses the nominal diameter of the valve to find the actual diameter (outer diameter of the  threaded side of the coupling/inner diameter of valve).  This is used to draw the drains more accurately.D FlocValve ends up being the ID of the valve and the OD of the coupling.
L_BafflePort := sqrt(π/4*D_FlocValve^2)
D_FlocScale := D_FlocValve/(1.16 m) = 0.0766379  # Scaling factor needed for insertion.  This is based on how the block is saved
# Assupmtions:
# The Flocculator can be assumed as one straight channel rather than wrapping back and forth
# The port size is calculated for the time to drain 2 channels, since there is a valve on at least every other channel
# The volume of each "tank" (space between baffles) is equal
# The size of a port is equal to the size of the valve
# The minor loss through the port is the same as the minor loss through the valve (Pi.VenaContractaOrifice)
# Drain Valve Position Calcs for Vertical Flocculator
Y_FlocDrainValves :=
    for i ∈ 0 .. ceil(N_FlocChannels/2) - 1
        y[i] ← Plant_Origin[1] + N_SedTanks*(W_Sed + T_PlantWall) + 0.5*W_FlocChannel + 2*(W_FlocChannel + T_PlantWall)*i
    y[N_FlocChannels/2] ← Plant_Origin[1] + N_SedTanks*(W_Sed + T_PlantWall) + 0.5*W_FlocChannel + (W_FlocChannel + T_PlantWall)*(N_FlocChannels - 1) if mod(N_FlocChannels, 2) == 0 and EN_FlocHoriz == 0
    y  # Makes Drain vales a vector even if there is only 1 valve to make drawing easier
# Makes Drain vales a vector even if there is only 1 valve to make drawing easier
# Starts calculating from the side closer tot he sed tank and moves towards the entrance tank.  Places the valve in the center of each channel so that the center of each valve is at-grade.
# Starts calculating from the side closer tot he sed tank and moves towards the entrance tank.  Places the valve in the center of each channel so that the center of each valve is at-grade.
Y_FlocDrainValves = [4.805; 6.165; 6.845] m
N_FlocValves := length(Y_FlocDrainValves) = 3
