## Model Inputs
D_Fractal := 2.3  # based on data from Adachi  # EN_Chem
# 0 is Alum
# 1 is PACl
NTU := 1.7*mg/L
D_Clay := 2 μm
# Data from Karen Swetland to compare with model. Effluent turbidity and PACl dose. PACl dose is given as concentration of aluminum.
Π_HD := 0.1  # ratio of clay platelet height to diameter
Φ := 45/24  # shape factor for drag on flocs used in terminal velocity equation
# ((AlO4Al12(OH)24(H2O)12)7+)
## Initial densities
ρ_Clay := 2650*kg/m^3
ρ_AlOH3 := 2420*kg/m^3
ρ_H2O := 1000*kg/m^3
ρ_PACl := 1138*kg/m^3
ν := 1*10^-6*m^2/s
MW_Ca := 40*gm/mole
MW_Al := 27*gm/mole
MW_S := 32.064*gm/mole
MW_O := 16*gm/mole
MW_H := 1.008*gm/mole
MW_C := 12*gm/mole
C_PAClDose84m15 := [
    2.7*10^-4;
    3.24*10^-4;
    3.89*10^-4;
    4.67*10^-4;
    5.6*10^-4;
    6.72*10^-4;
    8.06*10^-4;
    9.68*10^-4;
    1.161*10^-3;
    1.393*10^-3;
    1.672*10^-3;
    2.007*10^-3;
    2.408*10^-3;
    2.889*10^-3;
    3.467*10^-3;
    4.161*10^-3;
    4.993*10^-3;
    5.992*10^-3
]*kg/m^3
Ceff_15NTU84m := [
    0.017;
    0.015;
    0.011;
    0.01;
    7.935*10^-3;
    7.056*10^-3;
    5.186*10^-3;
    4.239*10^-3;
    3.611*10^-3;
    3.486*10^-3;
    2.768*10^-3;
    2.434*10^-3;
    2.463*10^-3;
    1.525*10^-3;
    1.275*10^-3;
    1.519*10^-3;
    1.804*10^-3;
    1.566*10^-3
]*kg/m^3
MW_Alum := 2*MW_Al + 3*(MW_S + 4*MW_O) + 14.3*(2*MW_H + MW_O)
MW_Alum = 599.821 gm/mol
MW_CalciumCarbonate := MW_Ca + MW_C + 3*MW_O
MW_AlOH3 := MW_Al + 3*(MW_O + MW_H)
MW_CalciumCarbonate = 100 gm/mol
MW_PACl := 13*MW_Al + 24*(MW_O + 2*MW_H) + 16*MW_O = 1039.38 gm/mol
ρ_PAClSolution(C_Al) := 0.492*C_Al*MW_PACl/(MW_Al*13) + ρ_H2O
# From Stock Tank Mixing report Fall 2013 https://confluence.cornell.edu/download/attachments/137953883/20131213_Research_Report.pdf?version=1&modificationDate=1386988551000
C_Alf(ρ_PAClSolution) := 13*MW_Al*(ρ_PAClSolution - ρ_H2O)/(0.492*MW_PACl)
# Given alum dose find alum hydroxide concentration
C_Precipitate(C_Al, EN_Chem) :=
    C_Precipitate ← C_Al/MW_Al*MW_AlOH3/1 if EN_Chem == 0
    C_Precipitate ← C_Al/MW_Al*MW_PACl/13 otherwise
    return C_Precipitate
D_Coag(EN_Chem) :=
    D_Coag ← 180 nm if EN_Chem == 0
    D_Coag ← 180 nm otherwise
    return D_Coag
η_Coag(EN_Chem) :=
    η_Coag ← 0.6*mm/s if EN_Chem == 0
    η_Coag ← 0.4*mm/s otherwise
    return η_Coag
C_Floc(C_Al, C_Clay, EN_Chem) := C_Precipitate(C_Al, EN_Chem) + C_Clay
Mole_Al(C_Al) := C_Al/MW_Al
N_A := 6.0221415*10^23*mole^-1
# annotation to a formula above: from The NIST Reference on Constants, Units, and Uncertainty, from CODATA Recommended Values of the Fundamental Constants - 2002, by Peter J. Mohr and Barry N. Taylor, National Institute of Standards and Technology.
L_SeparationAl(C_Al) := (1/(N_A*Mole_Al(C_Al)))^(1/3)  # Separation distance between Aluminum molecules
C_Precipitate(0.5*mg/L, 1)/ρ_PACl = 1.30106e-6
N_Clay(C_Clay, D_Clay) := C_Clay/(ρ_Clay*1/6*π*D_Clay^3)
L_SeparationColloids(C_Clay, D_Clay) := (ρ_Clay/C_Clay*π*D_Clay^3/6)^(1/3)  # Separation distance between clay particles
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ϕ_Floc.0(C_Al, C_Clay, EN_Chem) :=
    ϕ_Floc.0 ← C_Precipitate(C_Al, EN_Chem)/ρ_AlOH3 + C_Clay/ρ_Clay if EN_Chem == 0
    ϕ_Floc.0 ← C_Precipitate(C_Al, EN_Chem)/ρ_PACl + C_Clay/ρ_Clay otherwise
    return ϕ_Floc.0
1/ρ_AlOH3 + C_Clay/ρ_Clay
## Fractal functions
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d(D_Fractal, d_0, i) := d_0*2^(i/D_Fractal)
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n(D_Fractal, d_0, d) := D_Fractal*log(d/d_0, 2)
L_Separation(C_Al, C_Clay, EN_Chem, D_Fractal, d_0, d) := d_0*(π/(6*ϕ_Floc.0(C_Al, C_Clay, EN_Chem)))^(1/3)*(d/d_0)^(D_Fractal/3)
ϕ(C_Al, C_Clay, EN_Chem, D_Fractal, d_0, d) := ϕ_Floc.0(C_Al, C_Clay, EN_Chem)*(d/d_0)^(3 - D_Fractal)
ρ_Floc.0(C_Al, C_Clay, EN_Chem) := C_Floc(C_Al, C_Clay, EN_Chem)/ϕ_Floc.0(C_Al, C_Clay, EN_Chem)
## Floc density as a function of size
ρ_Floc(C_Al, C_Clay, D_Fractal, d_0, d, EN_Chem) := ((ρ_Floc.0(C_Al, C_Clay, EN_Chem) - ρ_H2O)*(d_0/d)^(3 - D_Fractal) + ρ_H2O)
## Floc terminal velocity
V_t(C_Al, C_Clay, EN_Chem, D_Fractal, d_0, d) := g*d_0^2/(18*Φ*ν)*(ρ_Floc.0(C_Al, C_Clay, EN_Chem) - ρ_H2O)/ρ_H2O*(d/d_0)^(D_Fractal - 1)
## Floc diameter as a function of terminal velocity
d_fVt(C_Al, C_Clay, EN_Chem, D_Fractal, d_0, V_t) := d_0*(18*V_t*Φ*ν/(g*d_0^2)*ρ_H2O/(ρ_Floc.0(C_Al, C_Clay, EN_Chem) - ρ_H2O))^(1/(D_Fractal - 1))
## Collision times for laminar and turbulent flow mediated collisions
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t_claminar(C_Al, C_Clay, EN_Chem, D_Fractal, d_0, d, ε) := 1/6*(6/π)^(1/3)*ϕ_Floc.0(C_Al, C_Clay, EN_Chem)^(-2/3)*(ν/ε)^(1/2)*(d/d_0)^(2*D_Fractal/3 - 2)
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t_cturbulent(C_Al, C_Clay, EN_Chem, D_Fractal, d_0, d, ε) := 1/6*(6/π)^(1/9)*ϕ_Floc.0(C_Al, C_Clay, EN_Chem)^(-8/9)*ε^(-1/3)*d^(2/3)*(d/d_0)^(8*(D_Fractal - 3)/9)
## Kolmogorov length scale
η_Kolmogorov(ε) := (ν^3/ε)^(1/4)
# Size of the floc that has separation distances equal to the Kolmogorov length scale
D_Kolmogorov(C_Al, C_Clay, EN_Chem, d_0, D_Fractal, ε) := d_0*(1/d_0*(ν^3/ε)^(1/4)*(6*ϕ_Floc.0(C_Al, C_Clay, EN_Chem)/π)^(1/3))^(3/D_Fractal)
t_c(C_Al, C_Clay, EN_Chem, D_Fractal, d_0, d, ε) :=
    t_c ← t_claminar(C_Al, C_Clay, EN_Chem, D_Fractal, d_0, d, ε) if L_Separation(C_Al, C_Clay, EN_Chem, D_Fractal, d_0, d) ≤ η_Kolmogorov(ε)
    t_c ← t_cturbulent(C_Al, C_Clay, EN_Chem, D_Fractal, d_0, d, ε) otherwise
    return t_c
t_FlocTotal(C_Al, C_Clay, EN_Chem, D_Fractal, d_0, d_Final, ε) :=
    n ← n(D_Fractal, d_0, d_Final)
    t ← 0 s
    for i ∈ 0 .. n - 1
        t ← t + t_c(C_Al, C_Clay, EN_Chem, D_Fractal, d_0, d(D_Fractal, d_0, i), ε)
    return t
# Use this function for turbulent flow reactors to calculate the total time for a sequence of collisions
t_FlocTotalLaminar(C_Al, C_Clay, EN_Chem, D_Fractal, d_0, d_Final, ε, Π) :=
    n ← n(D_Fractal, d_0, d_Final)
    t ← 0 s
    for i ∈ 0 .. n - 1
        t ← t + t_claminar(C_Al, C_Clay, EN_Chem, D_Fractal, d_0, d(D_Fractal, d_0, i), ε)
    return t*Π  # Use this function for laminar flow reactors to calculate the total time for a sequence of collisions
D_FlocMaxf(ε) := 75*μm*(W/kg/ε)^(1/3)
# based on Ian's work with floc size as a function of energy dissipation rate, but this is for the average energy dissipation rate in a tube flocculator. It isn't clear how to convert this to the turbulent flow case. Maybe the flocs are mostly experiencing viscous shear. But that isn't clear. Some authors have made the case that floc breakup is due to viscous effects. If that is the case, then the results from the tube flocculatolr should be applicable to the turbulent case. But we have to account for the temporal and spatial variability in the turbulent energy dissipation rate.
ε_D(D) := ((75 μm)/D)^3*W/kg  # Energy dissipation rate as a function of maximum floc diameter.
## Velocity gradient in coiled tubing
G_Straight(Q_Plant, ID_Tube) := 64*Q_Plant/(3*π*ID_Tube^3)
# Reynolds number
Re_Rm(Q_Plant, ID_Tube) := 4*Q_Plant/(π*ID_Tube*ν)
# Dean number
De(Q_Plant, ID_Tube, R_Coil) := Re_Rm(Q_Plant, ID_Tube)*(ID_Tube/(2*R_Coil))^(1/2)
G_Coil(Q_Plant, ID_Tube, R_Coil) := G_Straight(Q_Plant, ID_Tube)*(1 + 0.033*log(De(Q_Plant, ID_Tube, R_Coil))^4)^(1/2)
θ_Tube(ID_Tube, L_Tube, Q_Plant) := L_Tube*π*ID_Tube^2/4/Q_Plant
# Coverage of particles with Coagulant and loss to the flocculator walls
# Surface area to volume ratio for clay normalized by surface area to volume ratio for a sphere
Π_ClaySphere(Π_HD) := (1/2 + Π_HD)*(2/(3*Π_HD))^(2/3)
# Surface area of clay normalized by total surface of clay + reactor walls
Π_AClayATotal(C_Clay, D_Clay, D_Tube, Π_HD) := 1/(1 + 2*D_Clay/(3*D_Tube*Π_ClaySphere(Π_HD)*C_Clay/ρ_Clay))
Γ_Coag(C_Clay, C_Al, EN_Chem, D_Tube, D_Clay, Π_HD) := 1 - exp(-ϕ_Floc.0(C_Al, 0*mg/L, EN_Chem)*D_Clay/(ϕ_Floc.0(0*mg/L, C_Clay, EN_Chem)*D_Coag(EN_Chem))*1/π*Π_AClayATotal(C_Clay, D_Clay, D_Tube, Π_HD)/Π_ClaySphere(Π_HD))
LambertW(a) :=
    " formula : courtesy Tom "
    x ←
        ln(a) - ln(ln(a)) if a > e
        error("Argment must be > -1/e") if a < -1/e
        sqrt(a + 1/e) - sqrt(1/e) otherwise
    x_p ← 2*x
    while |x - x_p|/|x| > 10^-10
        x_p ← x
        x ← (x^2 + a*e^(-x))/(1 + x)
    x
Gθ(Q_Plant, ID_Tube, R_Coil, L_Tube) := G_Coil(Q_Plant, ID_Tube, R_Coil)*θ_Tube(ID_Tube, L_Tube, Q_Plant)
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p(C, C_0) := -log(C/C_0)
# The coagulant dose is the concentration of aluminum.
pC_ModelSimple(Gθ_Floc, Gθ_Rm, Γ, ϕ, ψ_P1, EN_Chem, V_Capture) := 3*log(e)/2*LambertW(2/3*((Gθ_Floc + Gθ_Rm)*Γ*ϕ^(2/3) - ψ_P1)*η_Coag(EN_Chem)/V_Capture)
# The coagulant dose is the concentration of aluminum.
pC_ModelFull(Q_Plant, ID_Floc, R_CoilFloc, L_Floc, ID_Rm, R_CoilRm, L_Rm, C_Clay, C_Al, D_Clay, Π_HD, ψ_P1, EN_Chem, V_Capture) := 3*log(e)/2*LambertW(2/3*((Gθ(Q_Plant, ID_Floc, R_CoilFloc, L_Floc) + Gθ(Q_Plant, ID_Rm, R_CoilRm, L_Rm))*Γ_Coag(C_Clay, C_Al, EN_Chem, ID_Floc, D_Clay, Π_HD)*ϕ(C_Al, C_Clay, EN_Chem, D_Fractal, D_Clay, D_Clay)^(2/3) - ψ_P1)*η_Coag(EN_Chem)/V_Capture)
ψ_P2(C_Star, V_Capture, ψ_P1, EN_Chem) := -V_Capture/η_Coag(EN_Chem)*C_Star^(-2/3)*ln(C_Star) + ψ_P1
# This is useful in graphs where we have the phase 2 ψ for the data.
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## Example calculations for Karen's research
L_Rm := 120 cm
Q_Plant := 5*mL/s
R_CoilRm := 2.5 cm
ID_Floc := 3/8*in
ID_Rm := 4.3 mm
R_CoilFloc := 5.5 cm  # need to confirm
ψ_P1 := 0.4
L_Floc := 84 m
EN_Chem := 1
C_Clay := 15*NTU
V_Capture := 0.12*mm/s
i := 0 .. last(C_PAClDose84m15)
pC_ModelFull(Q_Plant, ID_Floc, R_CoilFloc, L_Floc, ID_Rm, R_CoilRm, L_Rm, C_Clay, C_PAClDose84m15[1], D_Clay, Π_HD, ψ_P1, EN_Chem, V_Capture) = 0.205304
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