References
References
# [reference: BasicInputs.xmcd]
# [reference: ExpertInputs.xmcd]
# [reference: MathFunctions.xmcd]
# [reference: PipeDatabase.xmcd]
# [reference: MinorLossCoefficients.xmcd]
# [reference: FluidsFunctions.xmcd]
# [reference: DesignAssumptions.xmcd]
# Solution steps
#
# Perform a preliminary design using the Sutro weir algorthms to determine the minimum pipe diameter. This calculation is based on the vertical component of momentum of the water falling inside the LFOM pipe measured at the very bottom of the LFOM. This momentum is converted into a velocity. This velocity sets the minimum pipe size for the pipe carrying the water to the flocculator.
# Determine the maximum drill diameter based on the area of the Sutro Weir between the top two rows of orifices. Determine the maximum drill diameter based on the requirement that the drill diameter be less than the row spacing. Take the minimum of these two maximums.
# Design the orifice pattern for the LFOM.
K_Rm := 2  # This is an estimate that should be calculated more carefully based on elbows and Tee in between entrance tank and flocculator
N_Lfom = 1
Inputs
H_dmax = 0.2 m
Π_Sutro := 0.1  # The depth over which the sutro weir is not accurate
Π_Lfomorifice := 10  # Ratio of total height of Lfom to row height (center to center distance between orifices)
Π_SutroSafety := 2
# This is the ratio of the LFOM pipe area to the minimum pipe area required to carry the falling jets of water based on conservation of momentum. A value of 1 would approach failure.
s_Sutro := 3/2*Π_Sutro*H_dmax = 3 cm  # The height of the bottom portion of a Sutro weir that is rectangular
y(x, H_dmax) :=
    1/(2*H_dmax^(3/2)*Pi_VenaContractaOrifice*sqrt(3*g*Π_Sutro))*(1 - 2/π*atan(sqrt(x/s_Sutro))) if x > 0
    1/(2*H_dmax^(3/2)*Pi_VenaContractaOrifice*sqrt(3*g*Π_Sutro)) otherwise  # half width of the sutro weir per unit of flow (multiply by Q to get the half width)
h := H_dmax - 2/3*s_Sutro
ρ := 1000*kg/m^3
# This is the momentum (when multiplied by Q.Plant) of the falling jets at the bottom of the LFOM. Note that this is approximate due to the fact that the Sutro Weir has a small portion of the weir that extends below the zero elevation. (unlike the LFOM)
M_in := 4*g*ρ*Pi_VenaContractaOrifice*integral(sqrt((x + s_Sutro)*(h - x))*y(x, H_dmax), x = -s_Sutro .. h)
# This is the maximum allowed average velocity in the pipe at the bottom of the LFOM
# This calculation shows that the head loss in the rapid mix pipe will be kept low if we use the constraint based on the momentum at the bottom of the LFOM to design the rapid mix pipe diameter.
V_out := M_in/(ρ*Π_SutroSafety)
2*V_out^2/(2*g) = 2.42986 cm
A_LfomMin(Q_max) := Q_max/V_out
D_LfomMin(Q_max) := sqrt(4*A_LfomMin(Q_max)/π)
D_LfomMin(Q_Plant) = 0.176917 m
ND_Lfom := NominalDiameter(D_LfomMin(Q_Plant), EN_PipeSpec)  # This is the diameter of the rapid mix pipe
ND_Lfom = 8 in
ND_Rm := ND_Lfom
# Define the spacing between rows
B_LfomOrifices := H_dmax/Π_Lfomorifice
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# Number of risers
ID_Lfom := innerdiameter(ND_Lfom, EN_PipeSpec)
ID_Lfom = 7.921 in
HL_Rm := h_l(Q_Plant, ID_Lfom, L_RmPipe, K_Rm, Nu_Water, E_Pvc) = 1.46838 cm
## Design maximum diameter of orifice based on area of Lfom between top two rows
x := H_dmax*(1 - Π_Sutro) - B_LfomOrifices/2
A_LfomOrifceMax := 2*Q_Plant*B_LfomOrifices*y(H_dmax*(1 - Π_Sutro) - B_LfomOrifices/2, H_dmax)
A_LfomOrifceMax = 0.000628695 m^2
D_LfomOrificeMax := min(D_circle(A_LfomOrifceMax), B_LfomOrifices)
# The constraint that the orifice size be less than the vertical spacing between orifice rows may not be necessary.
D_LfomOrifices := RoundNearest(D_LfomOrificeMax, D_Drill)
D_LfomOrifices = 0.8125 in
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# Create the arrays at which to evaluate the LFOM for flow rate and orifice placement
s_s := Π_Sutro*H_dmax = 2 cm  # This is the space at the bottom of the LFOM that doesn't have a linear relationship between flow and height.
initalloc := 0 cm
Loc_start := Π_Sutro*H_dmax + B_LfomOrifices*Pi_LfomH
H_flowloc(s_s, B_LfomOrifices, HL_Lfom, Loc_start) := rampwithjump(s_s, Loc_start, B_LfomOrifices, HL_Lfom)
H_orificeloc(B_LfomOrifices, HL_Lfom, s_s) := rampwithjump(0 cm, s_s, B_LfomOrifices, HL_Lfom)
H_LfomOrifice := H_orificeloc(B_LfomOrifices, HL_Lfom, s_s)  # locations where we will try to get the target flows is in between orifices at elevation Pi.H
Q_ramp(B_LfomOrifices, HL_Lfom, s_s) := H_flowloc(s_s, B_LfomOrifices, HL_Lfom, Loc_start)/HL_Lfom*Q_Plant/N_Lfom  # Target riser flows
# Calculate the flow for a given number of submerged rows of orifices
Q_LfomActual(RowIndexSubmerged, n_Lfomorifices, B_LfomOrifices, D_Lfomorifice, HL_Lfom, s_s) :=
    Q ← 0*L/min
    for i ∈ 0 .. RowIndexSubmerged
        Q ← Q + n_Lfomorifices[i]*Q_orifice(D_Lfomorifice, H_flowloc(s_s, B_LfomOrifices, HL_Lfom, Loc_start)[RowIndexSubmerged] - H_orificeloc(B_LfomOrifices, HL_Lfom, s_s)[i], Pi_VenaContractaOrifice)
    return Q
# Calculate number of orifices at each level given a diameter
fN_LfomOrifices(B_LfomOrifices, D_LfomOrifice, HL_Lfom, s_s) :=
    Q_ramplocal ← Q_ramp(B_LfomOrifices, HL_Lfom, s_s)
    H_ramplocal ← H_orificeloc(B_LfomOrifices, HL_Lfom, s_s)
    n[last(H_ramplocal)] ← 0
    for i ∈ 0 .. last(H_ramplocal)
        n[i] ← max(0, round((Q_ramplocal[i] - Q_LfomActual(i, n, B_LfomOrifices, D_LfomOrifice, HL_Lfom, s_s))/Q_orifice(D_LfomOrifice, H_flowloc(s_s, B_LfomOrifices, HL_Lfom, Loc_start)[i] - H_orificeloc(B_LfomOrifices, HL_Lfom, s_s)[i], Pi_VenaContractaOrifice)))
    return n
# Renaming the function
N_LfomOrifices := fN_LfomOrifices(B_LfomOrifices, D_LfomOrifices, HL_Lfom, s_s)
# This function calculates the error of the design based on the differences between the predicted flow rate and the actual flow rate through the LFOM.
Q_LfomError(N_LfomOrifices, B_LfomOrifices, D_LfomOrifices, HL_Lfom, s_s, Q_Plant, N_Lfom) :=
    for j ∈ 0 .. last(N_LfomOrifices)
        Q_LfomError[j] ← N_Lfom*(Q_LfomActual(j, N_LfomOrifices, B_LfomOrifices, D_LfomOrifices, HL_Lfom, s_s) - Q_ramp(B_LfomOrifices, HL_Lfom, s_s)[j])/Q_Plant
    return Q_LfomError
# This funciton returns the maximum error, the absolute value of the errors is take into account positive and negative errors.
Q_LfomErrorMax := max(sqrt(Q_LfomError(N_LfomOrifices, B_LfomOrifices, D_LfomOrifices, HL_Lfom, s_s, Q_Plant, N_Lfom)^2))
Q_LfomErrorMax = 0.425326 %
# This graph plots the error as a function height of water in the entrance tank.
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N_LfomOrifices = [9; 4; 5; 4; 2; 3; 3; 2; 2; 1; 3]  # This is the number of orifices at each row starting with the bottom row
# This is the height of each row starting  with the bottom row as the datum
H_LfomOrifice = [0; 0.02; 0.04; 0.06; 0.08; 0.1; 0.12; 0.14; 0.16; 0.18; 0.2] m
D_LfomOrifices = 0.0206375 m  # This is the diameter of the orifices
