# Linear Chemical Dose Controller
# Select the set of available tubing diameters
# [component: outputs tubediameterunitsystem]
# Select the coagulant to be used
# [component: outputs EN_Coag]
# Maximum and Minimum Tube Length to Span the Walkway without Hitting the Floor
D_CdcTubeWeight := 4 in
H_CdcTubeLong := ZW_CdcCht - Z_Walkway - D_CdcTubeWeight/2
H_CdcTubeShort := Z_EtTop + H_DoserAssembly - Z_Walkway - HL_Cdc - D_CdcTubeWeight/2
X_TubeDrape := W_PlantDC*H_CdcTubeShort/(H_CdcTubeLong + H_CdcTubeShort)
H_CdcTubeLong/(W_PlantDC - x) == H_CdcTubeShort/x
L_CdcTubeMax := sqrt(H_CdcTubeLong^2 + (W_PlantDC - X_TubeDrape)^2) + sqrt(H_CdcTubeShort^2 + X_TubeDrape^2) = 2.1126 m  # slight underestimate
L_CdcTubeMin := sqrt(W_PlantDC^2 + HL_Cdc^2) = 1.0198 m
# Functions for Coagulant Viscosities and Selecting Available Tube Diameters
D_TubeAvailable :=
    D ← D_TubeMetric if tubediameterunitsystem
    D ← D_TubeEnglish otherwise
    return D
Nu_Alum(C_Alum) := (1 + 4.255*10^-6*(C_Alum/(kg/m^3))^2.289)*Nu_Water
Nu_PACl(C_PACl) := (1 + 2.383*10^-5*(C_PACl/(kg/m^3))^1.893)*Nu_Water
Nu_Coag(C_Coag, EN_Coag) :=
    Nu ← Nu_Alum(C_Coag) if EN_Coag == 0
    Nu ← Nu_PACl(C_Coag) otherwise
    return Nu
# Tube Diameter Constraints for Laminar Flow and Deviation from Linear Head Loss Behavior
# Minimum diameter for which flow is still laminar at max flow rate
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D_TubeMinLaminar(Q_Max, ν) := 4*Q_Max/(π*ν*Re_PipeTransition)
# Now calculate the minimum diameter which ensures less than 10% error in flow caused by minor losses
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D_TubeMinError(Q_Max, HL_Max) := (8*Q_Max^2*K_CdcTube/((1 - Π_LinearCdcError)*HL_Max*g*π^2)*(1/Π_LinearCdcError - Π_Q))^(1/4)
# The minimum diameter is constrained by both the requirement that tube flow be laminar and that there is a maximum acceptable deviation from linear head loss behavior
D_Min(Q_Max, HL_Max, ν) := max(D_TubeMinLaminar(Q_Max, ν), D_TubeMinError(Q_Max, HL_Max))
# Now we use the forceround function to select the design tube diameter, which is the smallest of the available tube diameters which is still greater than the minimum allowable tube diameter calculated by the function defined above
D_Design(Q_Max, HL_Max, ν) := ForceRound(D_Min(Q_Max, HL_Max, ν), D_TubeAvailable, 1)
# Flow Rate Constraints for Laminar Tube Flow, Deviation from Linear Head Loss Behavior, and Lowest Possible Flow
# This is the estimated maximum flow that can be sent through the a single tube without exceeding the maximum tube length. It is based on eliminating diameter from the Hagen-Poiseuille equation by using the maximum Reynolds number constraint
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Q_MaxLaminar(L_Max, HL_Max, ν) := (L_Max*Re_PipeTransition^4*π^3*ν^5/(2*g*HL_Max))^(1/3)
# Maximum flow that can be put through a tube of a given diameter without exceeding the allowable deviation from linear head loss behavior
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Q_MaxError(D) := π*D^2*sqrt((1 - Π_LinearCdcError)*HL_Cdc*g/(8*K_CdcTube*(1/Π_LinearCdcError - Π_Q)))
# The max flow rate through a dosing tube is the minimum of the previous two constraints
Q_TubeMax(D, L_Max, HL_Max, ν) := min(Q_MaxLaminar(L_Max, HL_Max, ν), Q_MaxError(D))
# At very low flows the design will fail given a finite set of tube diameters and a maximum allowable length. Thus calculate the minimum design flow that can be produced based on the Hagen-Poiseuille equation.
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Q_Min(L_Max, HL_Max, D_Min, ν) := HL_Max*g*π*D_Min^4/(128*ν*L_Max)
# Define a range of feasible coagulant flow rates for plotting. Note that the minimum flow plotted is the minimum design flow (which is the maximum flow for a given design). The maximum flow is set by the constraint for laminar tube flow.
Q_Range := Q_Min(L_CdcTubeMax, HL_Cdc, D_TubeAvailable[0], Nu_Coag(C_CoagStockMax, EN_Coag)), Q_Min(L_CdcTubeMax, HL_Cdc, D_TubeAvailable[0], Nu_Coag(C_CoagStockMax, EN_Coag)) + 1*mL/min .. Q_TubeMax(D_TubeAvailable[last(D_TubeAvailable)], L_CdcTubeMax, HL_Cdc, Nu_Coag(C_CoagStockMax, EN_Coag))
# Length of Tubing Required Given Head Loss, Max Flow, and Diameter
# Length of tube required to get desired head loss at maximum flow based on the Hagen-Poiseuille equation.
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L_Tube(Q_Max, D, HL_Max, ν, K_Minor) := (HL_Max*g*π*vectorize(vectorize(D*D)*vectorize(D*D))/Q_Max - K_Minor*8*Q_Max/π)/(128*ν)
# The maximum tube length constraint may be violated if there aren't enough available tubing diameters.
L_MaxLine(Q) := L_CdcTubeMax
i := 0 .. last(D_TubeAvailable)
Q_CdcDesiredAlt[i] := Q_TubeMax(D_TubeAvailable[i], L_CdcTubeMax, HL_Cdc, Nu_Coag(C_CoagStockMax, EN_Coag))
Q_CdcDesired[i] := floor(2*Q_TubeMax(D_TubeAvailable[i], L_CdcTubeMax, HL_Cdc, Nu_Coag(C_CoagStockMax, EN_Coag))/(mL/s))*mL/s/2
# Note: Monroe suggests constraining to a multiple of 0.25 mL/s
# round for convenient flow values
# Main Coagulant Small-Diameter Tube Design
Q_CoagMin := Q_Plant*C_CoagDoseMax/C_CoagStockMax = 4.8 mL/s
N_CoagCdcTubeArray := ArrayTrunc(ceil(Q_CoagMin/Q_CdcDesired)) = [10; 5; 3; 2; 1]
Q_CoagStockArray := vectorize(submatrix(Q_CdcDesired, 0, last(N_CoagCdcTubeArray), 0, 0)*N_CoagCdcTubeArray) = [5e-6; 5e-6; 6e-6; 7e-6; 5e-6] m^3/s
C_CoagStockArray := C_CoagDoseMax*Q_Plant/Q_CoagStockArray = [384; 384; 320; 274.286; 384] kg/m^3
L_CoagCdcTubeArray := L_Tube(submatrix(Q_CdcDesired, 0, last(N_CoagCdcTubeArray), 0, 0), submatrix(D_TubeAvailable, 0, last(N_CoagCdcTubeArray), 0, 0), HL_Cdc, Nu_Coag(C_CoagStockArray, EN_Coag), K_CdcTube) = [0.199964; 0.512397; 0.987209; 1.57792; 1.59326] m
L_CoagCdcTube :=
    min(L_CoagCdcTubeArray) if min(L_CoagCdcTubeArray) > L_CdcTubeMax or last(L_CoagCdcTubeArray) == 0
    FloorNearest(L_CdcTubeMax, L_CoagCdcTubeArray) otherwise
    = 1.59326 m
Q_CoagStock := Q_CoagStockArray[index(L_CoagCdcTube, L_CoagCdcTubeArray)] = 5e-6 m^3/s
D_CdcCoag := D_TubeAvailable[index(Q_CoagStockArray[index(L_CoagCdcTube, L_CoagCdcTubeArray)]/N_CoagCdcTubeArray[index(L_CoagCdcTube, L_CoagCdcTubeArray)], Q_CdcDesired)] = 0.0047625 m
D_CdcCoag =  # error: This variable is undefined.
N_CoagCdcTubes := N_CoagCdcTubeArray[index(L_CoagCdcTube, L_CoagCdcTubeArray)] = 1
C_CoagStock := C_CoagStockArray[index(L_CoagCdcTube, L_CoagCdcTubeArray)] = 384 kg/m^3
# Chlorine Small-Diameter Tube Design
Q_ChlorMin := Q_Plant*C_ChlorineDoseMax/C_ChlorineStockMax = 1.28 mL/s
N_ChlorCdcTubeArray := ArrayTrunc(ceil(Q_ChlorMin/Q_CdcDesired))
N_ChlorCdcTubeArray =  # error
Q_ChlorStockArray := vectorize(submatrix(Q_CdcDesired, 0, last(N_ChlorCdcTubeArray), 0, 0)*N_ChlorCdcTubeArray) = [1.5e-6; 2e-6; 2e-6] m^3/s
C_ChlorStockArray := C_ChlorineDoseMax*Q_Plant/Q_ChlorStockArray = [42.6667; 32; 32] kg/m^3
L_ChlorCdcTubeArray := L_Tube(submatrix(Q_CdcDesired, 0, last(N_ChlorCdcTubeArray), 0, 0), submatrix(D_TubeAvailable, 0, last(N_ChlorCdcTubeArray), 0, 0), HL_Cdc, Nu_Water, K_CdcTube) = [0.571682; 1.46491; 2.28673] m
L_ChlorCdcTube :=
    min(L_ChlorCdcTubeArray) if min(L_ChlorCdcTubeArray) > L_CdcTubeMax or last(L_ChlorCdcTubeArray) == 0
    FloorNearest(L_CdcTubeMax, L_ChlorCdcTubeArray) otherwise
    = 1.46491 m
Q_ChlorStock := Q_ChlorStockArray[index(L_ChlorCdcTube, L_ChlorCdcTubeArray)] = 2e-6 m^3/s
D_CdcChlor := D_TubeAvailable[index(Q_ChlorStockArray[index(L_ChlorCdcTube, L_ChlorCdcTubeArray)]/N_ChlorCdcTubeArray[index(L_ChlorCdcTube, L_ChlorCdcTubeArray)], Q_CdcDesired)] = 0.00237998 m
D_CdcChlor =  # error
N_ChlorCdcTubes := N_ChlorCdcTubeArray[index(L_ChlorCdcTube, L_ChlorCdcTubeArray)] = 2
C_ChlorStock := C_ChlorStockArray[index(L_ChlorCdcTube, L_ChlorCdcTubeArray)] = 32 kg/m^3
# Filter Coagulant Small-Diameter Tube Design
Q_FiCoagMin := Q_Plant*C_FilterCoagDoseMax/C_FilterCoagStockMax = 1.2 mL/s
N_FiCoagCdcTubeArray := ArrayTrunc(ceil(Q_FiCoagMin/Q_CdcDesired)) = [3; 2; 1]
Q_FiCoagStockArray := vectorize(submatrix(Q_CdcDesired, 0, last(N_FiCoagCdcTubeArray), 0, 0)*N_FiCoagCdcTubeArray) = [1.5e-6; 2e-6; 2e-6] m^3/s
C_FiCoagStockArray := C_FilterCoagDoseMax*Q_Plant/Q_FiCoagStockArray = [12.8; 9.6; 9.6] kg/m^3
L_FilterCoagCdcTubeArray := L_Tube(submatrix(Q_CdcDesired, 0, last(N_FiCoagCdcTubeArray), 0, 0), submatrix(D_TubeAvailable, 0, last(N_FiCoagCdcTubeArray), 0, 0), HL_Cdc, Nu_Coag(C_FiCoagStockArray, EN_Coag), K_CdcTube) = [0.569988; 1.46239; 2.28279] m
L_FiCoagCdcTube :=
    min(L_FilterCoagCdcTubeArray) if min(L_FilterCoagCdcTubeArray) == L_FilterCoagCdcTubeArray or min(L_FilterCoagCdcTubeArray) > L_CdcTubeMax or last(L_FilterCoagCdcTubeArray) == 0
    FloorNearest(L_CdcTubeMax, L_FilterCoagCdcTubeArray) otherwise
    = 1.46239 m
D_CdcFiCoag :=
    D_TubeAvailable[index(Q_FiCoagStockArray/N_FiCoagCdcTubeArray, Q_CdcDesired)] if min(L_FilterCoagCdcTubeArray) == L_FilterCoagCdcTubeArray
    D_TubeAvailable[index(Q_FiCoagStockArray[index(L_FiCoagCdcTube, L_FilterCoagCdcTubeArray)]/N_FiCoagCdcTubeArray[index(L_FiCoagCdcTube, L_FilterCoagCdcTubeArray)], Q_CdcDesired)] otherwise
    = 0.00237998 m
D_CdcFiCoag =  # error
N_FiCoagCdcTubes :=
    min(N_FiCoagCdcTubeArray) if min(L_FilterCoagCdcTubeArray) == L_FilterCoagCdcTubeArray
    N_FiCoagCdcTubeArray[index(L_FiCoagCdcTube, L_FilterCoagCdcTubeArray)] otherwise
    = 2
C_FiCoagStock :=
    min(C_FiCoagStockArray) if min(L_FilterCoagCdcTubeArray) == L_FilterCoagCdcTubeArray
    C_FiCoagStockArray[index(L_FiCoagCdcTube, L_FilterCoagCdcTubeArray)] otherwise
    = 9.6 kg/m^3
Q_FiCoagStock :=
    min(Q_FiCoagStockArray) if min(L_FilterCoagCdcTubeArray) == L_FilterCoagCdcTubeArray
    Q_FiCoagStockArray[index(L_FiCoagCdcTube, L_FilterCoagCdcTubeArray)] otherwise
    = 2e-6 m^3/s
# Need the following...
# Select connectors/adaptors required.
# Main Coagulant CHT Float Valve Design
D_CoagFloatValveOrifice :=
    i ← 0
    while h_orifice(D_FltVlvOrificesAvail[i], Pi_VenaContractaOrifice, Q_CoagStock) ≥ H_CoagTankAboveHeadTank
        i ← i + 1
    return D_FltVlvOrificesAvail[i]
D_CoagFloatValveOrifice =  # error
HL_CoagFloatValveOrifice := h_orifice(D_CoagFloatValveOrifice, Pi_VenaContractaOrifice, Q_CoagStock) = 24.8612 cm
L_TubeStockToCHEst := 1 m
HL_CoagTubeStockToCHMax := H_CoagTankAboveHeadTank - HL_CoagFloatValveOrifice = 5.1388 cm
D_CoagTubeStockToCHEst := (128*Nu_Water*L_TubeStockToCHEst*Q_CoagStock/(π*g*HL_CoagTubeStockToCHMax))^(1/4) = 0.184767 in
D_CoagTubeStockToCH := max(3/8*in, D_CoagTubeStockToCHEst) = 0.375 in
# Use 3/8" tubing to connect the stock tank/calibration column to the constant head tank unless a larger tube is needed (which it probably never will be).
# Chlorine CHT Float Valve Design
D_ChlorFloatValveOrifice :=
    i ← 0
    while h_orifice(D_FltVlvOrificesAvail[i], Pi_VenaContractaOrifice, Q_ChlorStock) ≥ H_CoagTankAboveHeadTank
        i ← i + 1
    return D_FltVlvOrificesAvail[i]
D_ChlorFloatValveOrifice =  # error
HL_ChlorFloatValveOrifice := h_orifice(D_ChlorFloatValveOrifice, Pi_VenaContractaOrifice, Q_ChlorStock) = 0.690589 cm
HL_ChlorTubeStockToCHMax := H_CoagTankAboveHeadTank - HL_ChlorFloatValveOrifice = 29.3094 cm
D_ChlorTubeStockToCHEst := (128*Nu_Water*L_TubeStockToCHEst*Q_ChlorStock/(π*g*HL_ChlorTubeStockToCHMax))^(1/4) = 0.0763923 in
D_ChlorTubeStockToCH := max(3/8*in, D_ChlorTubeStockToCHEst) = 0.375 in
# Use 3/8" tubing to connect the stock tank/calibration column to the constant head tank unless a larger tube is needed (which it probably never will be).
# Filter Coagulant CHT Float Valve Design
D_FilterCoagFloatValveOrifice :=
    i ← 0
    while h_orifice(D_FltVlvOrificesAvail[i], Pi_VenaContractaOrifice, Q_FiCoagStock) ≥ H_CoagTankAboveHeadTank
        i ← i + 1
    return D_FltVlvOrificesAvail[i]
D_FilterCoagFloatValveOrifice =  # error
HL_FilterCoagFloatValveOrifice := h_orifice(D_FilterCoagFloatValveOrifice, Pi_VenaContractaOrifice, Q_FiCoagStock) = 0.690589 cm
HL_FilterCoagTubeStockToCHMax := H_CoagTankAboveHeadTank - HL_FilterCoagFloatValveOrifice = 29.3094 cm
D_FilterCoagTubeStockToCHEst := (128*Nu_Water*L_TubeStockToCHEst*Q_FiCoagStock/(π*g*HL_FilterCoagTubeStockToCHMax))^(1/4) = 0.0763923 in
D_FilterCoagTubeStockToCH := max(3/8*in, D_CoagTubeStockToCHEst) = 0.375 in
# Use 3/8" tubing to connect the stock tank/calibration column to the constant head tank unless a larger tube is needed (which it probably never will be).
# Lever Arm Scale
L_LeverArmTotal := 36 in
L_SliderEffective := 3.5 in  # Distance between the end of the slider and the pivot point of the freefall PVC tube.
L_LeverArmEffective := L_LeverArmTotal - L_SliderEffective
# To find the length of the side of the arm with the scale and the side of the arm with the float attached, solve two equations for two unknowns. One equation is similar triangles at maximum flow. The other is that the two sides of the bar must add up to the total.
L_ScaleArmEffective := L_LeverArmEffective/(1 + HL_Cdc/HL_Lfom)
L_CdcScaleArm := L_ScaleArmEffective + L_SliderEffective
L_CdcScaleArm =  # error
L_CdcFloatArm := L_LeverArmTotal - L_CdcScaleArm
L_CdcFloatArm =  # error
