# REFERENCES
# [reference: BasicInputs.xmcd]
# [reference: ExpertInputs.xmcd]
# [reference: DesignAssumptions.xmcd]
# [reference: MathFunctions.xmcd]
# [reference: PipeDatabase.xmcd]
# [reference: MinorLossCoefficients.xmcd]
# [reference: FluidsFunctions.xmcd]
# [reference: Sedimentation Tank.xmcd]
# [reference: Flocculator.xmcd]
# [reference: Rapid Mix.xmcd]
# [reference: LFOM.xmcd]
# [reference: EntranceTankDim.xmcd]
Q_Plant = 12 L/s
D_CdcAvailable := [0.0312; 0.0625; 0.0781; 0.0937; 0.125; 0.1562; 0.17; 0.1875; 0.25; 0.3125]*in
D_CdcBarb := [□; 0.047 in; □; 0.07 in; 0.075 in; □; □; □; 0.201 in; □]  # error: This placeholder is empty.
D_CdcAvailable = [0.79248; 1.5875; 1.98374; 2.37998; 3.175; 3.96748; 4.318; 4.7625; 6.35; 7.9375] mm
C_CoagStock = 120 gm/L  # The user input for stock concentration of the coagulant.
C_CoagStock := 240*gm/L
C_CoagDoseMax = 60 mgm/L
# The maximum concentration of coagulant in the plant.
# Assume that the kinematic viscosity of coagulant is similar to that of water.
Q_CdcMax := Q_Plant*C_CoagDoseMax/C_CoagStock
# for 1mm and 2mm used 1/16 (=1.587mm)
Nu_Water = 1e-6 m^2/s
Q_CdcMax = 3e-6 m^3/s
Re_PipeTransition = 2100
# for 2.4 mm, used 3/32in (=2.81mm)
Q_CdcMax := 1.5*mL/s
D_CdcAvailable := [1; 2; 3.175; 4; 5; 6; 6.5]*mm
D_CdcBarb := [0.047 in; 0.047 in; 0.070 in; 0.075 in; 2.5 mm; 3 mm; 4 mm; 0.201 in]  # for 2.9mm, used 1/8 in (=3.175mm)
D_CdcBarb = [1.1938; 1.1938; 1.778; 1.905; 2.5; 3; 4; 5.1054] mm
HL_Cdc = 20 cm
L_CdcDtMin := 80 cm
# The length of the dosing tube has to be at least as great as the maximum head loss with some additional length to be able to reach the ports
# for 6.5mm used 1/4in tube (= 6.35mm)
L_CdcDtMax := 1.5 m  # The maximum length of tubing that we are willing to use for the dosing tube.
K_CdcTube := 7  # Minor loss coefficient estimated from CDC research team data.
HL_CdcMajor(h_l, Q_max, D, K) := h_l - h_e(Q_max, D, K)
# MINOR LOSS COEFFICIENT
# **Calculate the minor loss coefficients from the barbed fitting and the dosing tube
# 1. Entrance losses in the barbed fitting.
K_Entrance := 0.5  # For a 90 degree turn
# This loss is in the barbed fitting. Translate this loss into a loss in the dosing tube.
# Use a mass balance: Qin = Qout => VinAin =  VoutAout on the minor loss equation: he = Ke *V^2/(2g). The V here is Vin so use Vin = VoutAout/Ain.
K_EntranceDt(D_CdcDt, D_CdcBarb) := K_Entrance*(A_circle(D_CdcDt)/A_circle(D_CdcBarb))^2
# 2. Expansion losses into the dosing tube from the barbed fitting.
K_Expansion(D_CdcDt, D_CdcBarb) := (A_circle(D_CdcDt)/A_circle(D_CdcBarb) - 1)^2
# 3. Exit losses from the dosing tube.
# The centerline velocity in the tube is double the average velocity, so the minor loss coeffcient is doubled from 1.
K_Exit := 2
# 4.Total minor loss coefficient
K_Total(D_CdcDt, D_CdcBarb) := K_EntranceDt(D_CdcDt, D_CdcBarb) + K_Expansion(D_CdcDt, D_CdcBarb) + K_Exit
# CONSTRAINTS
# 1. Determine the minimum diameter required.
# a) Minimum diameter based on laminar flow contraint.
# This is the maximum flow that can be sent through the alum feeder without requiring extremely long tubes is based on eliminating diameter from the Hagen-Poiseuille equation by using the maximum Reynolds number constraint. For higher flows multiple parallel tubes could be used. However the maximum flow rate that can be handled by the float valve needs to be considered.
# THIS IS NOT CORRECT B/C IT DOESN'T CONSIDER THE MINOR LOSSES!!!
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Q_CdcMaxLaminar(L_max, h_fmax, ν) := (L_max*Re_PipeTransition^4*π^3*ν^5/(2*g*h_fmax))^(1/3)
Q_CdcMaxLaminar(L_CdcDtMax, HL_Cdc, Nu_Water) = 6.13215 mL/s
# Minimum diameter required to get laminar flow at max flow based on Reynolds number for transition to turbulence
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D_CdcMinLaminar(Q_max, ν) := 4*Q_max/(π*ν*Re_PipeTransition)
# Now we can calculate the diameter of tubing required to accomodate the largest flow that a flow control module can deliver without requiring an excessively long tube
# THIS IS NOT CORRECT B/C IT DOESN'T CONSIDER THE MINOR LOSSES!!!
# Largest diameter tube we'd use.
D_CdcMinLaminar(Q_CdcMaxLaminar(L_CdcDtMax, HL_Cdc, Nu_Water), Nu_Water) = 3.71795 mm
# Minimum diameter for the particular coagulant flow to maintain laminar flow.
D_CdcMinLaminar(Q_CdcMax, Nu_Water) = 0.909457 mm
# b) Minimum diameter based on head loss constraint.
# THIS IS NOT CORRECT B/C IT DOESN'T CONSIDER THE MINOR LOSSES!!!
# Calculate the minimum diameter required to produce the desired head loss at the maximum flow using the minimum length of tubing. Based on the Hagen-Poiseuille equation.
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D_CdcMinHeadLoss(Q_max, L_min, h_fmax, ν) := (128*ν*Q_max*L_min/(h_fmax*g*π))^(1/4)
D_CdcMinHeadLoss(Q_CdcMax, L_CdcDtMin, HL_Cdc, Nu_Water) = 2.23446 mm
# c) Minimum diameter to ensure minor losses are small compared to the total head loss.
# We should use the maximum length of tubing because
# it would model the worst case scenario, right?
E_Tube := 0 mm
# Set the minor loss to be at most 5% of the total head loss available.
Pi_CdcQerrror := 0.2
# IGNORE FOR NOW:
# Using a fluids function to determine the diameter necessary to provide the desired flow rate:
HL_CdcMinor := h_e(Q_CdcMax, D_CdcDtDesignActual, K_CdcTube)
D_CdcDtDesignActual := D_pipetotal(Q_CdcMax, HL_Cdc, L_CdcDtMax, Nu_Water, E_Tube, K_CdcTube) = 2.70134 mm
HL_MinorMax := Pi_CdcQerrror*HL_Cdc
HL_CdcMinor =  # error: This variable is undefined.
HL_CdcMajor := HL_Cdc - HL_CdcMinor
D_CdcMinorLoss(h_e, K, Q) := (4*Q/π)^(1/2)*(K/(h_e*2*g))^(1/4)
D_CdcMaxMinorLoss := D_CdcMinorLoss(HL_MinorMax, K_CdcTube, Q_CdcMax) = 2.38849 mm
# Determine the maximum flow rate you could get out of the doser using the optimal diameter determined when minor losses were not considered.
Area(D) := 1/4*π*D^2
D_DesignMax := 0.125 in
Q_Minor(h_e, K, D) := (2*g*h_e/K*Area(D)^2)^(1/2)
Q_MaxMinor := Q_Minor(HL_MinorMax, K_CdcTube, D_DesignMax)
Q_MaxMinor = 2.65054 mL/s
# c) Minimum diameter than satisfies laminar flow, head loss, and the minor loss constraints.
# The minimum diameter required would be the one that maintains laminar flow at the max length of tubing and produces the necessary head loss at the minimum length of tubing. Thus, the minimum diameter chosen in the one that is the maximum of the two previous diameters calculated. The diameters can be larger than the one calculated, but they cannot be smaller.
D_CdcMin(Q_max, L_min, h_fmax, ν, h_emax, K) := max(D_CdcMinLaminar(Q_max, ν), D_CdcMinHeadLoss(Q_max, L_min, h_fmax, ν), D_CdcMinorLoss(h_emax, K, Q_max))
D_CdcMin(Q_CdcMax, L_CdcDtMin, HL_Cdc, Nu_Water, HL_MinorMax, K_CdcTube) = 2.38849 mm
# DIAMETER
# d) Tube diameter constraint
# There is also a constraint of given tube diameters. First we write a function that will round up to the up to the next available tube size.
forceround(x, xarray, direction) :=
    xarray ← sort(xarray)
    i ← 0
    while x > xarray[i]
        i ← i + 1
    return xarray[i - 1 + direction]  # direction is for rounding up (1) or rounding down (0).
D_CdcAvailable = [1; 2; 3.175; 4; 5; 6; 6.5] mm
# without minor loss considerations
# Now we use the forceround function to find the design tube diameter based on the minimum tube diameter and the available tube diameters.
D_CdcMin1(Q_max, L_min, h_fmax, ν) := max(D_CdcMinLaminar(Q_max, ν), D_CdcMinHeadLoss(Q_max, L_min, h_fmax, ν))
D_CdcDtDesignf1(Q_max, L_min, h_fmax, ν) := forceround(D_CdcMin1(Q_max, L_min, h_fmax, ν), D_CdcAvailable, 1)
D_CdcDtDesignf(Q_max, L_min, h_fmax, ν, h_emax, K) := forceround(D_CdcMin(Q_max, L_min, h_fmax, ν, h_emax, K), D_CdcAvailable, 1)
D_CdcDtDesign1 := D_CdcDtDesignf1(Q_CdcMax, L_CdcDtMin, HL_Cdc, Nu_Water)
D_CdcDtDesign1 = 3.175 mm
D_CdcDtDesign := D_CdcDtDesignf(Q_CdcMax, L_CdcDtMin, HL_Cdc, Nu_Water, HL_MinorMax, K_CdcTube)
D_CdcDtDesign = 3.175 mm  # This is the min diameter of tube that meets laminar flow, head loss, and minor  loss constraints.
D_DesignMax = 3.175 mm
# This is the diameter that will be used because it provides reasonable lengths and can cover the entire range when not considering minor losses.
# LENGTH
# 2) Length of tubing based on the head loss constraint
# Length of tube required to get desired head loss at maximum flow based on the Hagen-Poiseuille equation.
# without minor loss considerations
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L_CdcDtDesignf1(Q_max, D, h_fmax, ν) := h_fmax*g*π*D^4/(128*ν*Q_max)
L_CdcDtDesignfNoMinor(Q_max, D, h_fmax, ν) := h_fmax*g*π*D^4/(128*ν*Q_max)
L_CdcDtDesign1 := L_CdcDtDesignf1(Q_CdcMax, D_CdcDtDesign1, HL_Cdc, Nu_Water)
L_CdcDtDesign1 = 3.26118 m
L_CdcDtDesignf(Q_max, D, h_l, ν, K) := (h_l - h_e(Q_max, D, K))*g*π*D^4/(128*ν*Q_max)
L_CdcDtDesign := L_CdcDtDesignf(Q_CdcMax, D_DesignMax, HL_Cdc, Nu_Water, K_CdcTube)
L_CdcDtDesign = 3.05229 m
# CDC RESEARCH TEAM DATA: K estimate
# assume this value and see if you can get a design
# Also assume a maximum minor loss contribution and use that to set a minimum Diameter as a function of Q.
# For the CDC team's experimental apparatus:
K_CdcTubeCal := K_Total(0.123 in, 0.075 in) = 8.47172
E_Tube := 0 mm
Q(L, h_f, D, ν) := h_f*g*π*D^4/(128*ν*L)
D_CdcTube := 0.123 in
L_CdcTube := 1.47 m
Q_CdcMaxR := Q(L_CdcTube, 20 cm, D_CdcTube, Nu_Water) = 3.11981 mL/s
# FROM CDC RESEARCH TEAM DATA:
# March 9, 2011 experiment: one tube
Flowrate(HL) := (0.094*HL + 0.169)*mL/s
Flowrate(20) = 2.049 mL/s
HL_CdcMinor := h_e(Q_CdcMaxR, D_CdcTube, 8.12) = 6.85689 cm
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HL_Major := HL_Total - h_e(Q_Cdc, D_CdcTube, K)
HL_CdcMajor := HL_Cdc - HL_CdcMinor = 13.1431 cm
Q_Cdc := Q(L_CdcTube, HL_CdcMajor, D_CdcTube, Nu_Water) = 2.0502 mL/s
# March 13, 2011 experiment:
HL_Cdc = 0.2 m
# one tube
D_1 := 0.124 in
Q_Cdc := 1.5*mL/s
Flowrate2(HL) := (0.105*HL + 0.143)*mL/s
Flowrate2(20) = 2.243 mL/s
HL_CdcMinor2 := h_e(Q_CdcMaxR, D_CdcTube, 6.65) = 5.61556 cm
Q_range := 0*mL/s, 0.1*mL/s .. Q_Cdc
HL_CdcMajor2 := HL_Cdc - HL_CdcMinor2 = 14.3844 cm
L_1 := 9.675 ft
Q(L, h_f, D, ν) := h_f*g*π*D^4/(128*ν*L)
Q_Cdc2 := Q(L_CdcTube, HL_CdcMajor2, D_CdcTube, Nu_Water) = 2.24384 mL/s
HL_Major1 := 20 cm - h_e(Q_Cdc, D_1, K_CdcTube)
HL_Major1 = 0.186771 m
# March 15, 2011 experiment:
H_range := 0 cm, 1 cm .. HL_Major1
Q(L_1, HL_Major1, D_1, Nu_Water) = 1.50012 mL/s
# three tubes
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Flowrate3(HL) := (0.302*HL + 0.451)*mL/s
Flowrate3(20) = 6.491 mL/s
HL_CdcMinor3 := h_e(Q_CdcMaxR, D_CdcTube, 7.26) = 6.13067 cm
HL_CdcMajor3 := HL_Cdc - HL_CdcMinor3 = 13.8693 cm
Q_Cdc3 := Q(L_CdcTube, HL_CdcMajor3, D_CdcTube, Nu_Water)*3 = 6.49046 mL/s
# March 17, 2011 experiment:
# two tubes
Flowrate4(HL) := (0.205*HL + 0.402)*mL/s
Flowrate4(20) = 4.502 mL/s
HL_CdcMinor4 := h_e(Q_CdcMaxR, D_CdcTube, 6.6) = 5.57334 cm
HL_CdcMajor4 := HL_Cdc - HL_CdcMinor4 = 14.4267 cm
Q_Cdc4 := Q(L_CdcTube, HL_CdcMajor4, D_CdcTube, Nu_Water)*2 = 4.50085 mL/s
K_ExpAvg := (8.12 + 6.65 + 7.26 + 6.6)/4 = 7.1575
# RANGE OF FLOWS FOR GRAPH
# 3) Define a range of flows that we will use to plot the results.
Q_CdcMax = 1.5 mL/s
Q_CdcMaxLaminar(L_CdcDtMax, HL_Cdc, Nu_Water) = 6.13215 mL/s
# want to find the maximum flow that we can get from our largest diameter tube. We need to use the laminar flow constraint because that dominates for high flows.
Q_CdcMaxDesign := π*D_CdcDtDesign*Re_PipeTransition*Nu_Water/4 = 5.23664 mL/s
D == 4*Q_max/(π*ν*Re_max)
# At very low flows the design will fail given a finite set of tube diameters. Thus calculate the minimum design flow that can be produced based on the Hagen-Poiseuille equation.
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Q_min(L_max, h_fmax, D_min, ν) := h_fmax*g*π*D_min^4/(128*ν*L_max)
Q_min(L_CdcDtMax, HL_Cdc, D_CdcAvailable[0], Nu_Water) = 0.0320922 mL/s
# Redefine the flow rate to only include the feasible range given the constraints. Note that the minimum flow plotted is the minimum design flow. The design flow is the maximum flow for a flow control module.
Q_range := Q_min(L_CdcDtMax, HL_Cdc, D_CdcAvailable[0], Nu_Water), Q_min(L_CdcDtMax, HL_Cdc, D_CdcAvailable[0], Nu_Water) + 1*mL/min .. Q_CdcMaxLaminar(L_CdcDtMax, HL_Cdc, Nu_Water)
# The maximum tube length constraint may be violated if there aren't enough available tubing diameters.
D_CdcDtDesign = 3.175 mm  # designs for the particular flow rate
L_CdcDtDesign = 3.05229 m
# GRAPH WITHOUT MINOR LOSS
D_CdcDtDesign1 = 3.175 mm
D_CdcDtDesign1 = 0.125 in
L_CdcDtDesign1 = 3.26118 m
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# GRAPH WITH MINOR LOSS
D_CdcDtDesign = 3.175 mm
D_CdcDtDesign = 0.125 in
L_CdcDtDesign = 3.05229 m
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L_CdcDtDesignActual := L_CdcDtDesignf(Q_CdcMax, 0.125 in, HL_CdcMajor, Nu_Water)
L_CdcDtDesignActual = ƒ(Unitless) → Length
D_CdcMinorLoss(HL_MinorMax, K_CdcTube, Q_CdcMax) = 2.38849 mm
D_CdcDtDesignActual := D_pipetotal(Q_CdcMax, HL_Cdc, L_CdcDtMax, Nu_Water, E_Tube, K_CdcTube) = 2.70134 mm
HL_CdcMinor = 6.85689 cm
# If you set the max tubing length such that a small region meets that criteria it can cause a noncontinuos solution with a gap that has too high a tubing length.
Q_MaxMinor = 2.65054 mL/s
Q_CdcMax = 1.5 mL/s
N_TubesMax := 4
Q_CdcMaxLinear := N_TubesMax*Q_CdcMaxDesign
N_Tubef(Q_Coag, Q_CoagMaxDesign) := ceil(Q_Coag/Q_CoagMaxDesign)
Q_CdcRange := 2*mL/s, 2.1*mL/s .. Q_CdcMaxLinear
N_Tube := N_Tubef(Q_CdcMax, Q_MaxMinor)
N_Tube = 1
Q_Tube(Q_Coag, Q_CoagMaxDesign) := Q_Coag/N_Tubef(Q_Coag, Q_CoagMaxDesign)  # This is the coagulant flow rate per tube.
Q_CdcMaxMinor := N_TubesMax*Q_MaxMinor  # The maximum coagulant flow rate for the CDC depends on the maximum coagulant flow rate given the minor losses.
Q_CdcMaxMinor = 10.6021 mL/s
Q_CdcRange := 1*mL/s, 1.01*mL/s .. Q_CdcMaxMinor
D_tube := D_CdcDtDesignf1(Q_Tube(Q_CdcMax, Q_MaxMinor), L_CdcDtMin, HL_Cdc, Nu_Water) = 3.175 mm
L_design := L_CdcDtDesignf1(Q_Tube(Q_CdcMax, Q_MaxMinor), D_DesignMax, HL_Cdc, Nu_Water) = 3.26118 m
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# Find the error for the model.
#
# Coiling- ask Matt Hurst.
#
# Ask Matt Higgins to build one!
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# Checking to see if laminar flow and head loss constraints are satisfied.
Re_PipeTransition = 2100
Re_Cdc := Re(Q_MaxMinor, D_DesignMax, Nu_Water) = 1062.92
h_f(Q, D, L, ν, ε)
L_CdcDtDesign2 := L_CdcDtDesignf(Q_MaxMinor, D_DesignMax, HL_Cdc, Nu_Water, K_CdcTube)
HL_Major := h_f(Q_MaxMinor, D_DesignMax, L_CdcDtDesign2, Nu_Water, E_Tube) = 16 cm
h_e(Q, D, K) := K*8/(g*π^2)*Q^2/D^4
HL_Minor := h_e(Q_MaxMinor, D_DesignMax, K_CdcTube)
HL_Minor = 4 cm
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# FOR CDC TEAM TO TEST!
Q := 1*mL/s
L_CdcDtDesignf(Q_Tube(Q, Q_MaxMinor), 0.124 in, HL_Cdc, Nu_Water, K_CdcTube) = 4.59784 m
L_CdcDtDesignf(Q_Tube(Q, Q_MaxMinor), 0.125 in, HL_Cdc, Nu_Water, K_CdcTube) = 4.7525 m
D := D_DesignMax = 0.125 in
Q_MaxMinor = 2.65054 mL/s
N := N_Tubef(Q, Q_MaxMinor) = 1
# Questions
# max flow for small float valve (where design flips to larger valve)
# Min diameter of supply flexible tubing to CHT at MAX flow of linear dose controller.
# Evaluate whether it is reasonable to always uses this large diameter of supply tubing.
# Determine appropriate diameters for calibration columns
# Is the calibration column fixed or movable?
# Is there one diameter of dosing tubing that will work for allllll flows?
#
# Is all of our logic correct in this sheet? simplify and beautify and document better than Monroe did!
#
# When calibrating a CDC you start with a piece of tubing that is too long. You measure the flow at max head loss. How do you use that information to figure out how long to make the tubing?
#
# What is the min length of tube for the diameter that you are using to maintain laminar flow? This should be reported in the design documentation as a warning to not cut the tube shorter than this length.
HL_Cdc = 0.2 m  # Difference between the min and max water levels in the entrance tank. Maximum head loss through the LFOM.
L_LeverArmTotal := 36 in  # Set to be this length.
L_SliderEffective := 3.5 in  # Distance between the end of the slider and the pivot point of the freefall PVC tube.
L_LeverArmEffective := L_LeverArmTotal - L_SliderEffective = 32.5 in
H_Max := 20 cm  # The maximum elevation the doser tube will drop when the slider is at the end of the bar at max plant flow.
# To find the length of the side of the arm with the scale and the side of the arm with the float attached, solve two equations for two unknowns. One equation is similar triangles at maximum flow. The other is that the two sides of the bar must add up to the total.
L_ScaleArmEffective := L_LeverArmEffective/(1 + HL_Cdc/H_Max) = 16.25 in
1.75*2.54 = 4.445
L_CdcScaleArm := L_ScaleArmEffective + L_SliderEffective = 19.75 in
L_CdcFloatArm := L_LeverArmTotal - L_CdcScaleArm = 16.25 in
Angle_LeverArmMax := asin(HL_Cdc/L_CdcFloatArm) = 28.9833 deg  # Not necessarily important.
# Geometry inputs and simple calculations:
# Float Valve Selection
# Calculating Appropriate Float Sizes
CdcChtFloatValve := [0.093 in, .25 in, "Barb"; 0.187 in, 0.5 in, "NPT"; 0.25 in, 0.5 in, "NPT"; 0.312 in, 0.5 in, "NPT"]
i := 0 .. rows(Float) - 1
D_CdcFloatValveOrifice[i] := CdcChtFloatValve[i, 0]
HL_StockMax =  # error  # max headloss between stock tanks and constant head tank.
Q_CdcChtFloatValveMax := Q_orifice(D_CdcFloatValveOrifice, HL_StockMax, Pi_VenaContractaOrifice)
# Choose Stock Tank Float depending on highest coagulant flow needed.
# Find the float that will be able to supply the maximum coagulant flow.
Q_CdcChtFloatValve := CeilNearest(Q_CdcMax, Q_CdcChtFloatValveMax)
# Find the index of this float in the matrix to find the diameter of the float.
index_CdcChtFloatValve := index(Q_CdcChtFloatValve, Q_CdcChtFloatValveMax)
D_CdcChtFloatValve := D_CdcFloatValveOrifice[index_CdcChtFloatValve]
# Lever Arm Scale
L_SliderEffective := 3 in
# This is the distance between the end of the slider and the point where the freefall PVC is hung. (it's not drawn at exactly 3", but we'll change that. the drawing was arbitrary initially).
L_WallClearance := L_HalfWall + L_Slider - L_SliderEffective + L_Extra
# This is the minumum distance the first tick mark can be from the lever arm pivot point in order for the PVC assembly to have enough clearance from the entrance tank wall.
# This is the elevation difference between the point where the freefall PVC assembly is hung and the point where the end of the tube rests. The horizontal PVC has an outer radius of .525" and the tool hangar likely adds another .5".
#
# This is only significant in zeroing the CHT. It shouldn't effect the lever arm scale because it's a constant.
H_PVCAssembly := 1 in
H_MinDoseMaxFlow := 128*Nu_Water*L_Tube*Q_CdcCoagulantMinMax/(g*π*ID_CdcTube^4)
# This is the minumum tube head loss when the lever arm is at max angle (max plant flow) and the dose is at a minumum, which corresponds to the first point on the scale.
L_FirstPoint := H_MinDoseMaxFlow/sin(Angle_LeverArmMax) + L_SliderEffective
# This is the distance between the first tick mark and the pivot point along the lever arm. It must be greater than L.WallClearance in order for the PVC assembly to be far enough from the tank wall.
