# Automated Materials List
# This is actually the length of the  launders
L_LaunderPipe := L_SedLaunder
# Length of a pipe.
N_Launders := N_SedTanks*N_SedBays*N_SedLaunders
# Total length of the pipes.
L_LaunderPipeTotal := L_LaunderPipe*N_Launders
# There are 2 sed inlet pipes per sed bay.
N_Valves := N_SedBays*N_SedTanks
N_LaunderCouplings := N_Launders
N_ValveCouplings := N_Valves
N_SedPlatesTotal := N_SedPlates*N_SedBays*N_SedTanks
N_SedPlatesPerSheet := floor(L_SedPlateSheet/L_SedPlate)
N_SedPlateSheets := ceil(N_SedPlatesTotal/N_SedPlatesPerSheet)
N_PipeSedPlateFrame := W_Sed/B_PipeSedPlateFrame - 1 + L_Sed/B_PipeSedPlateFrame - 1
L_PipeSedPlateFrameTotal := N_SedTanks*((W_Sed/B_PipeSedPlateFrame - 1)*L_Sed + (L_Sed/B_PipeSedPlateFrame - 1)*W_Sed)
N_PipeSedPlateStand := L_SedLaunder/B_PipeSedPlateStand
L_PipeSedPlateStand := N_PipeSedPlateStand
T_SedTank := T_ChannelWall
# This area is the area of the side of tank in plan view.
A_SedTank := (L_Sed + 2*T_PltWall)*(W_Sed*N_SedTanks + (N_SedTanks + 1)*T_PltWall)
A_FlocTank := (L_Sed + 2*T_PltWall)*(W_FlocChannel*N_FlocChannels + (N_FlocChannels - 1)*T_PltWall)
A_EntranceTank := (L_Et + T_PltWall)*(W_Et + 2*T_PltWall)
Vol_FlocBafflesTotal := H_Sed*T_FlocBaffles*(L_FlocBaffleLower*floor(N_FlocChannelBaffles/2) + L_FlocBaffleUpper*ceil(N_FlocChannelBaffles/2))*N_FlocChannels
# channel opening (?)
Vol_FlocTank := 2*(L_Sed + 2*T_PlantWall)*T_PlantWall*H_Floc + 2*(W_FlocChannel*N_FlocChannels + (N_FlocChannels - 1)*T_PlantWall)*T_PlantWall*H_Floc + A_FlocTank*T_PlantWall
Vol_InletChannel := 2*(W_InletChannel + 2*T_PlantWall)*T_PlantWall*H_InletChannel + 2*(L_InletChannel + T_PlantWall)*T_PlantWall*H_InletChannel
Vol_ExitChannel := 2*(W_ExitChannel + 2*T_PlantWall)*T_PlantWall*H_ExitChannel + 2*(L_ExitChannel + T_PlantWall)*T_PlantWall*H_ExitChannel
Vol_SedTank := A_SedTank*T_PlantWall + 2*((L_Sed + 2*T_PltWall)*T_PlantWall*H_Sed) + 2*(W_Sed*N_SedTanks + (N_SedTanks + 1)*T_PltWall)*T_PlantWall*H_Sed
Vol_EntranceTank := 2*(W_Et + 2*T_PlatWall)*T_PlantWall*H_Et + 2*(L_Et + T_PltWall)*T_PlantWall*H_Et + A_EntranceTank*T_PlantWall
W_FlocEntryOrifice := A_FlocEntry/L_FlocEntryOrifice
W_FlocHopper := W_SedBay - T_ChannelWall*(N_SedBays - 1)/N_SedBays
W_FlocPort := W_FlocPortEst - S_FlocChannel
W_SedPort := B_SedPort  # Width is set to make the smallest area the water travels through square.
W_Sed := N_SlopePairs*W_SedSingle
A_EtOrifice := A_orifice(HW_EtMax, Pi_VenaContractaOrifice, Q_Plant)
A_FlocEntry := A_Port(Q_Plant, ED_FlocEntryOrifice, Pi_VenaContractaOrifice)
A_EtChannelWater := HW_EtCrit*W_EtChannel  # Cross sectional area of upper channel flow at critical depth pt.
A_Et := Q_Plant/V_EtUp
A_FlocHopper := Q_Flocs/V_UpFlocHopper
A_SedPort(Pi_SedCell, K_PipeEnt, Q_SedSlopePort, ED_Slope, Pi_VenaContractaOrifice) := 1/Pi_VenaContractaOrifice*(K_PipeEnt*Q_SedSlopePort^3/(2*Pi_SedCell*ED_Slope))^(2/7)
A_SedManifold := A_SedPort(Pi_SedCell, K_PipeEnt, Q_SedSlopePort, ED_Slope, Pi_VenaContractaOrifice)*N_SedPorts*Pi_SedArea
H_SedBottomSlope := W_Sed/(2*N_SlopePairs)*tan(AN_SedBottom)
H_SedTopSlope := (W_Sed/(2*N_SlopePairs) - B_SedPort)*tan(AN_SedTopInlet)
H_SlopeThickness := T_SedInletSlope/cos(AN_SedTopInlet)
H_Sed := (HW_Sed + H_PlantFreeboard)
W_InletChannel =  # error: This variable is undefined.
L_SedInactive := L_SedPlateEstimated*cos(AN_SedPlate) + W_Channel + T_ChannelWall + ND_LaunderEstimated
L_Sed := Q_Sed/(V_SedUpBod*W_Sed)
H_FlocPort := W_FlocChannel*S_FlocBaffle[last(G_FlocBod)]*Pi_FlocBaffle/W_FlocPort
H_SedPlate := L_SedPlateEstimated*sin(AN_SedPlate)
B_SedPlate := (L_SedPlate*sin(AN_SedPlate)*cos(AN_SedPlate) - T_SedPlate)/(V_SedUpActiveBelow/V_SedCBod - 1)
B_SedPlateHorizontal := B_SedPlate/sin(AN_SedPlate)
B_SedPort := sqrt(A_SedPort(Pi_SedCell, K_PipeEnt, Q_SedSlopePort, ED_Slope, Pi_VenaContractaOrifice))
D_SedLaunderOrifice := RoundNearest(D_circle(A_orifice(HL_SedLaunderOrifice, Pi_VenaContractaOrifice, Q_SedLaunderOrifices)), D_Drill)
L_FlocEntryOrifice := W_FlocChannel
D_SedSludgeOrifice := RoundNearest(D_orifices(H_SedSludge, Q_Sed/N_SlopePairs, ND_SedSludge, N_SedSludgeOrifices, HW_Sed, Pi_VenaContractaOrifice), D_Drill)
H_Et := ZW_Et + H_PlantFreeboard
H_Et := HW_EtTotal + H_PlantFreeboard
W_FlocEntryOrifice := A_FlocEntry/L_FlocEntryOrifice
H_ExitChannel := H_InletChannel
H_InletChannel := HW_InletChannel + H_PlantFreeboard
H_SedSludge := HL_Manifold(Q_SludgeDrainInitial, ND_SedSludge, L_Sed, 0, Nu_Water, E_Pvc, N_SedSludgeOrifices)
L_SedPort := B_SedPort/sin(AN_SedTopInlet)
L_Channel := N_SedTanks*(W_Sed + T_PlantWall)
Vol_Stock := Q_AlumStockMax*Ti_StockMin
W_EtOrifice[b] := (0.1 + b/10)*cm
L_SedTotal := Q_Plant/(V_SedUpBod*W_SedSingle/2)
L_EtOrificeUsed := A_EtOrifice/W_EtOrificeUsed
W_EtOrificeUsed := heightratio[15]*HW_EtMax
W_Et := max(A_Et/L_Et, W_EtChannel)
