# [reference: MasterProgram.xmcd]
# Automated Materials List
N_SedPlatesTotal := N_SedPlates*N_SedBays*N_SedTanks
N_SedPlatesPerSheet := floor(L_SedPlateSheet/L_SedPlate)
N_SedPlateSheets := ceil(N_SedPlatesTotal/N_SedPlatesPerSheet) = 30  # Total number of corrugated sheets needed to construct lamella/plate settlers
# Channel and Tank Walls
Vol_FlocTank := 2*(L_Sed + T_PlantWall)*T_PlantWall*H_Floc + 2*(W_FlocChannel*N_FlocChannels + N_FlocChannels*T_PlantWall)*T_PlantWall*H_Floc + (N_FlocChannels - 1)*T_PlantWall*L_Sed*H_Floc = 6.81494 m^3
Vol_FlocWalls := 2*(L_Sed + T_PlantWall)*T_PlantWall*H_Floc*N_FlocChannels + 2*W_FlocChannel*T_PlantWall*H_Floc*N_FlocChannels + (T_PlantWall*T_PlantWall*H_Floc*(N_FlocChannels + 1)) = 10.2288 m^3
A_FlocWalls := Vol_FlocWalls/T_PlantWall = 68.1917 m^2
A_FlocFloor := (L_Sed + 2*T_PlantWall)*(W_FlocChannel*N_FlocChannels + T_PlantWall*(N_FlocChannels + 1)) = 11.6001 m^2
Vol_FlocFloor := A_FlocFloor*T_PlantWall = 1.74002 m^3
Vol_SedTank := 2*((L_Sed + T_PltWall)*T_PlantWall*H_Sed) + 2*(W_Sed*N_SedTanks + N_SedTanks*T_PltWall)*T_PlantWall*H_Sed - (A_SedSludge*L_Sed) = 3.00575 m^3
A_SedWalls := □[□]  # error: This placeholder is empty.
Vol_SedWalls := Vol_SedTank = 3.00575 m^3  # **We are unsure which thickness is T.PltWall and which is T.PlantWall**
A_SedFloor := L_Sed*((N_SedTanks*W_Sed) + (N_SedTanks + 1)*T_PltWall) = 9.73036 m^2
Vol_SedFloor := A_SedFloor*T_PlantWall = 1.45955 m^3
Vol_EntranceTank := 2*(W_Et*T_EtWall*H_Et) + 2*(L_Et*T_EtWall*H_Et) - (T_EtWall*W_EtChannel*W_EtChannel) = 1.07247 m^3
# **basic dimensions - no grit chamber**
A_EtWalls := 2*(H_Et*(L_Et + T_EtWall)) + 2*H_Et(W_Et + 2*T_EtWall) - W_EtChannel*W_EtChannel  # error: This value must be a function, but has the form: Length.
A_EtFloor := (W_Et + 2*T_EtWall)*(L_Et + 2*T_EtWall) = 1.40235 m^2
# **Assuming L.Et is marked as the top diagram on the materials list wiki**
Vol_EtWalls := Vol_EntranceTank = 1.07247 m^3
Vol_EtFloor := (L_Et + 2*T_EtWall)*(W_Et + 2*T_EtWall)*T_EtFloor  # error: This variable is undefined.
Vol_StockTank := Q_AlumStockMax*Ti_StockMin = 0.513075 m^3
# **D.StockTank is a user input, newly created**
R_StockTank := D_StockTank/2  # error: This variable is undefined.
H_StockTank := Vol_StockTank/(pi*R_StockTank^2)  # error: This variable is undefined.
# **new variable defined here**
A_StockTank := 2*pi*R_StockTank^2 + 2*pi*R_StockTank*H_StockTank  # error: This variable is undefined.  # **new variable defined here**
A_StockTankFloor := Vol_StockTank/(2*R_StockTank)  # error: This variable is undefined.  # **new variable defined here**
Vol_ExitChannelTank := (2*(S_Elbow + 3*ND_PltWeir + T_ChannelWall) + 2*(4*ND_PltWeir + 3*S_Elbow + T_ChannelWall))*H_Sed*T_ChannelWall = 0.724491 m^3
A_ExitChannelWalls := L_Channel*(H_ExitChannel + T_ChannelWall) = 1.07764 m^2
A_ExitChannelFloor := L_Channel*(W_ExitChannel + 2*T_ChannelWall) = 1.0246 m^2
Vol_ExitChannelWalls := 2*L_Channel*H_ExitChannel*T_ChannelWall = 0.220241 m^3
Vol_ExitChannelFloor := L_Channel*(W_ExitChannel + 2*T_ChannelWall)*T_ChannelWall = 0.153691 m^3
# **Perhaps replace "T.ExitChannel with T.ChannelWall**
Vol_InletChannelTank := (2*(S_Elbow + 3*ND_PltWeir + T_ChannelWall) + 2*(2*ND_PltWeir + 2*S_Elbow + T_ChannelWall))*H_Sed*T_ChannelWall = 0.560431 m^3
A_InletChannelWalls := L_Channel*(H_InletChannel + T_ChannelWall) = 1.07764 m^2
A_InletChannelFloor := L_Channel*(W_InletChannel + 2*T_ChannelWall) = 1.33626 m^2
Vol_InletChannelWalls := 2*L_Channel*H_InletChannel*T_ChannelWall = 0.220241 m^3
Vol_InletChannelFloor := L_Channel*(W_InletChannel + 2*T_ChannelWall)*T_ChannelWall = 0.200439 m^3
# **Perhaps replace "T.InletChannel with T.ChannelWall**
N_SedInletChimneys := N_SedInletPipes*N_SedBays*N_SedTanks = 4
Vol_SedChimneyPipe := π*(.5*D_SedChimneyPipe)^2*(H_Sed - H_InletChannel - T_ChannelWall - H_SedSludge - T_SedSludge) = 0.0175998 m^3
Vol_SedInletChimneys := N_SedInletChimneys*(W_SedInletBottom*(W_InletChannel + T_ChannelWall)*(H_Sed - H_InletChannel - T_ChannelWall - H_SedSludge - T_SedSludge) - Vol_SedChimneyPipe) = 0.538289 m^3
# Ferrous Cement
Vol_DistributionTunnelCovers := T_SedSlopePlate*L_SedSlopeManifold*W_SedSlopePlate*N_SedPorts = 0.115303 m^3
A_DistributionTunnelCovers := Vol_DistributionTunnelCovers/T_SedSlopePlate = 2.88258 m^2
Vol_FlocBafflesTotal := W_FlocChannel*T_FlocBaffle*(L_FlocBaffleLower*ceil(N_FlocChannelBaffles/2) + L_FlocBaffleUpper*floor(N_FlocChannelBaffles/2)) = 2.21331 m^3
A_FlocBafflesTotal := Vol_FlocBafflesTotal/T_FlocBaffle = 55.3326 m^2  # **new variable defined here**
# Pipes and Valves
N_PipeSedPlateFrame := W_Sed/B_SedPipe - 1 + L_Sed/B_SedPipe - 1 = 15.2302
L_PipeSedPlateFrameTotal := N_SedTanks*((W_Sed/B_SedPipe - 1)*L_Sed + (L_Sed/B_SedPipe - 1)*W_Sed) = 41.7837 m
# Length of pipe needed for Sedimentation Tank Plate Frame at ND.SedPlateFrame
L_Weir := 2*H_PltWeir = 0.285588 m  # Total length of Weir pipe in Inlet and Exit Channel Tanks at ND.PltWeir
N_Launders := N_SedTanks*N_SedBays*N_SedLaunders
L_LaunderPipeTotal := L_SedLaunder*N_Launders = 14.6725 m  # Total length of launder pipe at ND.SedLaunder
N_LaunderCouplings := N_Launders  # Number of couplings for launder pipe going through concrete wall
N_Valves := N_SedBays*N_SedTanks  # Valves and valve couplings to drain sedimentation tanks
N_ValveCouplings := N_Valves
