# Entrance Tank
A_EtWalls := 2*(H_Et*(L_Et + (2*T_EtWall))) + 2*(H_Et*W_Et) = 11.9657 m^2
A_EtFloor := (W_Et + 2*T_EtWall)*(L_Et + 2*T_EtWall) = 7.42889 m^2  # Surface area of Tank floor
Vol_EtWalls := A_EtWalls*T_EtWall = 1.79485 m^3
Vol_EtFloor := A_EtFloor*T_EtWall = 1.11433 m^3
Vol_Et := Vol_EtFloor + Vol_EtWalls = 2.90919 m^3  # Volume of concrete needed to build Entrance Tank
Vol_EtSlopeFull := ((L_EtHopper - S_Fitting - ConRadius(ND_EtDrain))*W_Et*H_EtHopper + H_EtHopperBack*L_EtHopper*(W_Et - 2*(S_Fitting + ConRadius(ND_EtDrain)))*0.5 - 0.5*H_EtHopperBack*(L_EtHopper - 2*(S_Fitting + ConRadius(ND_EtDrain)))*(W_Et - 2*(S_Fitting + ConRadius(ND_EtDrain))))
Vol_EtHalfSlopeLast := 0.25*L_EtHopper*H_EtHopperBack*(W_Et - 2*(S_Fitting + ConRadius(ND_EtDrain))) + 0.5*H_EtLastSlope*W_Et*(L_EtHopper - S_Fitting - ConRadius(ND_EtDrain)) - □  # error: This placeholder is empty.
N_EtDrainStoppers := N_EtHoppers
N_EtDrains := N_Et.Hoppers
L_EtWeir =  # error: This variable is undefined.
D_EtWeir =  # error
# Volume for the hoppers
Vol_HoppersBetween := 3*W_Et*H_EtHopper^2*1/sqrt(3) + H_EtHopper*(4*ND_Rebar + T_ConcreteMin)*W_Et
W_HopperBottom := W_Et - OuterDiameterFittingPVC(ND_EtDrain) - 2*S_Fitting = 0.637363 m
Vol_HoppersAgainstEtWall := 3*(L_EtHopper*W_HopperBottom^2*sqrt(3)/2 - W_HopperBottom^2*sqrt(3)*(L_EtHopper - OuterDiameterFittingPVC(ND_EtDrain) - 2*S_Fitting)/3) = 573.531 L
Vol_Hoppers := Vol_HoppersBetween + Vol_HoppersAgainstEtWall
# Flocculator
# Flocculator Concrete
A_FlocSlab := |(TotalFloc_Dim[0] + 2*T_PlantWall)*TotalFloc_Dim[1]| = 18.0674 m^2
Vol_FlocSlab := A_FlocSlab*T_PlantWall = 2.7101 m^3
A_FlocWalls := |(TotalFloc_Dim[0] + 2*T_PlantWall)*TotalFloc_Dim[2]| + |2*(N_FlocChannels*W_FlocChannel + (N_FlocChannels - 1)*T_PlantWall)*TotalFloc_Dim[2]| = 24.4462 m^2
Vol_FlocWalls := A_FlocWalls*T_PlantWall = 3.66693 m^3
# Flocculator Baffles
L_BafflesTotal :=
    TotalLength ← 0 m
    for i ∈ 0 .. N_FlocChannels - 1
        for j ∈ 0 .. N_FlocChannelBaffles[i] - 1
            TotalLength ← TotalLength + L_FlocBaffles[j, i]
    return TotalLength
    = 63.2456 m
A_BafflesTotal := L_BafflesTotal*W_FlocBaffle = 36.6824 m^2
# Flocculator Modules
# Sedimentation Tank
A_ChannelsFloor := L_SedChannel*(W_SedInletChannel + W_SedExitChannel + W_SedWeirInlet + W_SedInletChannelPostWeir)  # Exit and Inlet Channel Components
Vol_ExitChannelTank := Vol_ExitTankFloor + Vol_ExitTankWalls
Vol_ChannelsFloor := A_ChannelsFloor*T_ChannelWall = 7.81766 m^3
A_ExitChannelWalls := L_SedChannel*(H_SedExitChannel + T_ChannelWall) = 4.28114 m^2
A_InletChannelWalls := L_SedChannel*(H_SedInletChannel + T_ChannelWall) = 4.28114 m^2
A_ExitChannelFloor := L_SedChannel*W_SedExitChannel = 2.33523 m^2
Vol_ExitChannelWalls := A_ExitChannelWalls*T_ChannelWall = 0.642171 m^3
A_InletChannelFloor := L_SedChannel*W_SedInletChannel = 3.87666 m^2
Vol_InletChannelWall := A_InletChannelWalls*T_ChannelWall = 0.642171 m^3
Vol_InletChannelFloor := A_InletChannelFloor*T_ChannelWall = 0.5815 m^3
L_InletTank := S_Elbow + ElbowRadius(ND_PltWeir) + ConRadius(ND_PltWeir) + SocketDepth(ND_PltWeir)
W_InletTank := ((2*ConRadius(ND_PltWeir)) + (2*S_Elbow))
Vol_InletTankWalls := (((L_InletTank + 2*T_ChannelWall)*(W_InletTank + 2*T_ChannelWall)) - (L_InletTank*W_InletTank) - ((L_InletTank - T_ChannelWall)*T_ChannelWall))*H_InletChannel
A_InletTankFloor := (W_InletTank + 2*T_ChannelWall)*(L_InletTank + 2*T_ChannelWall)
Vol_InletTankFloor := A_InletTankFloor*T_ChannelWall
Vol_InletChannelTank := Vol_InletTankFloor + Vol_InletTankWalls
L_ExitTank := S_Elbow + ElbowRadius(ND_PltWeir) + ConRadius(ND_PltWeir) + SocketDepth(ND_PltWeir)
W_ExitTank := 4*ConRadius(ND_PltWeir) + 3*S_Elbow
A_ExitTankWalls := (L_ExitTank*T_ChannelWall) + 2*((W_ExitTank + 2*T_ChannelWall)*T_ChannelWall)
# **Area and Volume of the walls are only for the INSIDE wall; the outside wall is already included in the area and volume of the sed walls.**
Vol_ExitTankWalls := A_ExitTankWalls*H_ExitChannel  # L_SedHopper
A_ExitTankFloor := (L_ExitTank + 2*T_ChannelWall)*(W_ExitTank + 2*T_ChannelWall)
Vol_ExitTankFloor := A_ExitTankFloor*T_ChannelWall
Z_SedHopperBackSlope =  # no stored result
# Sed Tank Slopes
A_SedSlope := H_SedSideSlopes*W_SedSideSlopes/2 = 0.16427 m^2  # **Cross Sectional Area of One Slope**
A_SedSlopes := A_SedSlope*N_SedBays*N_SedTanks = 0.985618 m^2
Vol_SedSlopes := A_SedSlopes*L_Sed = 6.13302 m^3
# Floc Hopper
A_FlocHopperSlope := H_SedSideSlopes*W_SedSideSlopes/2 = 0.16427 m^2
P_FlocChannelMin =  # error
P_FlocChannelVPlastic =  # error
# Pipes and Valves of Sed Tank
N_PipeSedPlateFrame := W_Sed/B_SedPipe - 1 + L_Sed/B_SedPipe - 1
# Length of pipe needed for Sedimentation Tank Plate Frame at ND.SedPlateFrame
L_PipeSedPlateFrameTotal := N_SedTanks*((W_Sed/B_SedPipe - 1)*L_Sed + (L_Sed/B_SedPipe - 1)*W_Sed)
L_Weir := 2*H_PltWeir  # Total length of Weir pipe in Inlet and Exit Channel Tanks at ND.PltWeir
L_SedLaunder =  # error
N_Launders := N_SedTanks*N_SedBays*N_SedLaunders
L_LaunderPipeTotal := L_SedLaunder*N_Launders
N_LaunderCouplings := N_Launders  # Number of couplings for launder pipe going through concrete wall
N_Valves := N_SedBays*N_SedTanks = 6
N_ValveCouplings := N_Valves = 6
# Filter
# Filter Bed Concrete
A_FiBedSlab := (L_Fi + 2*T_FiWall)*(N_Fi*W_Fi + (N_Fi + 1)*T_FiWall) = 6.13303 m^2
Vol_FiBedSlab := T_FiWall*A_FiBedSlab = 1.53326 m^3  # need to subtract out the subtractions for the backwash trunk lines
A_FiWall := ((N_Fi + 1)*T_FiWall + N_Fi*W_Fi)*(L_Fi + 2*T_FiWall) - N_Fi*W_Fi*L_Fi = 2.74969 m^2
Vol_FiWalls := A_FiWall*H_Fi = 12.3578 m^3
# Filter Inlet and Outlet Boxes Concrete
A_FiAuxBoxSlab := |FiAuxSubBox_Dim[0]*FiAuxSubBox_Dim[1]| = 6.13705 m^2
Vol_FiAuxBoxSlab := A_FiAuxBoxSlab*T_PlantWall = 0.920558 m^3
# Filter Sand
H_FiSand =  # error
Vol_FiSandTotal := H_FiSand*W_Fi*L_Fi*N_Fi = 4.29965 m^3
# Trunk Lines
# Slotted Pipes
# Backwash Plumbing
# Plant Floor and Chemical Platform
A_ChemPlatform := L_EtChemPlatform*W_EtChemPlatform = 7.67091 m^2
Vol_ChemPlatform := A_ChemPlatform*T_PlantWall = 1.15064 m^3
A_MainFloor := |Floor_Dim[0]*Floor_Dim[1]| = 150.213 m^2  # does not include subtractions, can be used to calculate the roof area, etc.
# Chemical Storage Tanks
# Tank Dimensions
H_CoagTank =  # error
H_FilterCoagTank =  # error
H_ChlorineTank =  # error
R_CoagTank =  # error
R_FilterCoagTank =  # error
R_ChlorineTank =  # error
# Dosing Plumbing
# Drainage Plumbing
