CeilNearest(number, array) :=
    i ← 0
    while (number > array[i] and i < last(array))
        i ← i + 1
    return array[i]
FloorNearest(number, array) :=
    i ← 0
    while (number > array[i] and i < last(array))
        i ← i + 1
    return array[i - 1]
RoundNearest(number, array) :=
    i ← 0
    while (number > array[i] and i < last(array))
        i ← i + 1
    Rounded ← array[i] if (number - array[i - 1]) > (array[i] - number)
    Rounded ← array[i - 1] otherwise
    return Rounded
Specialcase(range, interval) := range/interval - 1
Normalcase(range, interval) := range/interval
rampwithjump(initial, start, interval, range) :=
    ramp[0] ← initial
    end ← Normalcase(range, interval) if start ≥ interval
    end ← Specialcase(range, interval) otherwise
    for i ∈ 1 .. end
        ramp[i] ← start + (i - 1)*interval
    return ramp
ramp(start, interval, range) :=
    for i ∈ 0 .. range/interval - 1
        ramp[i] ← start + i*interval
    return ramp
index(s, array) :=
    i ← 0
    while s > 1.05*array[i] and i < last(array)
        i ← i + 1
    return i
