Z_RMMacroOrifice := Z_SedWeirExit = 1.773 m
L_RMPipeEst := L_Sed + W_MpWalkway + Z_SedWeirExit = 17.7266 m
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K_RMPipe := 2*K_El90 + K_PipeExit = 2.8
# Size the rapid mixer pipe
ND_RMPipe := D_pipeschedule(Q_Plant, EN_PipeSpec, HL_RMPipeEst, L_RMPipeEst, Nu_Water, E_Pvc, K_RMPipe) = 16 in
D_RMPipe := innerD(ND_RMPipe, EN_PipeSpec) = 14.696 in
V_RMPipe := Q_Plant/A_circle(D_RMPipe) = 45.6893 cm/s
HL_RMPipe := h_l(Q_Plant, D_RMPipe, L_RMPipeEst, K_RMPipe, Nu_Water, E_Pvc) = 3.90274 cm
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HL_RMMicroOrificeMinforED := Q_Plant^2/(2*g)*(4/(π*((0.34*4*Q_Plant/π)^3/ED_RMMicroOrifice)^(2/7)) - 1/A_circle(D_RMPipe))^2 = 7.89214 cm
# Minimum HL to get target energy dissipation rate
HL_RMMicroOrificeMinforDoseController := HL_ChemDoserMin - HL_Floc - HL_SedWeirExit - HL_SedLaunder - HL_RMPipe = 1.8501 cm
# Minimum head loss for dose controller to work
HL_RMMicroOrifice := max(HL_RMMicroOrificeMinforED, HL_RMMicroOrificeMinforDoseController) = 7.89214 cm
HL_PlantTotal := HL_SedWeirExit + HL_SedLaunder + HL_Floc + HL_RMPipe + HL_RMMicroOrifice = 46.042 cm
HL_SedLaunderCum := HL_SedWeirExit + HL_SedLaunder
HL_FlocCum := HL_Floc + HL_SedLaunderCum = 0.342472 m
HL_RMPipeCum := HL_RMPipe + HL_FlocCum = 0.381499 m
HL_RMMicroOrificeCum := HL_RMMicroOrifice + HL_RMPipeCum = 0.46042 m
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# Total area through all of the micro mix orifices
A_RMMicroOrifices := A_circle(D_RMPipe)/(Pi_VenaContractaOrifice*(sqrt(HL_RMMicroOrifice*2*g/V_RMPipe^2) + 1)) = 474.092 cm^2
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# Diameter of micro mix orifice (if there is only one used)
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D_RMMicroOrifice := D_circle(A_RMMicroOrifices) = 9.40862 cm
# Velocity through the orifice if no jet
V_RMMicroOrifice := Q_Plant/A_RMMicroOrifices = 1.43833 m/s
# Velocity through micro orifice jet
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V_RMMicroOrificeJet := V_RMMicroOrifice/Pi_VenaContractaOrifice = 2.31988 m/s
# This is the energy dissipation rate through the micro mix orifice if only one orifice is used.  If this value is greater than the minimum ED through the micro mix, then OK.  Else, increase the number
# of orifices
ED_RMMicroOrificeOne := (0.34*V_RMMicroOrificeJet)^3/(D_RMMicroOrifice*sqrt(Pi_VenaContractaOrifice)) = 6.62389 W/kg
D_RMMicroOrificeMax := 1/sqrt(Pi_VenaContractaOrifice)*((0.34*(4*Q_Plant/π))^3/ED_RMMicroOrifice)^(1/7) = 12.3262 cm
# Calculating: Size of Entrance Tank
A_Et := Q_Plant/V_EtUp
L_Et := sqrt(A_Et)
W_Et := A_Et/L_Et
H_Et := HL_PlantTotal + 2*D_RMPipe + H_PlantFreeboard = 0.809016 m
Z_EtTop := Z_SedWeirExit + HL_PlantTotal + H_PlantFreeboard = 2.1771 m
