# [reference: FluidsFunctions.xmcd]
# Piping Parameters Set Here
# [reference: PipeDatabase.xmcd]
Q_plant := 50*L/s
a := rows(AvailPipeSizes(4)) = 12
K_vc := 0.62
b := cols(AvailPipeSizes(4)) = 2
PipeSpecification := 4
AvailPipeSizes(4)[rs, 0]
rs := 0 .. (a - 1)
L_pipe := 20 m
PipeSpec[rs] := AvailPipeSizes(4)[rs, 1]
# For rapid mix we are using pipe specification 4.  This array will be used for all calculations
K_total := 0.8
h_lossmax := 50 cm
ν := 1*10^-6*m^2/s
PipeDiameter(Q_plant, PipeSpec, h_lossmax, L_pipe, ν, eps, K_total) := D_pipe(Q_plant, PipeSpec[rs], h_lossmax, L_pipe, ν, 0, K_total)
# The code here is used to size the rapid mixer for small flow-rates.  This in conjunction with Entrance Tank code will be used to develop an automated design for the Rapid Mixer and Entrance tank onto AutoCAD code.
# Test Assumptions
# This function is imported from FluidsFunctions to calculate pipe size based on flow rate.
K_e := 1.3
# This function determines the size of the pipe given a vector and entered values
# So we use the equation for minor loss coefficient for a submerged orifice given in the notes on Flow Control and Measurement to determine d.or
# Sizing the Macromixing Orifice
d_macromixorificeFn(K_vc, d_pipe, K_e, PipeSpec) := innerdiameter(d_pipe, PipeSpecification)*(1/(K_vc*(K_e^0.5 + 1)))^0.5
# We want a minor loss coefficient of 1.3.  This is an assumption made
# We are assuming a circular orifice here.  The resulting area of the orifice and velocity through the orifice are given below.
h_emacromixorificeFn(Q_plant, d_pipe, K_e, PipeSpecification) := K_e*(Q_plant/A_circle(innerdiameter(d_pipe, PipeSpecification)))^2/(2*g)
d_pipeFn(Q_plant, PipeSpec, h_total, MacroMHconstraint) :=
    len ← length(PipeSpec)
    boolean ← 0
    count ← 0
    while boolean == 0
        head ← h_emacromixorificeFn(Q_plant, PipeSpec[count], 1.3, PipeSpecification)
        boolean ← 1 if count == len - 1
        boolean ← 1 if head ≤ MacroMHconstraint
        count ← count + 1
    pipe ← PipeSpec[count]
    h_lossmax ← h_total
    NU ← 1*10^-6*m^2/s
    L_pipe ← 2 m
    K_total ← 0.8
    pipe ← D_pipe(Q_plant, PipeSpec, h_lossmax, L_pipe, NU, 0, K_total) if PipeSpec[count] < D_pipe(Q_plant, PipeSpec, h_lossmax, L_pipe, NU, 0, K_total)
    pipe  # The resulting head loss through the orifice is given as:
# Using the size of the macro-mixing orifice and the resulting head loss, the user can input constraints for macro-mixing head loss and total head loss desired and this can determine a pipe diameter.
# There are assumptions such as L.pipe, K.toal, and NU made here that are constant for the most part.
h_emicromixorificeFn(h_total, h_emacromixorifice) := h_total - h_emacromixorifice
ε := 1*W/kg
h_total := 50 cm
# Sizing the Micromixing Orifice
# There are two conditions that must be met here.  First of all the energy disspation rate must be 1 W/kg and there must be a total head loss of 20 to 50 cm.  The value for that depends upon what the user selects.
ν = 1e-6 m^2/s
# Based on the value determined for the micro-mixer head loss, we can find a diameter for the micro-mixing orifice
d_micromixorificeFn(d_pipe, Q_plant, h_emicromixorifice, PipeSpecification) := (4*(A_circle(innerdiameter(d_pipe, PipeSpecification))/K_vc)/(((2*g*h_emicromixorifice)/(Q_plant/A_circle(d_pipe))^2)^0.5 + 1))^0.5/π^0.5
# The largest smallest dimension is calculated below.
h_emicromixorifice := 50 cm
W := (2*g*h_emicromixorifice)^(3/2)/(20*ε) = 60.4529 in
# W is used to check to make sure that our largest smallest dimension meets the limitation
# The function below determines the size combination of pipe inner diameter and orifice diameters using the functions derived above.
SizeCombination1(Q_plant, PipeSpec, h_total, MacroMHConstraint, K_vc, K_e, PipeSpecification) :=
    a[1] ← d_pipeFn(Q_plant, PipeSpec, h_total, MacroMHConstraint)
    a[2] ← d_macromixorificeFn(K_vc, a[1], K_e, PipeSpecification)
    h_emicromixorifice ← 20 cm - h_emacromixorificeFn(Q_plant, a[1], K_e, PipeSpecification)
    a[3] ← d_micromixorificeFn(a[1], Q_plant, h_emicromixorifice, PipeSpecification)
    a[0] ← innerdiameter(a[1], PipeSpecification)
    a
# Index 0 gives inner pipe diameter
# Index 1 gives nominal pipe diameter
# Index 2 gives macromixing diameter
# Index 3 gives micromixing diameter
# Example Calculation
i := 1 .. 50
Q_p[i] := i*L/s
SizeCombination1(2*L/s, PipeSpec, 50 cm, 10 cm, K_vc, K_e, 4) = [0.07112; 0.0762; 0.0617407; 0.0391516] m
InnerPipeDiameters[i] := SizeCombination1(Q_p[i], PipeSpec, 50 cm, 10 cm, K_vc, K_e, 4)[0]
MacroMODiameters[i] := SizeCombination1(Q_p[i], PipeSpec, 50 cm, 10 cm, K_vc, K_e, 4)[1]
MicroMODiameters[i] := SizeCombination1(Q_p[i], PipeSpec, 50 cm, 10 cm, K_vc, K_e, 4)[2]
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