# Sed Tank Functions
# Calculate number of Sed Tanks
Q_SedManifoldMax := Q_PipeED(ED_SedInlet, innerdiameter(ND_SedManifoldMax, PS_Default), Pi_VenaContractaOrifice, Pi_Jet)
Q_SedManifoldMin := Q_PipeED(ED_SedInlet, innerdiameter(ND_SedManifoldMin, PS_Default), Pi_VenaContractaOrifice, Pi_Jet)
N_SedTanks(Q_Plant) := max(min(ceil(Q_Plant/Q_PipeED(ED_SedInlet, innerdiameter(ND_SedManifoldMin, PS_Default), Pi_VenaContractaOrifice, Pi_Jet)), N_SedTanksMin), ceil(Q_Plant/(2*Q_PipeED(ED_SedInlet, innerdiameter(ND_SedManifoldMax, PS_Default), Pi_VenaContractaOrifice, Pi_Jet))))
# All other calculations are based on number of Sed Tanks and Plant Flow Rate
Q_Sed(Q_Plant, N_SedTanks) := Q_Plant/N_SedTanks
L_SedUpflowMax := Q_SedManifoldMax/(V_SedUpBod*W_SedBay)
N_SedBaysTotal(Q_Plant) := ceil(Q_Plant/(V_SedUpBod*W_SedBay*L_SedUpflowMax))
N_SedBaysMin(N_SedTanks) := ceil(ceil(Q_Plant/(V_SedUpBod*W_SedBay*L_SedUpflowMax))/N_SedTanks)
N_SedBaysEst(Q_Plant, N_SedTanks) := min(ceil(Q_Plant/(ceil(ceil(Q_Plant/(V_SedUpBod*W_SedBay*L_SedUpflowMax))/N_SedTanks)*Q_SedManifoldMax)), 2)
N_SedBays(N_SedTanks, Q_Plant) := max(N_SedBaysMin(N_SedTanks), N_SedBaysEst(Q_Plant, N_SedTanks))
Q_SedBay(Q_Plant, N_SedTanks) := Q_Plant/N_SedTanks/N_SedBays(N_SedTanks, Q_Plant)
ND_SedManifold(Q_Plant, N_SedTanks) := NominalDiameter(D_PipeED(ED_SedInlet, Q_SedBay(Q_Plant, N_SedTanks), Pi_VenaContractaOrifice, Pi_Jet), PS_Default)
A_SedInletChannelED(Q_Plant) := A_Channel(Q_Plant, ED_SedInlet, Pi_VenaContractaOrifice, Pi_Jet)
W_SedInletChannelPlumbing(Q_Plant, N_SedTanks) := 2*ConRadius(ND_SedManifold(Q_Plant, N_SedTanks)) + 2*S_Fitting
L_SedUpflowEst(Q_Plant, N_SedTanks) := Q_SedBay(Q_Plant, N_SedTanks)/(W_SedBay*V_SedUpBod)
ND_SedLaunder(Q_Plant, N_SedTanks) := ND_Manifold(Q_SedBay(Q_Plant, N_SedTanks), HL_SedLaunderBod, L_SedUpflowEst(Q_Plant, N_SedTanks), Pi_QLaunderOrifices, PS_Default, Nu_Water, E_Pvc, K_PipeExit, 2*floor(L_SedUpflowEst(Q_Plant, N_SedTanks)/B_SedLaunderOrificesEst))
W_Sed(N_SedTanks, Q_Plant) := N_SedBays(N_SedTanks, Q_Plant)*W_SedBay
L_SedChannel(N_SedTanks, Q_Plant) := N_SedTanks*W_Sed(N_SedTanks, Q_Plant) + (N_SedTanks - 1)*T_SedWallDivider + T_PlantWall - T_SedWallDivider
HL_SedWeirExit(N_SedTanks, Q_Plant) := Headloss_weir(Q_Plant, L_SedChannel(N_SedTanks, Q_Plant))
HW_SedInletChannelPlumbing(Q_Plant, N_SedTanks) := HL_SedLaunderBod + 2*ConRadius(ND_SedLaunder(Q_Plant, N_SedTanks)) + S_Fitting + HL_SedWeirExit(N_SedTanks, Q_Plant)
W_SedInletChannelPreWeir(Q_Plant, N_SedTanks) :=
    W ← W_SedInletChannelPlumbing(Q_Plant, N_SedTanks)
    HW ← HW_SedInletChannelPlumbing(Q_Plant, N_SedTanks)
    while W*HW < A_SedInletChannelED(Q_Plant)
        HW ← HW + 1 mm if HW < W
        W ← W + 1 mm otherwise
    return W
HW_SedInletChannel(Q_Plant, N_SedTanks) :=
    W ← W_SedInletChannelPlumbing(Q_Plant, N_SedTanks)
    HW ← HW_SedInletChannelPlumbing(Q_Plant, N_SedTanks)
    while W*HW < A_SedInletChannelED(Q_Plant)
        HW ← HW + 1 mm if HW < W
        W ← W + 1 mm otherwise
    return HW
H_SedInletChannel(Q_Plant, N_SedTanks) := HW_SedInletChannel(Q_Plant, N_SedTanks) + H_PlantFreeboard
EN_InletChannelGeom(Q_Plant, N_SedTanks) :=
    hl_weir ← Headloss_weir(Q_Plant, W_SedInletChannelPreWeir(Q_Plant, N_SedTanks))
    Geom_Channel ← Perpendicular_Weir if (hl_weir ≤ HL_SedWeirMax)
    Geom_Channel ← Parallel_Weir otherwise
    return Geom_Channel
W_SedWeirInlet(Q_Plant, N_SedTanks) :=
    W_SedInletChannelPreWeir(Q_Plant, N_SedTanks) if EN_InletChannelGeom(Q_Plant, N_SedTanks) == Perpendicular_Weir
    L_SedChannel(N_SedTanks, Q_Plant) otherwise
HL_SedWeirInlet(Q_Plant, N_SedTanks) := Headloss_weir(Q_Plant, W_SedWeirInlet(Q_Plant, N_SedTanks))
H_SedWeirInlet(Q_Plant, N_SedTanks) := HW_SedInletChannel(Q_Plant, N_SedTanks) - HL_SedWeirInlet(Q_Plant, N_SedTanks)
W_SedInletChannelPostWeir(Q_Plant, N_SedTanks) := max(W_ChannelMin, W_HorizChannel(Q_Plant, H_SedWeirInlet(Q_Plant, N_SedTanks), HL_ChannelMax, L_SedChannel(N_SedTanks, Q_Plant), Nu_Water, E_Concrete, 1))
W_SedInletChannel(Q_Plant, N_SedTanks) :=
    W_SedInletChannelPreWeir(Q_Plant, N_SedTanks) if EN_InletChannelGeom(Q_Plant, N_SedTanks) == Perpendicular_Weir
    W_SedInletChannelPreWeir(Q_Plant, N_SedTanks) + T_SedWeir + W_SedInletChannelPostWeir(Q_Plant, N_SedTanks) if EN_InletChannelGeom(Q_Plant, N_SedTanks) == Parallel_Weir
L_FiEntrancePipeEst(Q_Plant, N_SedTanks) := W_DCWalkway + W_SedInletChannel(Q_Plant, N_SedTanks) + 1 m
ND_FiEntrancePipeMax(Q_Plant, N_SedTanks) := FloorNearest(Pipesizes[index(FloorNearest(W_SedBay/2 - ConRadius(ND_SedManifold(Q_Plant, N_SedTanks)) - 2*S_Fitting, Pipesizes[:, 1]), Pipesizes[:, 1]), 0], AvailND)
ND_FiEntrancePipe(Q_Plant, N_SedTanks) := min(D_pipeschedule(min(Q_Plant, Q_pipetotal(innerdiameter(AvailND[last(AvailND)], PS_Default), HL_FiEntrancePipeMax, L_FiEntrancePipeEst(Q_Plant, N_SedTanks), Nu_Water, E_Pvc, K_FiEntrancePipe)), PS_Default, HL_FiEntrancePipeMax, L_FiEntrancePipeEst(Q_Plant, N_SedTanks), Nu_Water, E_Pvc, K_FiEntrancePipe), ND_FiEntrancePipeMax(Q_Plant, N_SedTanks))
HW_SedExitChannel(Q_Plant, N_SedTanks) := HW_SedInletChannel(Q_Plant, N_SedTanks) - HL_SedLaunderBod
W_SedExitChannelPreWeir(Q_Plant, N_SedTanks) := max(W_HorizChannel(Q_Plant, HW_SedExitChannel(Q_Plant, N_SedTanks), HL_ChannelMax, L_SedChannel(N_SedTanks, Q_Plant), Nu_Water, E_Concrete, 1), W_ChannelMin, CapHeight(ND_SedLaunder(Q_Plant, N_SedTanks)) + 1.05*L_SedLaunderCapExcess)
N_FiEntrancePipes(Q_Plant, N_SedTanks) := ceil(Q_Plant/Q_pipetotal(innerdiameter(ND_FiEntrancePipe(Q_Plant, N_SedTanks), PS_Default), HL_FiEntrancePipeMax, L_FiEntrancePipeEst(Q_Plant, N_SedTanks), Nu_Water, E_Pvc, K_FiEntrancePipe))
W_SedExitChannelPostWeir(Q_Plant, N_SedTanks) := max(2*ConRadius(ND_FiEntrancePipe(Q_Plant, N_SedTanks))*(N_FiEntrancePipes(Q_Plant, N_SedTanks) > 1), W_ChannelMin, W_HorizChannel(Q_Plant, H_SedWeirInlet(Q_Plant, N_SedTanks), HL_ChannelMax, L_SedChannel(N_SedTanks, Q_Plant) - W_SedBay/2, Nu_Water, E_Concrete, 1))
W_SedExitChannel(Q_Plant, N_SedTanks) := W_SedExitChannelPreWeir(Q_Plant, N_SedTanks) + T_SedWeir + W_SedExitChannelPostWeir(Q_Plant, N_SedTanks)
L_SedHopper(Q_Plant, N_SedTanks) := W_SedExitChannel(Q_Plant, N_SedTanks) + T_SedWeir + W_SedInletChannel(Q_Plant, N_SedTanks) + T_ChannelWall + 2*T_ConcreteMin
H_SedWeirExit(Q_Plant, N_SedTanks) := HW_SedExitChannel(Q_Plant, N_SedTanks) - HL_SedWeirExit(N_SedTanks, Q_Plant)
H_LamellaToLaunder(Q_Plant, N_SedTanks) := T_ConcreteMin + CapThickness(ND_SedLaunder(Q_Plant, N_SedTanks))  # error: Evaluation not allowed in this definition.
L_SedUpflow(Q_Plant, N_SedTanks) :=
    i ← 0
    L ← 0 m
    while L < L_SedUpflowEst(Q_Plant, N_SedTanks)
        i ← i + 1
        L ← (H_SedWeirExit(Q_Plant, N_SedTanks) + T_ChannelWall - outerdiameter(ND_SedLaunder(Q_Plant, N_SedTanks)) - H_LamellaToLaunder - T_SedPlate*cos(AN_SedPlate))/tan(AN_SedPlate) + T_SedPlate/sin(AN_SedPlate) + (PlateIndex[i] - 1)*B_SedPlate/sin(AN_SedPlate) - 2*T_ConcreteMin
    return L
L_Sed(Q_Plant, N_SedTanks) := L_SedHopper(Q_Plant, N_SedTanks) + L_SedUpflow(Q_Plant, N_SedTanks)
