# [reference: BasicInputs- hmr6.xmcd]
# [reference: ExpertInputs.xmcd]
# [reference: DesignAssumptions.xmcd]
# [reference: MathFunctions.xmcd]
# [reference: PipeDatabase.xmcd]
# [reference: MinorLossCoefficients.xmcd]
# [reference: FluidsFunctions.xmcd]
# steps to design inlet manifold and determine maximum sed tank length
# new spec for manifold diameter is based on scour velocity
# need a maximum length of sed tank that we are willing to design based on maximum size pipe that we are willing to use. Perhaps based on how a large pipe fits in the valley. I propose tht we randomly pick a max pipe diameter of 12" (for now)
# Algorithm to give port diameters based on Pi.VenacontractaOrifice*port area = pipe area
# Sedimentation Influent Manifold Program
# The maximum allowable pipe used for the influent manifold
ND_SedManifoldMax = 12 in
# The actual inner diameter of the nomial pipe size
ID_SedManifoldPipe := innerdiameter(ND_SedManifoldMax, EN_PipeSpec) = 0.27305 m
A_SedManifoldPipe := π*ID_SedManifoldPipe^2/4
# This is the maximum possible length of a sedimentation tank for the maximum pipe size
L_SedMax := A_SedManifoldPipe*Pi_VenaContractaOrifice*V_Scour/(V_SedUpBod*W_SedBay) = 4.55334 m
# The area of the water flowing through the manifold ports must be equal to the area of the manifold
A_SedManifoldPorts := A_SedManifoldPipe/Pi_VenaContractaOrifice
B_SedManifoldPort = 10 cm  # The spacing of the manifold ports
Q_SedManifoldPort := V_SedUpBod*W_SedBay*B_SedManifoldPort = 0.0810185 L/s
N_SedManifoldPortsMax := floor(L_SedMax/B_SedManifoldPort)
N_SedManifoldPortsMax = 45
Q_Sed := Q_Plant/N_SedTanks = 16.6667 L/s  # Flow rate through one sed tank
# This is the minimum number of bays required for the entire plant
N_SedBaysTotal := ceil(Q_Plant/(V_SedUpBod*W_SedBay*L_SedMax)) = 14
N_SedBaysMin := ceil(N_SedBaysTotal/N_SedTanks) = 5
# The number of bays per tank is the maximum of the calculated value and the user input
N_SedBays := max(N_SedBaysMin, N_SedBaysEst) = 5
L_Sed := Q_Sed/(W_SedBay*N_SedBays*V_SedUpBod) = 4.11429 m
# The number of ports per manifold calculated from the actual sed length
N_SedManifoldPorts := floor(L_Sed/B_SedManifoldPort) = 41
A_SedManifoldPort := A_SedManifoldPorts/N_SedManifoldPorts = 22.6699 cm^2  # The area of a single port
# Calculate the energy dissipation rate created by the port. We will use this to evaluate this design.
ED_SedManifoldPort := ED(Q_SedManifoldPort, A_SedManifoldPort, Pi_VenaContractaOrifice) = 0.191702 mW/kg
W_Sed := N_SedBays*W_SedBay = 5 m
W_SedBayActual := (W_Sed - (N_SedBays - 1)*T_PlantWall)/N_SedBays  # This accounts for the bay divider wall
Q_SedBay := Q_Sed/N_SedBays = 3.33333 L/s
Q_SedManifold := Q_SedBay = 3.33333 L/s  # There is one manifold per bay
# Inlet Channel Design
L_Channel := N_SedTanks*W_Sed + (N_SedTanks + 1)*T_PlantWall  # Length of the Inlet Channel
# The area of the inlet channel must be large enough not to break up flocs
A_InletChannel := A_Port(Q_Plant, ED_SedInlet, Pi_VenaContractaOrifice)
HW_InletChannel := sqrt(A_InletChannel)  # Assume the channel is square
# This is the required width of the inlet channel in order to prevent floc breakup
W_InletChannelED := A_InletChannel/HW_InletChannel
# This is the required area of the manifold entrance pipe (the pipe that delivers water from the inlet channel to the manifold) to prevent floc breakup
A_SedChimneyPipeMin := A_Port(Q_SedManifold, ED_Floc[1], Pi_VenaContractaOrifice) = 0.0280646 m^2
A_SedManifoldEntrance := A_Port(Q_SedManifold, ED_SedInlet, Pi_VenaContractaOrifice) = 0.0280646 m^2
# Based on the available pipe sizes, this is the smallest acceptable pipe for the manifold entrance
ND_SedManifoldEntrance := NominalPipeSize(2*sqrt(A_SedManifoldEntrance/π)) = 8 in
D_SedManifoldEntrance := innerdiameter(ND_SedManifoldEntrance, EN_PipeSpec) = 0.182601 m
A_SedChimneyPipe := (D_SedManifoldEntrance/2)^2*π = 0.0261875 m^2
# This is the minimum width of the inlet channel in order to fit the coupling of the manifold entrance pipe.  The diameter of a cap is being used as an estimate for the outer diameter of the coupling socket for now
W_InletChannelCoupling := CapDiameter(ND_SedManifoldEntrance) + 2*S_SedInletChannelMin = 0.296538 m
W_InletChannelEst := max(W_InletChannelED, W_InletChannelCoupling) = 0.53471 m
Geom_InletChannel :=
    hl_weir ← Headloss_weir(Q_Plant, W_InletChannelEst)
    Geom_Channel ← Perpindicular_Weir if (hl_weir ≤ HL_SedWeirMax)
    Geom_Channel ← Parallel_Weir otherwise
    return Geom_Channel
    = 1
W_SedWeirInlet :=
    W_InletChannelEst if Geom_InletChannel == Perpindicular_Weir
    L_Channel otherwise
    = 15.6 m
HL_SedWeirInlet := Headloss_weir(Q_Plant, W_SedWeirInlet) = 0.014373 m
H_SedWeirInlet := HW_InletChannel - HL_SedWeirInlet = 0.520337 m
W_InletChannel :=
    W_SedWeirInlet if Geom_InletChannel == Perpindicular_Weir
    w_minchannelHL(H_SedWeirInlet, HW_InletChannel, Q_Plant, L_Channel, Nu_Water, E_Concrete, 1, HL_SedWeirInlet) + T_SedWeir + W_InletChannelEst if Geom_InletChannel == Parallel_Weir
    = 0.785579 m
H_InletChannel := HW_InletChannel + H_PlantFreeboard = 0.63471 m
# Launderer Design
# 1. Equally divide the flow from the plant into each sedimentation tank.
# 2. Calculate the number of orifices using an equal spacing on the length of the launder.
# 3. The flow through each orifice is the flow in the tank divided by the number of orifices.
# 4. The elevation of the manifold launder should be placed in the middle of the water depth above the lamella in the sedimentation tank.
# 5. Find the length of the longest and shortest launders to the plant leveling tank.
# 6. Using an iterative program, and the available pipe sizes from the pipe database, the launder diameter is determined with a function from fluids functions
# 7.Sum the number of bends in the launder piping
# 8. Use function to find equal flow between parallel pipes.
# 9. The diameter of the launder is the max value of 6 and 8.
# 10. Calculate the total headloss in the launder.
# 11. Calculate the total headloss in the orifice.
# 12. Use orifice equation to find diameter of orifice holes.
# The launder will be located between the top of the lamella and the surface of the water in the sedimentation tank, the orifices will be at the center of the launders
# Clarify this. Where are the orifices located? Current proposal is that the two rows be about 135 degrees apart and face slightly downward.
# Add solution method description
L_SedLaunderEst := L_Sed - 2*W_InletChannel - T_ChannelWall = 2.39313 m  # This estimate is good enough to do a full launder design
# 2.
N_SedLaunderOrifices := 2*floor(L_SedLaunderEst/B_SedLaunderOrifices) = 46  # This 2 must be from the assumption that there are two rows of orifices.
# 3.
Q_SedLaunderOrifices := (Q_SedBay/N_SedLaunders)/N_SedLaunderOrifices = 3.62319e-5 m^3/s
# 6.
K_SedLaunder := K_PipeExit = 1
# 7.
ND_SedLaunder := ND_Manifold(Q_SedBay/N_SedLaunders, HL_SedLaunderBod, L_SedLaunderEst, Pi_QLaunderOrifices, EN_PipeSpec, Nu_Water, E_Pvc, K_SedLaunder, N_SedLaunderOrifices) = 4 in
# 10.
HL_SedLaunderManifold := HL_Manifold(Q_SedBay/N_SedLaunders, ND_SedLaunder, L_SedLaunderEst, 0, Nu_Water, E_Pvc, N_SedLaunderOrifices) = 0.0493978 cm
# 11.
HL_SedLaunderOrifice := HL_SedLaunderBod - HL_SedLaunderManifold = 0.039506 m
# 12.
D_SedLaunderOrifice := RoundNearest(D_circle(A_orifice(HL_SedLaunderOrifice, Pi_VenaContractaOrifice, Q_SedLaunderOrifices)), D_Drill) = 0.354331 in
HL_SedLaunder := h_orifice(D_SedLaunderOrifice, Pi_VenaContractaOrifice, Q_SedLaunderOrifices) = 0.0416678 m
# Currently HL.launder is used up and thus the water level in the plant level tank is HL.launder below the sed tank.
# If we round up to the next available drill bit diameter the head loss will drop slightly. We could then calculate a new actual total headloss. For now ...
# Exit Channel Design
# The length is based on the side of the sed tank, this is also the same length of the inlet channel.
L_ExitChannel := N_SedTanks*W_Sed + (N_SedTanks + 1)*T_PlantWall
L_ExitChannel = 15.6 m
# To Calculate the Width of the channel the width of the exit weir needs to be determined.
# The weir equation is used to determine the nominal size for the diameter of the weir (Assumes a circular over flow weir)
D_PltWeirEstimated := (3*Q_Plant/(2*Cd_PltWeir*sqrt(2*g)*π*Pi_PltWeir^(3/2)))^(2/5)
# Using the pipe database file, and given the schedule of the pipe, the actual nominal diameter of the pipe is determined
ND_PltWeir := NominalPipeSize(D_PltWeirEstimated) = 12 in
# The width of the exit channel will either be the same as the width of the inlet channel or as wide as the Outer Diameter of the exit weir.
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Del_PltWeirH := (3*Q_Plant/(2*Cd_PltWeir*sqrt(2*g)*π*ND_PltWeir))^(2/3)
# To ensure uniform distribution of flow between tank bays, head loss in the channel was designed to be twenty times smaller than head loss in the launder. After converting from head loss to flow, the ratio of flow rates in the launders is calculated to be sqrt(20/21)
Π_QSedTanks := sqrt(20/21)
# The tank needs to be wide enough for a hand to fit in to cap the launder.
W_MinChannel(ND_Pipe) := 2*SocketDepth(ND_Pipe)
W_ExitChannelMin := W_MinChannel(ND_SedLaunder) = 0.114 m
H_ExitChannel := H_InletChannel
HW_ExitChannel := HW_InletChannel - HL_SedLaunderBod
FindSide(Q, w, b, L, υ, ε, open) :=
    b ← W_InletChannel
    w ← b
    error ← 1
    while error > 0.001
        h_temp ← h_frect(Q, w, b, L, υ, ε, open)
        b ← b*(h_temp/HL_SedLaunderBod*Π_QSedTanks^2/(1 - Π_QSedTanks^2))^(1/4)
        w ← b
        error ← |h_temp/HL_SedLaunderBod - (1 - Π_QSedTanks^2)/Π_QSedTanks^2|
    return w
W_ExitChannelEst := max(FindSide(Q_Plant, W_InletChannel, W_InletChannel, L_Channel, Nu_Water, E_Concrete, 1), W_ExitChannelMin) = 0.460977 m
Geom_ExitChannel :=
    hl_weir ← Headloss_weir(Q_Plant, W_ExitChannelEst)
    Geom_Channel ← Perpindicular_Weir if (hl_weir ≤ HL_SedWeirMax)
    Geom_Channel ← Parallel_Weir otherwise
    return Geom_Channel
    = 1
W_SedWeirExit :=
    W_ExitChannelEst if Geom_ExitChannel == Perpindicular_Weir
    L_Channel otherwise
    = 15.6 m
HL_SedWeirExit := Headloss_weir(Q_Plant, W_SedWeirExit) = 0.014373 m
H_SedWeirExit := HW_ExitChannel - HL_SedWeirExit = 48.0337 cm
W_ExitChannel :=
    W_SedWeirExit if Geom_ExitChannel == Perpindicular_Weir
    (W_ExitChannelMin + T_SedWeir + w_minchannelHL(H_SedWeirExit, HW_ExitChannel, Q_Plant, L_Channel, Nu_Water, E_Concrete, 1, HL_SedWeirExit)) otherwise
    = 0.376798 m
L_SedLaunder := L_Sed - W_InletChannel - W_ExitChannel - T_ChannelWall
# The actual weir height is determined using the actual inner diameter of the pipe and the weir equation
H_PltWeir := HW_ExitChannel - Del_PltWeirH = 0.400334 m
# Lamella Design
H_SedAbove := outerdiameter(ND_SedLaunder) + HL_SedLaunderBod = 15.43 cm
S_SedPlate := B_SedPlateMin - T_SedPlate = 1.7 cm
# the actual function L.Sed.Plate does not realize any iteration, it gives the same result as the following equation.
L_SedPlateEst :=
    L1 ← HW_InletChannel*cos(AN_SedPlate)
    L2 ← 0 m
    while |L1 - L2| > 0.01 m
        L_Inactive ← L1*cos(AN_SedPlate) + W_InletChannel + W_ExitChannel + 2*T_ChannelWall
        V_Up ← Q_Sed/(W_Sed*(L_Sed - L_Inactive))
        L2 ← (B_SedPlateMin*(V_Up/V_SedCBod - 1) + T_SedPlate)/(sin(AN_SedPlate)*cos(AN_SedPlate))
        L1 ← L2
    return L1
(B_SedPlateMin*(Q_Sed/(W_Sed*(L_Sed - (HW_InletChannel*cos(AN_SedPlate)*cos(AN_SedPlate) + W_InletChannel + W_ExitChannel + 2*T_ChannelWall)))/V_SedCBod - 1) + T_SedPlate)/(sin(AN_SedPlate)*cos(AN_SedPlate)) = 0.488974 m
i
L_SedPlateEst = 0.488974 m
L_SedPlate := L_SedPlateSheet/floor(L_SedPlateSheet/L_SedPlateEst) = 0.522514 m
L_SedInactive := L_SedPlate*cos(AN_SedPlate) + W_InletChannel + W_ExitChannel + 2*T_ChannelWall
L_SedActiveMax := L_Sed - L_SedInactive = 2.39065 m
V_SedUpActiveBelow := Q_Sed/(W_Sed*L_SedActiveMax)
V_SedUpActiveBelow = 0.00139432 m/s
B_SedPlate := (L_SedPlate*sin(AN_SedPlate)*cos(AN_SedPlate) - T_SedPlate)/(V_SedUpActiveBelow/V_SedCBod - 1) = 2.02097 cm
B_SedPlateHorizontal := B_SedPlate/sin(AN_SedPlate)
N_SedPlates := ceil(L_SedActiveMax/B_SedPlateHorizontal) + 1 = 104
H_SedPlate := L_SedPlate*sin(AN_SedPlate)
H_SedPlate = 0.452511 m
# Now calculate actual values of all parameters!
L_SedActive := L_Sed - L_SedInactive - N_SedPlates*T_SedPlate/sin(AN_SedPlate) = 2.03038 m
# Number of spaces where water is traveling is one less than the number of plates used to create those spaces
V_SedUp := Q_Sed/(L_Sed*W_Sed) = 70 m/day
V_SedUpActive := Q_Sed/(L_SedActive*W_Sed) = 141.845 m/day
V_SedC := V_SedUpActive/(1 + L_SedPlate/S_SedPlate*cos(AN_SedPlate)*sin(AN_SedPlate)) = 9.9129 m/day
HW_Sed := max(Z_SedSlopes + H_SedFrameWall + H_SedBetween + 2*outerdiameter(ND_SedPlateFrame) + H_SedPlate + H_SedAbove, H_SedManifoldPort + H_SedBetween + T_ChannelWall + H_InletChannel)
HW_Sed =  # error: This variable is undefined.
Z_SedSlopes + H_SedFrameWall + H_SedBetween + 2*outerdiameter(ND_SedPlateFrame) + H_SedPlate + H_SedAbove =  # error
Z_SedSlopes =  # error
2*outerdiameter(ND_SedPlateFrame) = 0.066802 m
Z_SedSlopes =  # error
Z_SedSlopes + H_SedFrameWall + H_SedBetween + 2*outerdiameter(ND_SedPlateFrame) + H_SedPlate + H_SedAbove =  # error
H_SedBetween = 0
H_SedFrameWall =  # error
H_SedFrameWall =  # error
H_Sed := HW_Sed + H_PlantFreeboard
Z_Mp := HW_Sed - HW_InletChannel
Z_SedLaunder := HW_Sed - HL_SedLaunder - outerradius(ND_SedLaunder)
ZW_ExitChannel := HW_Sed - HL_SedLaunder
H_SedBayDivider := Z_SedSlopes + H_SedFrameWall
W_SedBayDivider := T_ChannelWall
Z_MP := HW_Sed - HW_InletChannel
# Launder Cap
# The size of the opening in the cap to allow the inflow of water into the sedimentation tank is determined by the Orifice Equation Q=A*K*(2*g*h)^.5 so that the flow rate through the cap is at most the flow rate out of the other sedimentation tanks.
H_LaunderCap := H_Sed - H_ExitChannel + HW_ExitChannel
A_CapOrifice := Q_Sed/(Pi_VenaContractaOrifice*sqrt(2*g*H_LaunderCap))
D_CapOrifice := sqrt(A_CapOrifice/(π/4))
L_LaunderCouplingPipe := T_PlantWall + CapHeight(ND_SedLaunder)
# Sludge Drain Program
# Here we are assuming that we are willing to use up to 80% of the available energy to get the flow through the valve and discharge it to atmosphere.
HL_Valve := 0.8*HW_SedEst
Q_SedSludgeDrain := W_SedBayActual*L_Sed*HW_SedEst/Ti_SludgeDrain = 0.0120686 m^3/s  # This is the initial drain rate
# There will be a drain orifice in between each manifold port
B_SedSludgeOrifices := B_SedManifoldPort
N_SedSludgeOrifices := floor(L_Sed/B_SedSludgeOrifices) = 41  # per bay
Q_SedSludgeOrifices := Q_SedSludgeDrain/N_SedSludgeOrifices
ND_SedSludgeValve := D_pipeschedule(Q_SedSludgeDrain, EN_PipeSpec, HL_Valve, T_PlantWall, Nu_Water, E_Pvc, K_GateValve + K_PipeExit) = 3 in
# This is the actual head loss through the valve given its diameter
HL_SedDrainValve := h_e(Q_SedSludgeDrain, innerdiameter(ND_SedSludgeValve, EN_PipeSpec), K_GateValve + K_PipeExit) = 0.654077 m
HL_SludgeDrain := HW_SedEst - HL_Valve = 0.4 m
ID_SedSludge := ID_Manifold(Q_SedSludgeDrain, HL_SludgeDrain, L_Sed, Pi_QSludgeOrifices, EN_PipeSpec, Nu_Water, E_Concrete, 0, N_SedSludgeOrifices) = 4.50107 in
# This is the required diameter of the sludge drain if it were circular
HL_SedSludgeEst := HL_Manifold(Q_SedSludgeDrain, ID_SedSludge, L_Sed, 0, Nu_Water, E_Concrete, N_SedSludgeOrifices) = 4.09662 cm
HL_SedSludgeOrificeEst := HL_SludgeDrain - HL_SedSludgeEst = 35.9034 cm
D_SedSludgeOrifice := RoundNearest(D_circle(A_orifice(HL_SedSludgeOrificeEst, Pi_VenaContractaOrifice, Q_SedSludgeOrifices)), D_Drill) = 15 mm
A_SedSludge := π/4*ID_SedSludge^2
W_SedSludge := sqrt(2*A_SedSludge) = 0.143288 m  # Assume sludge drain is twice as wide as it is high (to save depth in the sed tank)
H_SedSludge := A_SedSludge/W_SedSludge = 0.071644 m
W_SedDrainCover := W_SedSludge + 2*W_SedSludgeSF
# The thickness of the sed sludge is defined to be equal to the quarter of the width of the sed sludge drain cover..
T_SedSludge := 0.25*W_SedDrainCover
Z_SedSludge := T_SedSludge + H_SedSludge = 0.119966 m
W_SedSlope := (W_SedBayActual - W_SedSludge)/2
H_SedSlopeTriangle := W_SedSlope/tan(AN_SedTopInlet)
Z_SedSlopes := Z_SedSludge + H_SedSlopeTriangle = 0.332636 m
