# [reference: BasicInputs- rb563.xmcd]
# [reference: DesignAssumptions.xmcd]
# [reference: PipeDatabase.xmcd]
# [reference: MinorLossCoefficients.xmcd]
# [reference: MathFunctions.xmcd]
AvailPipeSizes(EN_PipeSeries) = [
    0.5, 0.5;
    0.915, 1;
    1.4484, 1.5;
    1.875, 2;
    2.8, 3;
    3.626, 4;
    5.501, 6;
    7.189, 8;
    10.75, 12;
    13.564, 16;
    17, 20;
    20.376, 24
] in
# [reference: FluidsFunctions.xmcd]
A_pipe := A_pipes(EN_PipeSeries)
Q_pipe := Q_pipes(ED_SedInlet, A_pipe, Pi_VenaContractaOrifice)
# Sedimentation Influent Manifold Program
# The maximum allowable pipe used for the influent manifold
ND_SedManifoldMax = 12 in
Manifold_maxindex := findindexID(ND_SedManifoldMax, EN_PipeSeries) = 8
A_SedManifoldPipeMax := A_pipe[Manifold_maxindex]
# This is the maximum possible length of a sedimentation tank for the maximum pipe size
L_SedMax := Q_pipe[Manifold_maxindex]/(V_SedUpBod*W_SedPlate) = 30.7198 m
# The area of the water flowing through the manifold ports must be equal to the area of the manifold
A_SedManifoldPorts := A_SedManifoldPipeMax/Pi_VenaContractaOrifice = 0.0929466 m^2
# The spacing of the manifold ports
Q_SedManifoldPort := V_SedUpBod*W_SedPlate*B_SedManifoldPortEst = 0.0810185 L/s
N_SedManifoldPortsMax := floor(L_SedMax/B_SedManifoldPortEst) = 307
Q_Sed := Q_Plant/N_SedTanks = 5 L/s  # Flow rate through one sed tank
# This is the minimum number of bays required for the entire plant
N_SedBaysTotal := ceil(Q_Plant/(V_SedUpBod*W_SedPlate*L_SedMax)) = 1
N_SedBaysMin := ceil(N_SedBaysTotal/N_SedTanks) = 1
# The number of bays per tank is the maximum of the calculated value and the user input
N_SedBays := max(N_SedBaysMin, N_SedBaysEst) = 2
L_Sed := Q_Sed/(W_SedPlate*N_SedBays*V_SedUpBod) = 3.08571 m
# The number of ports per manifold calculated from the actual sed length
N_SedManifoldPortsEst := floor(L_Sed/B_SedManifoldPortEst) = 30
W_Sed := N_SedBays*W_SedPlate = 2 m
Q_SedBay := Q_Sed/N_SedBays = 2.5 L/s
Q_SedManifold := Q_SedBay = 2.5 L/s  # There is one manifold per bay
Manifold_index := findindexQ(Q_SedManifold, Q_pipe)
Q_SedManifoldcapacity := Q_pipe[Manifold_index] = 5.21292 L/s
A_SedManifoldPipe := A_pipe[Manifold_index]
D_SedManifoldPort := RoundNearest(D_circle(A_SedManifoldPipe/(Pi_VenaContractaOrifice*N_SedManifoldPortsEst)), D_Drill)  # The diameter of a single port
A_SedManifoldPort := A_circle(D_SedManifoldPort)  # The area of a single port
N_SedManifoldPorts := round(A_SedManifoldPipe/(Pi_VenaContractaOrifice*A_SedManifoldPort)) = 30  # The number of ports given the area calculated
# Calculate the energy dissipation rate created by the port. We will use this to evaluate this design.
ED_SedManifoldPort := ED(Q_SedManifoldPort, A_SedManifoldPort, Pi_VenaContractaOrifice) = 7.20837 mW/kg
ND_SedManifold := NominalDiameter(2*sqrt(A_SedManifoldPipe/π), EN_PipeSeries) = 0.1524 m
ID_SedManifoldPipe := innerdiameter(ND_SedManifold, EN_PipeSeries) = 0.139725 m
OD_SedManifoldPipe := outerdiameter(ND_SedManifold) = 0.168275 m
S_SedManifoldBetween := V_SedUpBod*W_SedPlate/(2*V_Scour) = 0.405093 cm
# Inlet Channel Design
L_Channel := N_SedTanks*W_Sed + (N_SedTanks + 1)*T_PlantWall  # Length of the Inlet Channel
# The area of the inlet channel must be large enough not to break up flocs
A_InletChannel := A_Port(Q_Plant, ED_SedInlet, Pi_VenaContractaOrifice)
HW_InletChannel := sqrt(A_InletChannel)  # Assume the channel is square
# This is the required width of the inlet channel in order to prevent floc breakup
W_InletChannelED := A_InletChannel/HW_InletChannel
# This is the required area of the manifold entrance pipe (the pipe that delivers water from the inlet channel to the manifold) to prevent floc breakup
A_SedChimneyPipeMin := A_Port(Q_SedManifold, ED_Floc[1], Pi_VenaContractaOrifice)  # error: This value must be a vector.
A_SedManifoldEntrance := A_Port(Q_SedManifold, ED_SedInlet, Pi_VenaContractaOrifice) = 0.0168799 m^2
# Based on the available pipe sizes, this is the smallest acceptable pipe for the manifold entrance
ND_SedManifoldEntranceMin := NominalPipeSize(2*sqrt(A_SedManifoldEntrance/π)) = 6 in
ND_SedManifoldEntrance := ND_SedManifold  # The inlet pipe is set to be the same as the manifold pipe
ND_SedManifold = 6 in
D_SedManifoldEntrance := innerdiameter(ND_SedManifoldEntrance, EN_PipeSeries) = 0.139725 m
A_SedChimneyPipe := (D_SedManifoldEntrance/2)^2*π = 0.0153335 m^2
# This is the minimum width of the inlet channel in order to fit the coupling of the manifold entrance pipe.  The diameter of a cap is being used as an estimate for the outer diameter of the coupling socket for now
W_InletChannelCoupling := 2*ConRadius(NominalDiameter(outerdiameter(ND_SedManifoldEntrance), EN_PipeSeries)) + 2*S_SedInletChannelMin = 0.32289 m
W_InletChannelEst := max(W_InletChannelED, W_InletChannelCoupling) = 0.32289 m
Geom_InletChannel :=
    hl_weir ← Headloss_weir(Q_Plant, W_InletChannelEst)
    Geom_Channel ← Perpindicular_Weir if (hl_weir ≤ HL_SedWeirMax)
    Geom_Channel ← Parallel_Weir otherwise
    return Geom_Channel
    = 0
W_SedWeirInlet :=
    W_InletChannelEst if Geom_InletChannel == Perpindicular_Weir
    L_Channel otherwise
    = 0.32289 m
HL_SedWeirInlet := Headloss_weir(Q_Plant, W_SedWeirInlet) = 0.0652049 m
H_SedWeirInlet := HW_InletChannel - HL_SedWeirInlet = 0.170143 m
W_InletChannel :=
    W_SedWeirInlet if Geom_InletChannel == Perpindicular_Weir
    w_minchannelHL(H_SedWeirInlet, HW_InletChannel, Q_Plant, L_Channel, Nu_Water, E_Concrete, 1, HL_SedWeirInlet) + T_SedWeir + W_InletChannelEst if Geom_InletChannel == Parallel_Weir
    = 0.32289 m
H_InletChannel := HW_InletChannel + H_PlantFreeboard = 0.335348 m
L_SedManifoldPipe := L_Sed - W_InletChannelEst/2 - CapHeight(ND_SedManifold) = 2.79727 m
# The spacing of the manifold ports is redefined because the manifold is shorter due to the elbow
B_SedManifoldPort := (L_SedManifoldPipe - ElbowRadius(ND_SedManifold))/(N_SedManifoldPorts - 1) = 8.85748 cm
# Exit Channel Design
L_ExitChannel := L_Channel = 4.45 m
# To ensure uniform distribution of flow between tank bays, head loss in the channel was designed to be twenty times smaller than head loss in the launder. After converting from head loss to flow, the ratio of flow rates in the launders is calculated to be sqrt(20/21)
Π_QSedTanks := sqrt(20/21)
# The exit channel needs to at least be wide enough to fit a cap onto the launders
W_ExitChannelMin := 10 in
H_ExitChannel := H_InletChannel
HW_ExitChannel := HW_InletChannel - HL_SedLaunderBod
FindSide(Q, L, υ, ε, open) :=
    b ← W_InletChannel
    w ← b
    error ← 1
    while error > 0.001
        h_temp ← h_frect(Q, w, b, L, υ, ε, open)
        b ← b*(h_temp/HL_SedLaunderBod*Π_QSedTanks^2/(1 - Π_QSedTanks^2))^(1/4)
        w ← b
        error ← |h_temp/HL_SedLaunderBod - (1 - Π_QSedTanks^2)/Π_QSedTanks^2|
    return w
# The exit channel is design by assuming the weir geometry is a perpindicular weir, and then the maximum of the the width determined by the headloss in the exit channel and the minimum width to be albe to fit a cap on the launders is chosen
W_ExitChannelEst := max(FindSide(Q_Plant, L_Channel, Nu_Water, E_Concrete, 1), W_ExitChannelMin) = 0.254 m
Geom_ExitChannel :=
    hl_weir ← Headloss_weir(Q_Plant, W_ExitChannelEst)
    Geom_Channel ← Perpindicular_Weir if (hl_weir ≤ HL_SedWeirMax)
    Geom_Channel ← Parallel_Weir otherwise
    return Geom_Channel
    = 0
W_SedWeirExit :=
    W_ExitChannelEst if Geom_ExitChannel == Perpindicular_Weir
    L_Channel otherwise
    = 0.254 m
HL_SedWeirExit := Headloss_weir(Q_Plant, W_SedWeirExit) = 0.0765176 m
H_SedWeirExit := HW_ExitChannel - HL_SedWeirExit = 11.8831 cm
W_ExitChannel :=
    W_SedWeirExit if Geom_ExitChannel == Perpindicular_Weir
    (W_ExitChannelMin + T_SedWeir + w_minchannelHL(H_SedWeirExit, HW_ExitChannel, Q_Plant, L_Channel, Nu_Water, E_Concrete, 1, HL_SedWeirExit)) otherwise
    = 0.254 m
# Lamella Design
# S is the distance from the faces of each plate
S_SedPlate := B_SedPlateMin - T_SedPlate = 2 cm
# Estimate a length of the lamella based on the water height in the inlet channel
L_SedPlateEst :=
    L1 ← HW_InletChannel*cos(AN_SedPlate)
    L2 ← 0 m
    while |L1 - L2| > 0.01 m
        L_Inactive ← L1*cos(AN_SedPlate) + W_InletChannel + W_ExitChannel + 2*T_ChannelWall
        V_Up ← Q_Sed/(W_Sed*(L_Sed - L_Inactive))
        L2 ← L1
        L1 ← (B_SedPlateMin*(V_Up/V_SedCBod - 1) + T_SedPlate)/(sin(AN_SedPlate)*cos(AN_SedPlate))
    return L1
L_SedPlateEst = 0.54521 m
# The actual function L.Sed.Plate does not realize any iteration, it gives the same result as the following equation.
# Calculate the actual length of the lamella
L_SedPlate := L_SedPlateSheet/floor(L_SedPlateSheet/L_SedPlateEst) = 0.6096 m
L_SedInactiveEst := L_SedPlate*cos(AN_SedPlate) + W_InletChannel + W_ExitChannel + 2*T_ChannelWall
L_SedActiveEst := L_Sed - L_SedInactiveEst = 1.90402 m
H_SedPlate := L_SedPlate*sin(AN_SedPlate) = 0.527929 m
# Launder Design
L_SedLaunderEst := L_Sed - T_ChannelWall - W_InletChannel - W_ExitChannel = 2.35882 m
# There will be two orifices per row along the active length of the launder
N_SedLaunderOrificesEst := 2*floor(L_SedActiveEst/B_SedLaunderOrificesEst) = 38
Q_SedLaunderOrificesEst := (Q_SedBay/N_SedLaunders)/N_SedLaunderOrificesEst = 32.8947 cm^3/s
K_SedLaunder := K_PipeExit = 1
ND_SedLaunder := ND_Manifold(Q_SedBay/N_SedLaunders, HL_SedLaunderBod, L_SedActiveEst, Pi_QLaunderOrifices, EN_PipeSeries, Nu_Water, E_Pvc, K_SedLaunder, N_SedLaunderOrificesEst)
# This the HL do to major & minor losses loses
HL_SedLaunderEst := HL_Manifold(Q_SedBay/N_SedLaunders, innerdiameter(ND_SedLaunder, EN_PipeSeries), L_SedActiveEst, 0, Nu_Water, E_Pvc, N_SedLaunderOrificesEst) + h_f(Q_SedBay/N_SedLaunders, innerdiameter(ND_SedLaunder, EN_PipeSeries), L_SedLaunderEst - L_SedActiveEst, Nu_Water, E_Pvc)
HL_SedLaunder =  # error: This variable is undefined.
HL_SedLaunderOrifice := HL_SedLaunderBod - HL_SedLaunderEst = 3.77078 cm
D_SedLaunderOrifice := RoundNearest(D_circle(A_orifice(HL_SedLaunderOrifice, Pi_VenaContractaOrifice, Q_SedLaunderOrificesEst)), D_Drill)
Q_SedLaunderOrifices := Q_orifice(D_SedLaunderOrifice, HL_SedLaunderOrifice, Pi_VenaContractaOrifice) = 3.44672e-5 m^3/s
# This is the total headloss through the launder based on the actual diameter of the orifices
HL_SedLaunder := h_orifice(D_SedLaunderOrifice, Pi_VenaContractaOrifice, Q_SedLaunderOrifices) = 0.0377078 m
L_SedLaunder := L_Sed - 2*T_ChannelWall - CapHeight(ND_SedLaunder) - W_InletChannel - W_ExitChannel = 2.13501 m
# Sludge Drain Program
# Here we are assuming that we are willing to use up to 80% of the available energy to get the flow through the valve and discharge it to atmosphere.
HL_Valve := 0.8*HW_SedEst
# This is the initial drain rate
Q_SedSludgeDrain := W_SedPlate*L_Sed*HW_SedEst/Ti_SludgeDrain = 0.0102857 m^3/s
# There will be a drain orifice in between each manifold port
B_SedSludgeOrifices := B_SedManifoldPort
N_SedSludgeOrifices := floor(L_Sed/B_SedSludgeOrifices) = 34  # per bay
Q_SedSludgeOrifices := Q_SedSludgeDrain/N_SedSludgeOrifices
ND_SedSludgeValve := D_pipeschedule(Q_SedSludgeDrain, EN_PipeSeries, HL_Valve, T_PlantWall, Nu_Water, E_Pvc, K_GateValve + K_PipeExit) = 3 in
# This is the actual head loss through the valve given its diameter
HL_SedDrainValve := h_e(Q_SedSludgeDrain, innerdiameter(ND_SedSludgeValve, EN_PipeSeries), K_GateValve + K_PipeExit) = 0.475101 m
HL_SludgeDrain := HW_SedEst - HL_Valve = 0.4 m
# This is the required diameter of the sludge drain if it were circular
ID_SedSludge := ID_Manifold(Q_SedSludgeDrain, HL_SludgeDrain, L_Sed, Pi_QSludgeOrifices, EN_PipeSeries, Nu_Water, E_Concrete, 0, N_SedSludgeOrifices) = 4.10148 in
HL_SedSludgeEst := HL_Manifold(Q_SedSludgeDrain, ID_SedSludge, L_Sed, 0, Nu_Water, E_Concrete, N_SedSludgeOrifices) = 3.70567 cm
HL_SedSludgeOrificeEst := HL_SludgeDrain - HL_SedSludgeEst = 36.2943 cm
D_SedSludgeOrifice := RoundNearest(D_circle(A_orifice(HL_SedSludgeOrificeEst, Pi_VenaContractaOrifice, Q_SedSludgeOrifices)), D_Drill) = 15 mm
# The cross sectional area of the drain if it were circular
A_SedSludge := π/4*ID_SedSludge^2
# Assume sludge drain is twice as wide as it is high (to save depth in the sed tank)
W_SedSludge := sqrt(2*A_SedSludge) = 13.0567 cm
H_SedSludge := A_SedSludge/W_SedSludge = 6.52836 cm
# The width of the drain cover needs to rest on the ledge created by the drain
W_SedDrainCover := W_SedSludge + 2*T_ConcreteMin
# The thickness of the sed sludge is defined to be equal to the quarter of the width of the sed sludge drain cover..This 1/4 is a negociable constant
T_SedSludge := 0.25*W_SedDrainCover
# The elevation of the top of the sludge drain and drain cover
Z_SedSludge := T_SedSludge + H_SedSludge = 0.122925 m
# Sedimentation Components
# This is the width of the sloped part of the sed tank wall.  It will be used to calculate the elevation of the bay walls
W_SedSlope := (W_SedPlate - W_SedDrainCover)/2 - T_ConcreteMin/2
W_SedInletBottom := (W_SedPlate - W_SedDrainCover)/2 = 0.384716 m
H_SedSlopeTriangle := tan(AN_SedSlope)*W_SedSlope = 0.623047 m
# The elevation of the center of the manifold includes the minimum space between the outside of the manifold pipe and the drain cover
H_SedBetween := max(H_SedSlopeTriangle, ConRadius(ND_SedManifold) + 2*SocketDepth(ND_SedManifold) + ElbowRadius(ND_SedManifold)) - H_SedSlopeTriangle
Z_SedManifoldPipe := Z_SedSludge + (OD_SedManifoldPipe/2 + S_SedManifoldBetween) = 0.211114 m
# The elevation of the top of the sloped walls
Z_SedSlopes := Z_SedSludge + H_SedSlopeTriangle = 0.745972 m
# H.SedAbove is the height needed above the lamella
H_SedAbove := outerdiameter(ND_SedLaunder) + HL_SedLaunder
# H.SedBetween is a user specified distance between the top of the sloped walls and the bottom of the pipefram (i.e. additional distance wanted for a floc blanket. The height of water in the sed tank is the sum of all of the heights of the components plus the additional specified space
HW_Sed := Z_SedSlopes + H_SedBetween + 2*outerdiameter(ND_SedPlateFrame) + H_SedPlate + H_SedAbove = 1.46731 m
H_Sed := HW_Sed + H_PlantFreeboard = 1.56731 m
Z_Mp := HW_Sed - HW_InletChannel = 1.23196 m
# The elevation of the launder
Z_SedLaunder := HW_Sed - HL_SedLaunder - outerradius(ND_SedLaunder) = 1.38515 m
H_SedBayDivider := Z_SedSlopes + H_SedBetween
# Launder Cap
# The size of the opening in the cap to allow the inflow of water into the sedimentation tank is determined by the Orifice Equation Q=A*K*(2*g*h)^.5 so that the flow rate through the cap is at most the flow rate out of the other sedimentation tanks.
HW_LaunderCap := H_Sed - H_ExitChannel + HW_ExitChannel = 1.42731 m
A_LaunderCapOrifice := Q_Sed/(Pi_VenaContractaOrifice*sqrt(2*g*HW_LaunderCap)) = 15.0001 cm^2
D_CapOrifice := RoundNearest(D_circle(A_orifice(h_orifice(sqrt(A_LaunderCapOrifice/(π/4)), Pi_VenaContractaOrifice, Q_SedBay/N_SedLaunders), Pi_VenaContractaOrifice, Q_SedBay/N_SedLaunders)), D_Drill) = 0.044 m
L_LaunderCouplingPipe := T_PlantWall + CapHeight(ND_SedLaunder)
# Inlet and Exit Channel Pipes
# The weir equation is used to determine the nominal size for the diameter of the inlet and exit channel tank pipes (Assumes a circular over flow weir)
D_PltWeirEstimated := D_pipe(Q_Plant, AvailPipeSizes(EN_PipeSeries)[:, 0], H_Sed - H_ExitChannel, L_Sed + H_Sed - H_ExitChannel, Nu_Water, E_Pvc, K_90 + Pi_VenaContractaOrifice)
# Using the pipe database file, and given the schedule of the pipe, the actual nominal diameter of the pipe is determined
ND_PltWeir := NominalPipeSize(D_PltWeirEstimated) = 3 in
L_WeirPipe := H_Sed - H_ExitChannel - ElbowRadius(ND_PltWeir) - ConRadius(ND_PltWeir)
# Adjustment of the plate settlers
L_SedActive := L_SedActiveEst + (H_SedPlate + H_SedAbove + H_PlantFreeboard - H_ExitChannel - T_PlantWall)/tan(AN_SedPlate) = 2.05944 m
V_SedUpActiveBelow := Q_Sed/(W_Sed*L_SedActive)
# The center to center perpindicular distance between the lamella sheets
B_SedPlate := (L_SedPlate*sin(AN_SedPlate)*cos(AN_SedPlate) - T_SedPlate)/(V_SedUpActiveBelow/V_SedCBod - 1) = 2.75039 cm
# The center to center horizontal distance between the lamella sheets
B_SedPlateHorizontal := B_SedPlate/sin(AN_SedPlate)
# Number of spaces where water is traveling is one less than the number of plates used to create those spaces
N_SedPlates := ceil(L_SedActive/B_SedPlateHorizontal) = 65
# The length of the active sed tank where water actually flow
L_SedActive1 := L_SedActive - N_SedPlates*T_SedPlate/sin(AN_SedPlate) = 1.83427 m
V_SedUp := Q_Sed/(L_Sed*W_Sed) = 70 m/day
V_SedUpActive := Q_Sed/(L_SedActive1*W_Sed) = 117.758 m/day
V_SedC := V_SedUpActive/(1 + L_SedPlate/S_SedPlate*cos(AN_SedPlate)*sin(AN_SedPlate)) = 8.29384 m/day
# This is the number of rows of orifices.  There are two orifices per row
N_SedLaunderOrificesRow := ceil((Q_SedBay/N_SedLaunders)/(2*Q_SedLaunderOrifices)) = 19
# Total number of orifices on the launder
N_SedLaunderOrifices := N_SedLaunderOrificesRow*2 = 38
B_SedLaunderOrifices := 2*L_SedActive/N_SedLaunderOrifices = 10.8392 cm
