# Stacked Rapid Sand Filter
## Constraints and Comments (Not necessarily updated)
# Max head loss through inlet piping during filtration
# Max head loss through inlet piping during backwash
# Max head loss through outlet piping during filtration
# Max head loss through outlet piping during backwash (siphon)
# Max ratio of head loss in manifold to head loss through filter layer during filtration
# Max ratio of head loss in manifold to head loss through filter layer during filtration
# The head loss across each layer of the filter must be large compared to losses in the plumbing that distributes water into the sand bed, in order for the water to be distributed uniformly to each layer.  At the beginning of a filtration cycle when the sand bed is clean, the head loss is the smallest.  This minimum head loss during filtration is estimated by the Carman-Kozeny equation.
# Filtration mode constraints
# The inlet manifolds need to have a small piezometric head variation relative to the head loss through a clean sand bed. Given that both the trunk lines and the branches are short manifolds (fL/d < 1), the piezometric head variability is dominated by pressure recovery which is given by V^2/(2*g)*.  where the velocity is the initial velocity in the manifold. Thus the velocity in the trunk and branch lines is limited by this constraint. If we want to relax this constraint we could add head loss through the slots. But we need to be careful to not cause a flow imbalance between the inlets that carry flow for two layers and the inlets that carry flow for only one layer. Perhaps top inlet and bottom inlet should have only one line of slots per pipe instead of two lines. We are currently assuming that the backwash branches will have 1/2 the slot area of the branches in the other layers.
#
# Slot head loss issues
# If we use the slots to generate head loss in an effort to improve flow distribution, we need to account for sand blocking (1-ε) of the slots during filtration. The slots are not blocked during backwash (except perhaps during backwash initiation).
#
# Backwash mode constraints
# The  constraint on the design of the backwash manifold branches is that the flow rate from each slot must be close to the average (perhaps within 20%). We cannot rely on head loss through the filter media to help create uniform flow from the manifold during backwash because the filter bed will be fluidized. Thus we must design the backwash manifold to have uniform flow distribution without any external assistance. We can improve uniformity of flow distribution by decreasing head loss and pressure recovery in the manifold branches and in the trunk line and/or by increasing the head loss through the slots. The backwash system will also be used during filtration and the flow rate in the backwash manifold system will vary by a factor of 6 between those two states. Thus head loss through the slots will vary by a factor of 36 between the two states. We could use a relatively high slot head loss to get uniform flow distribution. The slot head loss must be small enough during filtration mode to not cause a flow inbalance between filter layers. That suggests that the slot head loss must be less than 10% of the clean bed head loss during filtration and thus less than 36 times that amount during backwash.
#
# Flow distribution in a short manifold is quite uniform for the case when the total port area is equal to or less than the manifold area. We have two manifold systems operating in series with trunk line distributing flow to branches and branches distributing flow to slots. Head loss through the slots effectively helps distribute flow between branches as well as between slots. Thus the constraints on both trunk and branch sizes are that they have pressure recovery terms that are small compared with the head loss through the slots.
# Algorithm for trunk, branch, slot design
# Head loss through the slots in the backwash manifold are directly related to the head loss throught the slots during filtration. The flow area during filtration will be reduced due to sand blocking. This results in a factor of ε_FiSand
# Calculate slot area for backwash assuming this head loss.
# Note that the slot area for backwash analysis should not be adjusted for sand porosity.
# Calculate size of branch lines using the rule that their area must exceed the port area.
# Given the area of the branch lines, recalculate the slot area by setting it equal to the branch area.
# Recalculate the actual head loss through the slots given this new slot area.
#
# Calculate the size of the trunk lines using the rule that their area must exceed the port area. Thus branches must have more area than the slots in a branch. Trunk must have more area than the branches.
# Top View
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# Layer Thickness as Function of Trunk Diameter
# round up to the nearest cm to make construction easier
H_FiLayerF(ND_Trunk) := max(H_FiLayerMin, Ceil(outerdiameter(ND_Trunk) + S_FiTrunkMin, 1 cm), Ceil(OuterDiameterFittingPVC(ND_Trunk), 1 cm), Ceil(FerncoOuterDiameter(ND_Trunk), 1 cm))
H_FiBottomLayerF(ND_Trunk, ND_BwTrunk) := max(H_FiLayerMin, Ceil(outerradius(ND_Trunk) + outerradius(ND_BwTrunk) + S_FiTrunkMin, 1 cm), Ceil(ConRadius(ND_Trunk) + ConRadius(ND_BwTrunk), 1 cm), Ceil(FerncoOuterDiameter(ND_Trunk)/2 + FerncoOuterDiameter(ND_BwTrunk)/2, 1 cm))
# Ratio of Pressure Recovery to Clean Bed Head Loss
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# Ratio of long path flow to short path flow. We need to develop a better hydraulic model of this system. The piezometric head inside the inlet and outlet manifold systems follow trends that tend to keep the net piezometric head difference between the two pipe networks similar. Thus the expected flow variation is less than what we are modeling here.
Pi_FiManifoldQ := 0.85
Pi_FiManifoldHeadLoss := 1 - Pi_FiManifoldQ^2 = 0.2775
# Ratio of pressure recovery in the slotted pipes to the head loss through the clean bed. This constraint is critical and determines all of the pipe sizes related to the filtration cycle. This is likely still conservative.
# Trunk Diameter and Layer Thickness Based on Flow Distribution Constraint
Q_FilterMax :=
    for i ∈ 0 .. last(AvailND)
        H_FiLayer ← H_FiLayerF(AvailND[i])
        HL_FiCleanLayer ← h_lKozeny(H_FiLayer, D_FiSand60, V_FiLayer, ε_FiSand, Nu_Water)
        V_FiTrunkMaxPR ← sqrt(2*g*(HL_FiCleanLayer*Pi_FiManifoldHeadLoss))
        Q_FilterMax[i] ← π*innerdiameter(AvailND[i], PS_Default)^2/4*V_FiTrunkMaxPR*N_FiLayer/2
    return Q_FilterMax
# This function returns the maximum flow rate through a filter for each of the available trunk pipe sizes based on the flow distribution constraint.
# Constrain the number of filters to a reasonable value and increase the depth of the filter bed for large plants. This function needs to eventually be based on cost minimization and what is required for easy operation of the plants.
N_FiMax := ceil(Q_Plant/LookupCeil(6 in, AvailND, Q_FilterMax))
ND_FiTrunk := LookupCeil(Q_Plant/N_FiMax, Q_FilterMax, AvailND)
H_FiLayer := H_FiLayerF(ND_FiTrunk)
# Clean Bed Head Loss and Maximum Manifold Velocity
# Filtration manifold maximum velocity
HL_FiCleanLayer := h_lKozeny(H_FiLayer, D_FiSand60, V_FiLayer, ε_FiSand, Nu_Water)
PR_FiManifoldMax := HL_FiCleanLayer*Pi_FiManifoldHeadLoss
V_FiManMaxPR := sqrt(2*g*PR_FiManifoldMax)
# Backwash manifold maximum velocity
HL_FiBwSlotsEst := 5 cm
PR_FiBwManifoldMax := HL_FiBwSlotsEst*Pi_FiManifoldHeadLoss
V_FiBwManMaxPR := sqrt(2*g*PR_FiBwManifoldMax) = 0.521665 m/s
# Number of Filters, Flow Rate Calculations, and Backwash Trunk Diameter
Q_FiMax := π*innerdiameter(ND_FiTrunk, PS_Default)^2/4*V_FiManMaxPR*N_FiLayer/2
N_Fi := min(ceil(Q_Plant/Q_FiMax), N_FiMax)
Q_Fi := Q_Plant/N_Fi  # The flow will be divided evenly between the N_Fi = filters.
# This is the required area of each of the N_Fi = filters.
A_FiActive := Q_Fi/(N_FiLayer*V_FiLayer)
Q_FiLayer := Q_Fi/N_FiLayer  # This is the flow rate through each filter layer
ND_FiBwTrunk := NominalDiameter(CeilNearest(D_circle(Q_Fi/V_FiBwManMaxPR), AvailPipeSizes(PS_Default)[:, 0]), PS_Default)
# Auxilliary Box Plan Dimensions and Plumbing
# Plumbing
HL_FiBoxDrain := 1 m  # No need for exit loss if dumping into drain channel right?
ND_FiExitWaste := NominalPipeSize(D_PipeTotal(Q_Fi, HL_FiBoxDrain, 1 m, Nu_Water, E_Pvc, K_PipeEnt + K_El90))
ND_FiEntOverflow := NominalPipeSize(D_PipeTotal(1.5*Q_Fi, HL_FiBoxDrain, 1 m, Nu_Water, E_Pvc, K_PipeEnt + K_El90))
ND_FiBypass := NominalPipeSize(D_PipeTotal(1.5*Q_Fi, 1 m, 0.5 m, Nu_Water, E_Pvc, K_PipeEnt + K_El90))
ND_DistPipe := D_pipeschedule(Q_Plant, PS_Default, HL_FiBoxDrain, 100 m, Nu_Water, E_Pvc, K_PipeEnt + 3*K_El90)
H_FiEntOverflowVHead := (1.5*Q_Fi/A_circle(innerdiameter(ND_FiEntOverflow, PS_Default)))^2/(2*g)
H_FiExitWasteVHead := (Q_Fi/A_circle(innerdiameter(ND_FiExitWaste, PS_Default)))^2/(2*g)
H_FiDistVHead := (Q_Plant/A_circle(innerdiameter(ND_DistPipe, PS_Default)))^2/(2*g)
H_FiEntOverflowDrop := HL_FiBoxDrain + H_FiEntOverflowVHead + H_DrainOutletSafety
H_FiExitWasteDrop := HL_FiBoxDrain + H_FiExitWasteVHead + H_DrainOutletSafety
H_FiDistDrop := HL_FiBoxDrain + H_FiDistVHead + H_DrainOutletSafety
# The combined width of the overflow/distribution and entrance/exit boxes must match the filter width so that the boxes fit when adjacent filters are put side-by-side
W_FiEntrance := max(3*S_Fitting + ConRadius(ND_FiBwTrunk) + 3*ConRadius(ND_FiTrunk) + 2*(SocketDepth(ND_FiTrunk) + ElbowRadius(ND_FiTrunk)), W_HumanMin, W_rectweir(Q_Fi, 5 cm))
W_FiOverflowMin := OuterDiameterFittingPVC(ND_DistPipe) + 2*S_Fitting
# The actual width of the overflow/distribution boxes will be defined once the actual filter width is determined based on the number of manifold branches.
W_FiMin := W_FiEntrance + W_FiOverflowMin + 2*T_PlantWall - T_FiWall
W_FiActiveMin := W_FiMin - outerdiameter(ND_FiBwTrunk)
# Entrance and Overflow Weirs
L_FiEntranceWeir := W_FiEntrance
HL_FiEntranceWeir := Headloss_weir(Q_Fi, L_FiEntranceWeir)
L_FiOverflowWeir := 2*ConRadius(ND_FiBwTrunk) + 2*ConRadius(ND_FiTrunk) + 3*S_Fitting
HL_FiOverflowWeir := Headloss_weir(Q_Fi, L_FiOverflowWeir)
# Entrance and Exit Box Length
# Space between the entrance box wall and the baffle
S_FiEntranceBaffle := ((Q_Fi/T_ChannelWall)^2/g)^(1/3)
S_FiBaffleToBlock := ((Q_Fi/T_ChannelWall)^2/g)^(1/3)
W_FiAirRemovalBlock := T_SedWeir  # make this a generic weir thickness at some point?
L_FiEntrance := L_FiOverflowWeir + S_FiEntranceBaffle + S_FiBaffleToBlock + 2*T_SedWeir + T_ConcreteMin
L_FiExit := max(3*S_Fitting + 2*OuterDiameterFittingPVC(ND_FiTrunk), W_HumanMin)
L_FiOverflow := L_FiEntrance
# Number of Manifold Branches
Q_FiManBranchMax := V_FiManMaxPR*π*innerdiameter(ND_FiManBranch, PS_FiBranch)^2/4
Q_FiManBranchAve := Q_FiManBranchMax/(1 + (1 - Pi_FiManifoldQ)/2)
# branches are coming out of both sides of the manifold
N_FiManBranchMin := Ceil(Q_FiLayer/Q_FiManBranchAve, 2)
N_FiManBranchMax := Floor(2*(Q_FiLayer/(W_FiActiveMin*V_FiLayer*B_FiManifoldBranch) - (outerradius(ND_FiBwManBranch) + L_FiManFerncoCoupling + OuterDiameterFittingPVC(ND_FiSandOutlet))/B_FiManifoldBranch) + 1, 2)
N_FiManBranch := N_FiManBranchMax
Q_FiManBranch := Q_FiLayer/N_FiManBranch
# Backwash Manifold Design and Slot Area
Q_FiBwManBranch := Q_Fi/N_FiManBranch
PR_FiBwManBranch := (Q_FiBwManBranch/(π*innerdiameter(ND_FiBwManBranch, PS_FiBranch)^2/4))^2/(2*g)
HL_FiBwSlot := PR_FiBwManBranch/Pi_FiManifoldHeadLoss
A_FiBwLayerSlots := A_orifice(HL_FiBwSlot, Pi_VenaContractaOrifice, Q_Fi)
# Check that head loss through the backwash slots is small in filtration mode (we want good flow distribution between layers, so the bottom layer should not have significantly more slot head loss)
HL_FiBwSlotForward := h_orifice(D_circle(A_FiBwLayerSlots*ε_FiSand), Pi_VenaContractaOrifice, Q_FiLayer)
A_FiBwManBranches := N_FiManBranch*π*innerdiameter(ND_FiBwManBranch, PS_FiBranch)^2/4
Pi_FiBwManArea := A_FiBwManBranches/A_FiBwLayerSlots
# Inner manifolds have double the slot area of the upper and lower manifolds
A_FiLayerSlots := 2*A_FiBwLayerSlots
HL_FiSlot := (2*Q_FiLayer/(Pi_VenaContractaOrifice*A_FiLayerSlots*ε_FiSand))^2*1/(2*g)
# A conservative estimate of the head loss through the slots of the normal inlet manifold given sand blockage
# Filter Box Dimensions and Manifold Pipe Lengths
# This is only the active filtration width (does not include the projected area of the trunk lines, but we assume the space between the branch holders contributes to active area)
W_FiActive := Q_FiLayer/V_FiLayer*1/((N_FiManBranch - 1)/2*B_FiManifoldBranch + L_FiManFerncoCoupling + OuterDiameterFittingPVC(ND_FiSandOutlet) + outerradius(ND_FiBwManBranch))
W_Fi := W_FiActive + outerdiameter(ND_FiBwTrunk)
W_FiOverflow := W_Fi + T_FiWall - W_FiEntrance - 2*T_PlantWall
L_Fi := (N_FiManBranch - 1)/2*B_FiManifoldBranch + L_FiManFerncoCoupling + outerradius(ND_FiBwManBranch) + OuterDiameterFittingPVC(ND_FiSandOutlet)
L_FiManBranch := W_Fi/2 - outerradius(ND_FiTrunk) - ConRadius(ND_FiBwBranchHolder) - outerradius(ND_FiBranchHolder) + 2*L_FiManBranchExt - S_FiManAssembly
L_FiBwManBranch := W_Fi/2 - outerradius(ND_FiBwTrunk) - ConRadius(ND_FiBwBranchHolder) - outerradius(ND_FiBwBranchHolder) + 2*L_FiManBranchExt - S_FiManAssembly
L_FiTrunk := L_Fi - L_FiManFerncoCoupling/2 - CapThickness(ND_FiTrunk) - S_FiManAssembly
L_FiBwTrunk := L_Fi - L_FiManFerncoCoupling/2 - CapThickness(ND_FiBwTrunk) - S_FiManAssembly
L_FiBranchHolder := L_Fi - 2*CapThickness(ND_FiBranchHolder) - 2*S_FiManAssembly
L_FiBwBranchHolder := L_Fi - 2*CapThickness(ND_FiBwBranchHolder) - 2*S_FiManAssembly
# Bottom Layer Thickness, Total Sand Depth, and Backwash Head Loss
H_FiBottomLayer := H_FiBottomLayerF(ND_FiTrunk, ND_FiBwTrunk)
HL_FiCleanBottomLayer := h_lKozeny(H_FiBottomLayer, D_FiSand60, V_FiLayer, ε_FiSand, Nu_Water)
H_FiSand := (N_FiLayer - 1)*H_FiLayer + H_FiBottomLayer
H_FiFluidizedBed := Pi_FiFluidized*H_FiSand
HL_FiBwSS := H_FiSand*(Rho_FiSand - Rho_H2O)*(1 - ε_FiSand)/Rho_H2O  # Sand bed head loss during steady state backwash.
# The backwash head loss is almost exactly equal  to the sand bed depth. Note that this ignores losses in the plumbing.
HL_FiTerminal := 2*H_FiLayer
HL_FiDirty := HL_FiTerminal - HL_FiCleanLayer
# Does not include the clean bed head loss. We are limiting the head loss gradient to a value of 1. At this head loss an entire upflow layer of sand will become bouyant.
HL_FiBwInitiation := HL_FiBwSF + HL_FiBwSS
# Plumbing Head Loss
HL_FiBwInletManifold := 1/3*h_f(Q_Fi, innerD(ND_FiBwTrunk, PS_Default), L_Fi, Nu_Water, E_Pvc) + h_e(Q_Fi/N_FiManBranch, innerD(ND_FiBwManBranch, PS_FiBranch), K_PipeEnt) + 1/3*h_f(Q_Fi/N_FiManBranch, innerD(ND_FiBwManBranch, PS_FiBranch), W_FiActive, Nu_Water, E_Pvc) + HL_FiBwSlot
HL_FiInletManifold := 1/3*h_f(2*Q_FiLayer, innerD(ND_FiTrunk, PS_Default), L_Fi, Nu_Water, E_Pvc) + h_e(2*Q_FiLayer/N_FiManBranch, innerD(ND_FiManBranch, PS_FiBranch), K_PipeEnt) + 1/3*h_f(2*Q_FiLayer/N_FiManBranch, innerD(ND_FiManBranch, PS_FiBranch), L_FiManBranch, Nu_Water, E_Pvc) + HL_FiSlot
HL_FiInletManifoldTop := 1/3*h_f(Q_FiLayer, innerD(ND_FiTrunk, PS_Default), L_Fi, Nu_Water, E_Pvc) + h_e(Q_FiLayer/N_FiManBranch, innerD(ND_FiManBranch, PS_FiBranch), K_PipeEnt) + 1/3*h_f(Q_FiLayer/N_FiManBranch, innerD(ND_FiManBranch, PS_FiBranch), L_FiManBranch, Nu_Water, E_Pvc) + HL_FiSlot
HL_FiInletManifoldBottom := 1/3*h_f(Q_FiLayer, innerD(ND_FiBwTrunk, PS_Default), L_Fi, Nu_Water, E_Pvc) + h_e(Q_FiLayer/N_FiManBranch, innerD(ND_FiBwManBranch, PS_FiBranch), K_PipeEnt) + 1/3*h_f(Q_FiLayer/N_FiManBranch, innerD(ND_FiBwManBranch, PS_FiBranch), L_FiManBranch, Nu_Water, E_Pvc) + HL_FiSlot
HL_FiOutletManifold := 1/3*h_f(2*Q_FiLayer, innerD(ND_FiTrunk, PS_Default), L_Fi, Nu_Water, E_Pvc) + h_e(2*Q_FiLayer/N_FiManBranch, innerD(ND_FiManBranch, PS_FiBranch), K_PipeExit) + 1/3*h_f(2*Q_FiLayer/N_FiManBranch, innerD(ND_FiManBranch, PS_FiBranch), L_FiManBranch, Nu_Water, E_Pvc)
# For the head loss through the outlet manifold:
# Does it make sense to have a pipe exit loss included?
# Also, is it worth coming up with an estimate for head loss through the slots entering the branch?
HL_FiOutletStubs := Headloss_weir(Q_FiLayer, innerdiameter(ND_FiTrunk, PS_Default))
HL_FiInletPlumbing1 := h_l(Q_FiLayer, innerD(ND_FiTrunk, PS_Default), 3 m, 3*K_El90 + K_PipeEnt, Nu_Water, E_Pvc) + HL_FiInletManifoldTop
HL_FiInletPlumbing2 := h_l(2*Q_FiLayer, innerD(ND_FiTrunk, PS_Default), 3 m, 3*K_El90 + K_PipeEnt, Nu_Water, E_Pvc) + HL_FiInletManifold
HL_FiInletPlumbing3 := h_l(2*Q_FiLayer, innerD(ND_FiTrunk, PS_Default), 3 m, K_El90 + K_PipeEnt, Nu_Water, E_Pvc) + HL_FiInletManifold
# These are numbered from the top of the filter bed down. The top and bottom inlets have half the flow rate (on serve the layers below and above, respectively). The bottom inlet has the diameter of the backwash trunk.
HL_FiInletPlumbing4 := h_l(Q_FiLayer, innerD(ND_FiBwTrunk, PS_Default), 3 m, K_El90 + K_PipeEnt, Nu_Water, E_Pvc) + HL_FiInletManifoldBottom
HL_FiInletPlumbingMax := max(HL_FiInletPlumbing1, HL_FiInletPlumbing2, HL_FiInletPlumbing3, HL_FiInletPlumbing4)
HL_FiInletPlumbingMin := min(HL_FiInletPlumbing1, HL_FiInletPlumbing2, HL_FiInletPlumbing3, HL_FiInletPlumbing4)
HL_FiBwInletPlumbing := h_l(Q_Fi, innerD(ND_FiBwTrunk, PS_Default), 3 m, K_El90 + K_PipeEnt, Nu_Water, E_Pvc) + HL_FiBwInletManifold
HL_FiOutletPlumbing1 := h_l(2*Q_FiLayer, innerD(ND_FiTrunk, PS_Default), 3 m, K_El90 + K_PipeExit, Nu_Water, E_Pvc) + HL_FiOutletManifold
HL_FiOutletPlumbing2 := HL_FiOutletPlumbing1
HL_FiOutletPlumbing3 := h_l(2*Q_FiLayer, innerD(ND_FiTrunk, PS_Default), 3 m, 2*K_El90 + K_PipeExit, Nu_Water, E_Pvc) + HL_FiOutletManifold
HL_FiOutletPlumbingMax := max(HL_FiOutletPlumbing1, HL_FiOutletPlumbing2, HL_FiOutletPlumbing3)
HL_FiOutletPlumbingMin := min(HL_FiOutletPlumbing1, HL_FiOutletPlumbing2, HL_FiOutletPlumbing3)
# Path Head Loss Calculations and Flow Distribution Between Layers
HL_FiPathClean1 := HL_FiInletPlumbing1 + HL_FiCleanLayer + HL_FiOutletPlumbing1
HL_FiPathClean2 := HL_FiInletPlumbing2 + HL_FiCleanLayer + HL_FiOutletPlumbing1
HL_FiPathClean3 := HL_FiInletPlumbing2 + HL_FiCleanLayer + HL_FiOutletPlumbing2
HL_FiPathClean4 := HL_FiInletPlumbing3 + HL_FiCleanLayer + HL_FiOutletPlumbing2
HL_FiPathClean5 := HL_FiInletPlumbing3 + HL_FiCleanLayer + HL_FiOutletPlumbing3
HL_FiPathClean6 := HL_FiInletPlumbing4 + HL_FiCleanBottomLayer + HL_FiOutletPlumbing3
HL_FiPathCleanMax := max(HL_FiPathClean1, HL_FiPathClean2, HL_FiPathClean3, HL_FiPathClean4, HL_FiPathClean5, HL_FiPathClean6)
HL_FiPathCleanMin := min(HL_FiPathClean1, HL_FiPathClean2, HL_FiPathClean3, HL_FiPathClean4, HL_FiPathClean5, HL_FiPathClean6)
Pi_QFiLayer := sqrt(HL_FiPathCleanMin/HL_FiPathCleanMax)
# Slotted Pipe Design
A_FiBwBranchSlots := A_FiBwLayerSlots/N_FiManBranch
# The slots should be configured to provide this total amount of slot area for the
# bottom manifold handling the backwash flow. We will define this as the inner diameter area of the slots
A_FiBranchSlots := A_FiLayerSlots/N_FiManBranch  # This is the amount of slot area that must be available for each length of pipe.
L_FiBwManSlotBranchTotal := A_FiBwBranchSlots/W_FiManSlots  # The slots on each pipe must have this total length to provide the required area.
L_FiManSlotBranchTotal := A_FiBranchSlots/W_FiManSlots
# We select  B_FiBwManSlot := 3/16*in = 4.7625 mm  for the closest slot spacing, and N_FiBwSlotRows := 1  for best structural integrity of these pipes
# We select  B_FiManSlot := 0.125 in = 3.175 mm  for the closest slot spacing, and N_FiSlotRows := 2  for best structural integrity of these pipes
N_FiBwManSlotsPerRow := floor((L_FiBwManBranch - 2*L_FiManBranchExt - B_FiBwManSlot)/B_FiBwManSlot)
# Over the active area of the filter, there will be N_FiBwManSlots =slots whose area will effectively
# contribute to the total required slot area
N_FiManSlotsPerRow := floor((L_FiManBranch - 2*L_FiManBranchExt - B_FiManSlot)/B_FiManSlot)
# Over the active area of the filter, there will be N_FiManSlots =slots whose area will effectively
# contribute to the total required slot area
N_FiManSlotsPerBranch := N_FiManSlotsPerRow*N_FiSlotRows
N_FiBwManSlotsPerBranch := N_FiBwManSlotsPerRow*N_FiBwSlotRows
C_FiBwManInner := π*innerdiameter(ND_FiBwManBranch, PS_FiBranch)
L_FiBwManSlotCurvedInner := L_FiBwManSlotBranchTotal/N_FiManSlotsPerBranch
C_FiManInner := π*innerdiameter(ND_FiManBranch, PS_FiBranch)
C_FiBwManOuter := π*outerdiameter(ND_FiBwManBranch)
L_FiManSlotCurvedInner := L_FiManSlotBranchTotal/N_FiManSlotsPerBranch
C_FiManOuter := π*outerdiameter(ND_FiManBranch)
L_FiBwManSlotInner := 2*innerdiameter(ND_FiBwManBranch, PS_FiBranch)/2*sin(2*π*L_FiBwManSlotCurvedInner/C_FiBwManInner/2)
L_FiManSlotInner := 2*innerdiameter(ND_FiManBranch, PS_FiBranch)/2*sin(2*π*L_FiManSlotCurvedInner/C_FiManInner/2)
H_FiManCenterToSlot := sqrt((innerdiameter(ND_FiManBranch, PS_FiBranch)/2)^2 - (L_FiManSlotInner/2)^2)
H_FiBwManCenterToSlot := sqrt((innerdiameter(ND_FiBwManBranch, PS_FiBranch)/2)^2 - (L_FiBwManSlotInner/2)^2)
L_FiBwManSlotOuter := 2*sqrt(outerradius(ND_FiBwManBranch)^2 - H_FiBwManCenterToSlot^2)
L_FiManSlotOuter := 2*sqrt(outerradius(ND_FiManBranch)^2 - H_FiManCenterToSlot^2)
N_FiBwManBranchTotal := N_Fi*N_FiManBranch
N_FiManBranchTotal := N_Fi*(N_FiLayer - 1)*N_FiManBranch
# SPECIFICATIONS:  we need  N_FiBwManBranchTotal = pipes of diameter  ND_FiBwManBranch =, with slots of width W_FiManSlots =, straight length L_FiBwManSlotOuter =  and a spacing of  B_FiBwManSlot = 0.1875 in
# SPECIFICATIONS:  we need  N_FiManBranchTotal = pipes of diameter  ND_FiManBranch =  with slots of width  W_FiManSlots =,straight length L_FiManSlotOuter =, and a spacing of B_FiManSlot = 0.125 in
P_FiBwManBranches := N_FiBwManBranchTotal*L_FiBwManBranch*(12*USD/(5 ft)) = USD
P_FiManBranches := N_FiManBranchTotal*L_FiManBranch*(9*USD/(5 ft)) = USD
# Siphon Design
# Need a flow rate in order to determine HL through the siphon tube
#
# Siphon has to handle the entire flow into the filter plus drain the terminal head in Ti.FiBwInitiation.  This is approximately a "hole in a bucket problem" so the average flow rate is half the max flow (hence the factor of 2).  The HL sum corresponds to the height of water that needs to be drained; this ignores HL in the siphon because we don't know it yet, but it should be small...
Q_FiSiphonDesign := Q_Fi + 2*A_FiActive*(HL_FiBwInitiation + HL_FiBwInletPlumbing)/Ti_FiBwInitiationBod
K_FiSiphon := 5*K_El90 + K_PipeExit + K_PipeEnt + 1
# Minor loss coefficients for flow through the siphon.
# 1 is from losses through the branched path of a Tee
D_FiSiphonGuess := nthroot(K_FiSiphon*8/(g*π^2)*Q_FiSiphonDesign^2/(HL_FiBwInitiation + HL_FiBwInletPlumbing), 4)
# Minor Loss Equation rearranged to solve for D, not necessarily an available pipe size
D_FiSiphonSSGuess := nthroot(K_FiSiphon*8/(g*π^2)*Q_Fi^2/h_eFiSiphonMax, 4)
ND_FiSiphon := NominalPipeSize(max(D_FiSiphonGuess, D_FiSiphonSSGuess))
# This selects the more limiting case; appears it is SS
HL_FiSiphon := h_e(Q_Fi, innerD(ND_FiSiphon, PS_Default), K_FiSiphon)  # Head loss through the siphon
HL_FiSiphonInitiation := h_e(Q_FiSiphonDesign, innerD(ND_FiSiphon, PS_Default), K_FiSiphon)
Rho_FiFluidized := (Rho_H2O*H_FiSand*ε_FiSand + Rho_H2O*H_FiSand*ε_FiSand*(Pi_FiFluidized - 1) + Rho_FiSand*H_FiSand*(1 - ε_FiSand))/(H_FiSand*Pi_FiFluidized)
Rho_FiFluidized := (Rho_H2O*H_FiSand*ε_FiSand*Pi_FiFluidized^2 + Rho_FiSand*H_FiSand*(1 - ε_FiSand))/(H_FiSand*Pi_FiFluidized)
Rho_FiFluidized := Rho_H2O*ε_FiSand*Pi_FiFluidized + Rho_FiSand*(1 - ε_FiSand)/Pi_FiFluidized
B_FiSiphonManOrificesEst := 10 cm
N_FiSiphonManOrifices := 2*floor((L_Fi - 2*ConRadius(ND_FiSiphon))/(2*B_FiSiphonManOrificesEst))
D_FiSiphonManOrifices := CeilNearest(innerdiameter(ND_FiSiphon, PS_Default)/sqrt(N_FiSiphonManOrifices), D_Drill)
# This keeps the area of the orifices the same as the siphon area.
B_FiSiphonManOrifices := (L_Fi - 2*ConRadius(ND_FiSiphon))/N_FiSiphonManOrifices
HL_FiSiphonOrifice := 1/(2*g)*(Q_Fi/N_FiSiphonManOrifices/(Pi_VenaContractaOrifice*π*(D_FiSiphonManOrifices/2)^2))^2
HL_FiSiphonOrificeInitiation := 1/(2*g)*(Q_FiSiphonDesign/N_FiSiphonManOrifices/(Pi_VenaContractaOrifice*π*(D_FiSiphonManOrifices/2)^2))^2
HL_FiSiphonOutlet := Headloss_weir(Q_Fi, innerD(ND_FiSiphon, PS_Default))
HL_FiSiphonOutletInitiation := Headloss_weir(Q_FiSiphonDesign, innerD(ND_FiSiphon, PS_Default))
HL_FiBwTotalSS := HL_FiBwInletPlumbing + HL_FiBwSS + HL_FiSiphonOrifice + HL_FiSiphon + HL_FiSiphonOutlet
# Entrance Pipe from Sedimentation
L_FiEntrancePipeEst := W_DCWalkway + W_SedInletChannel + 1 m
# The extra 1 meter is for the vertical section where the pipe drops down from the sed tank exit channel.
K_FiEntrancePipe := K_El90 + K_PipeEnt + K_PipeExit
HL_FiEntrancePipeTarget := 15 cm
ND_FiEntrancePipeMax := FloorNearest(Pipesizes[index(FloorNearest(W_SedBay/2 - ConRadius(ND_SedManifold) - 2*S_Fitting, Pipesizes[:, 1]), Pipesizes[:, 1]), 0], AvailND)
ND_FiEntrancePipe := min(D_pipeschedule(Q_Plant, PS_Default, HL_FiEntrancePipeTarget, L_FiEntrancePipeEst, Nu_Water, E_Pvc, K_FiEntrancePipe), ND_FiEntrancePipeMax)
N_FiEntrancePipes := ceil(Q_Plant/Q_pipetotal(innerdiameter(ND_FiEntrancePipe, PS_Default), HL_FiEntrancePipeTarget, L_FiEntrancePipeEst, Nu_Water, E_Pvc, K_FiEntrancePipe))
Q_FiEntrancePipe := Q_Plant/N_FiEntrancePipes
HL_FiEntrancePipe := h_l(Q_Plant, innerdiameter(ND_FiEntrancePipe, PS_Default), L_FiEntrancePipeEst, K_FiEntrancePipe, Nu_Water, E_Pvc)
# Elevations
ZW_FiInletChannel := Z_SedWeirExit - HL_ChannelMax - HL_FiEntrancePipe
Z_FiEntranceWeir := ZW_FiInletChannel - HL_FiEntranceWeir
ZW_FiEntranceMax := Z_FiEntranceWeir - H_FiWeirFreefall
ZW_FiEntranceCleanForward := ZW_FiEntranceMax - HL_FiDirty
Z_FiEntranceStub := ZW_FiEntranceMax - HL_FiDirty - H_FiForwardNoSuckAir
Z_FiEntranceBottom := Z_FiEntranceStub - HL_FiBwSF - H_FiBwNoSuckAir
Z_FiInletChannelBottomMax := Z_SedChannelBottom - max(CouplingLength(ND_FiEntrancePipe), T_PlantWall) - ElbowRadius(ND_FiEntrancePipe) - ConRadius(ND_FiEntrancePipe) - S_Fitting - SocketDepth(ND_FiEntrancePipe)
Z_FiInletChannelBottom := min(Z_FiInletChannelBottomMax, Z_FiEntranceBottom)
ZW_FiEntranceBwSS := Z_FiEntranceBottom + H_FiBwNoSuckAir
Z_FiExitStub := ZW_FiEntranceCleanForward - HL_FiPathCleanMax - HL_FiOutletStubs
Z_FiOverflowWeir := ZW_FiEntranceMax - HL_FiOverflowWeir
Z_FiSiphonOutlet := Z_FiEntranceBottom + H_FiBwNoSuckAir - HL_FiBwTotalSS  # The top of the pipe stub on the siphon where it discharges into the drain channel.
Z_FiSiphonInlet := Z_FiSiphonOutlet - H_FiSiphonNoSuckAir
Z_FiBottom := Z_FiSiphonInlet - H_FiFluidizedBed - H_FiFluidizedBedToSiphon - ConRadius(ND_FiBwManBranch)
H_FiEntrance := ZW_FiInletChannel + H_PlantFreeboard - Z_FiEntranceBottom
Z_FiTop := Z_FiEntranceBottom + H_FiEntrance
H_Fi := Z_FiTop - Z_FiBottom
Z_FiExitBottom := Z_FiEntranceBottom
H_FiExit := H_FiEntrance
ZW_FiBwSS := Z_FiSiphonOutlet + HL_FiSiphonOrifice + HL_FiSiphon + HL_FiSiphonOutlet
ZW_FiStart := Z_FiExitStub + HL_FiOutletPlumbing1 + HL_FiCleanLayer
H_FiOverflowMin := H_FiBypassSafety + OuterDiameterFittingPVC(ND_FiBypass) + S_Fitting
Z_FiOverflowBottom := min(Z_FiTop - H_FiOverflowMin, Z_FiOverflowWeir - H_FiOverflowWeirFreefall)
H_FiOverflow := Z_FiTop - Z_FiOverflowBottom
Z_FiDistPipe := Z_FiExitBottom - H_FiDistDrop
# This is the center line of the pipe through the wall.  This is a maximum based on zero flow and the goal of wanting to be able to initiate backwash at the beginning of filtration. This constraint could be relaxed if needed.
Z_FiSiphonCouplingMax := Z_FiExitStub - outerradius(ND_FiSiphon)
H_FiSiphonMax := ZW_FiEntranceMax - Z_FiSiphonOutlet
# I ignore head loss in inlet pipe because the top inlet has 1/4 the head loss of the inlets that send water to two layers.
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L_FiSiphonTop := L_Fi/2 + ShortTeeLength(ND_FiBwManBranch) + T_PlantWall
Z_FiSiphonCouplingMin := ZW_FiEntranceMax - HL_FiInletPlumbing4 - (H_FiSiphonMax - HL_FiSiphon)*P_Atm/(Rho_H2O*g*(L_FiSiphonTop + H_FiSiphonMax) + 2*P_Atm) + outerradius(ND_FiSiphon)
# The water trap part of the siphon tube must be Z_FiSiphonCouplingMin = below the Z_FiBwWeir = in order to prevent air from leaking out of the siphon.
# It appears that we could safely raise the water trap part of the siphon above the level of the bottom of the filter if that is desirable. The top of the elbow that turns the siphon tube horizontal should be at the Z_FiSiphonWatersealMax elevation.
Z_FiSiphonWatersealMax := Z_FiSiphonOutlet - Z_FiSiphonCouplingMin
Z_FiSiphonCoupling := Z_FiSiphonCouplingMax
# This is based on the constraint that we want the siphon to function at half flow rate (and it would actually work at zero flow as well). The siphon is completely submerged if water is flowing across the exit weir.
Z_FiSiphonCouplingMax - Z_FiSiphonCouplingMin =  # error
# Not much room to spare here! We need to always check this and somehow report an error if this is negative!!!!
Z_FiAirRemovalBlockBottom := 0.15*S_FiEntranceBaffle + Z_FiEntranceBottom
Z_FiAirRemovalBlockTop := ZW_FiEntranceBwSS - H_FiAirRemovalBlockSubmerged
# Siphon Valve Size
# The available head is equal to the difference between the bottom of the siphon pipe and the steady state water level in the filter.  This is a head available in terms of water.
HL_FiSiphonValveWater := (Z_FiSiphonCoupling - ND_FiSiphon/2) - (Z_FiSiphonOutlet + HL_FiSiphon)
Vol_FiSiphonAir := (CouplingLength(ND_FiSiphon) + 4*outerdiameter(ND_FiSiphon) + 2*(Z_FiSiphonCoupling - Z_FiSiphonOutlet))*π/4*innerdiameter(ND_FiSiphon, PS_Default)^2
# Goal is to fill siphon tube with air in 10 seconds. To account for the diminishing head as the siphon tube fills with air we will use 0.5 seconds. This rapid fill is desirable so that the operator can open and then immediately close the valve without having to wait. This is important because the operator won't be able to see the air filling up the siphon tube.
Ti_FiSiphonBreak := 10 s
# Monroe increased this to 1 s (from 0.5 s) because the video of starting backwash showed the operator moving the valve slowly. This indicatess that it wasn't necessary to have such a large valve at Tamara.
# changed to 10s 1/7/2012
Q_FiSiphonAir := Vol_FiSiphonAir/Ti_FiSiphonBreak
HL_FiSiphonValveAir := HL_FiSiphonValveWater*Rho_H2O/Rho_Air  # This is the head available in terms of air.
K_FiSiphonValve := 3
# Entrance and Exit loses and ball valve losses
L_FiSiphonBreak := Z_FiBottom + H_Fi - Z_FiSiphonCoupling
# Estimated length of the pipe that will be connected to the air valve. Air valve will be at the very top of the filter.
ND_FiSiphonAirValve := NominalPipeSize(D_PipeTotal(Q_FiSiphonAir, HL_FiSiphonValveAir, L_FiSiphonBreak, Nu_Air, E_Pvc, K_FiSiphonValve))
# Sand Removal Pipe
H_FiSandOutlet := 1 m  # to be high enough to dump into a 55 gal drum
# This can't be set any higher because the available head will be insufficient to pump sand unless we figure out a way to maintain a higher water level in the filter during the sand dump. See the small head loss available at the finish of pumping the sand below.
Z_FiSandOutlet := Z_FiBottom + H_FiSandOutlet
# This is higher than the sed tank drain channel. Thus the backwash water can easily discharge into the drain channel
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HL_FiSandOutlet := Z_FiSiphonOutlet - Z_FiSandOutlet  # This isn't quite right because of the different densities.
# Calculating head loss and density for this problem is a bit complicated. The sand bed has a density of
Rho_FiFluidized =  # error
# This ends up changing Nu.Water, but that doesn't change the results because we are in the very turbulent domain of the Moody diagram. The available head has to take into account the different densities of the fluidized bed and the water above the bed. As the fluidized bed is drained the available head will decrease. Would it be possible to drain the sand out of the bed at the very beginning of the backwash cycle while the water depth above the bed is gradually decreasing? This extra bed depth would provide more head to push the sand through the sand outlet.
# At the beginning of sand pumping the filter box has fluidized sand (and thus a high fluid density) and thus the pressure at the entrance to the sand dump is high. At the end of the sand dump the filter is filled with water and thus the pressure at the entrance to the sand dump is much lower and yet the sand dump pipe is still filled with the high density fluidized sand.
HL_FiSandOutletStart := ((Z_FiSiphonOutlet - Z_FiBottom - H_FiSand*Pi_FiFluidized)*Rho_H2O + H_FiSand*Pi_FiFluidized*Rho_FiFluidized + (-H_FiSandOutlet*Rho_FiFluidized))/Rho_FiFluidized
HL_FiSandOutletFinish := ((Z_FiSiphonOutlet - Z_FiBottom)*Rho_H2O + (-H_FiSandOutlet*Rho_FiFluidized))/Rho_FiFluidized
V_FiSand := W_Fi*L_Fi*H_FiSand*Pi_FiFluidized  # Total volume of the fluidized bed
# Use the largest pipe that will fit between the branch lines (but not between the backwash branch lines)
Q_FiSandOutletStart := Q_pipetotal(innerdiameter(ND_FiSandOutlet, PS_Default), HL_FiSandOutletStart, H_FiSandOutlet, Nu_Water*Rho_H2O/Rho_FiFluidized, E_Pvc, K_PipeExit + K_PipeEnt + 2*K_El90)
Q_FiSandOutletFinish := Q_pipetotal(innerdiameter(ND_FiSandOutlet, PS_Default), HL_FiSandOutletFinish, H_FiSandOutlet, Nu_Water*Rho_H2O/Rho_FiFluidized, E_Pvc, K_PipeExit + K_PipeEnt + 2*K_El90)
Q_FiSandOutlet := (Q_FiSandOutletStart + Q_FiSandOutletFinish)/2  # This isn't quite right, but it is close.
Ti_FiSand := V_FiSand/Q_FiSandOutlet  # This is the time required to empty the filter of the sand.
Ti_FiSandDrum := 220 L/Q_FiSandOutlet
Q_FiSandOutletFinish/(innerdiameter(ND_FiSandOutlet, PS_Default)^2/4*π) =  # error  # The velocity in the pipe is far greater than the backwash velocity
# Estimate of the flow rate that would allow sand to settle within the vertical pipe. This flow rate is really low and so the valve will need to be almost closed before the sand stops flowing.
Q_Settle := 5*mm/s*(innerdiameter(ND_FiSandOutlet, PS_Default)^2/4*π)
# Inlet Channel Design
L_FiInletChannel := N_Fi*W_FiEntrance + (N_Fi - (N_Fi > 1))*(W_FiOverflow + 2*T_PlantWall) - T_PlantWall*(N_Fi == 1)
H_FiInletChannel := Z_FiTop - Z_FiInletChannelBottom
HW_FiInletChannel := ZW_FiInletChannel - Z_FiInletChannelBottom
Pi_QFi := 0.97
HL_FiInletChannel := Headloss_weir(Q_Fi, L_FiEntranceWeir) - Headloss_weir(Q_Fi*Pi_QFi, L_FiEntranceWeir)
W_FiInletChannelFlowDist := W_HorizChannel(Q_Plant, HW_FiInletChannel, HL_FiInletChannel, L_FiInletChannel, Nu_Water, E_Concrete, 0)
W_FiInletChannel := max(W_FiInletChannelFlowDist, W_ChannelMin)
W_MpWalkway := max(W_MpWalkwayMin, ShortTeeLength(ND_DistPipe) + ConRadius(ND_DistPipe) + S_Fitting + ConRadius(ND_DistPipe) + ElbowRadius(ND_DistPipe) + 2*SocketDepth(ND_DistPipe) + ElbowRadius(ND_DistPipe) - L_FiExit/2 - T_PlantWall)
Q_FiSiphonMax := Q_pipetotal(innerD(ND_FiSiphon, PS_Default), ZW_FiEntranceMax - Z_FiSiphonOutlet, 4 m, Nu_Water, E_Pvc, K_FiSiphon)
# The length of the siphon is estimated here because we don't yet know all the required elevations. Major losses aren't that significant and so the length estimate doesn't cause significant errors.
Ti_FiBwInitiation := 2*A_FiActive*(HL_FiBwInitiation + HL_FiBwInletPlumbing)/(Q_FiSiphonMax - Q_Fi)
# This time estimate is approximate. The flow is varying with time. The factor of 2 is an approximate integration constant. (average flow is half the max). But this doesn't account correctly for the influence of the constant filtration flow.
# How much does the filter bed over fluidize when the entrance box level lowers after backwash initiation?
H_FiFluidizedBedVariation := (HL_FiBwInitiation - HL_FiBwSS)*(W_FiEntrance*L_FiEntrance - 3*π*outerradius(ND_FiTrunk)^2)/A_FiActive
Q_Ratio := sqrt((HL_FiBwInitiation - HL_FiBwSS)/HL_FiBwInletPlumbing)
