# [reference: MtoATranslators.xmcd]
# The wrapped MtoA translator contains the functions that the user will want to access. These functions will draw pieces with full functionality - specifying the location, dimension, and orientation of the object. Also, it contains layer control and subtraction capabilities for grouped objects.
# [reference: MtoATranslatorsWrapped.xmcd]
# This origin is on the large trapezoid face of the CHT that is mounted to the Chemical Storage area wall. When this code for the CHT is implemented in the CDC.AC file, the CHT.Origin should be adjusted to be the origin on the wall.
# Trapezoid Face Dimentions: Faces 1 & 2
T_TankWall := 3/16*in
H_TrapezoidShort := 5 cm
H_TrapezoidTall := 10 cm
L_Tank := 15 cm
# L.Tank should be redefined to be the total lenght of the float valve and the safety space we add on the side of the tank that doesn't have the inlet
L_TankBottom := sqrt((H_TrapezoidTall - H_TrapezoidShort)^2 + L_Tank^2)
H_Short := 5 cm
W_PVC := 3 cm
H_PVC := 10 cm
CHT_Origin := [0 m; 0 m; 0 m]
Trapezoid1_Origin := CHT_Origin
Trapezoid1Box_FarCorner := Trapezoid1_Origin + [T_TankWall; L_Tank; H_TrapezoidShort]
Trapezoid1Wedge_Origin := Trapezoid1_Origin + [0 m; L_Tank; 0 m]
Trapezoid1Wedge_FarCorner := Trapezoid1_Origin + [T_TankWall; 0 m; -L_Tank]
Trapezoid1Box := Box(Trapezoid1_Origin, Trapezoid1Box_FarCorner)
WedgeF(OriginPoint, FarCorner, AngleVector)
Trapezoid1Wedge := WedgeF(Trapezoid1Wedge_Origin, Trapezoid1Wedge_FarCorner, [90; 0; -90]*deg)
TrapezoidFaces_Script := stack(Trapezoid1Box, Trapezoid1Wedge)
CHT_Script := stack(TrapezoidFaces_Script)
# [component: inputs CHT_Script]
