Q_Plant := 40*L/s
# [reference: EtFlocSedFi.xmcd]
# Width and length of the chemical platform are defined in ChemStockTanksAC
ChemPlatform_Origin := [
    CoagTank_Origin[0] + R_CoagTank + T_ChemTankWall + S_ChemTankBorder - L_EtChemPlatform;
    Et_Origin[1] + W_Et + T_PlantWall - W_EtChemPlatform;
    CoagTank_Origin[2] - T_ChemTankWall - T_PlantWall
]
ChemPlatform_Dimensions := [L_EtChemPlatform; W_EtChemPlatform; T_PlantWall]
# Chemical Dose Controller
# Dimensions
# Length of the float pipe must fill both caps plus some.
L_CdcFloat := 2*(CapHeight(ND_EtFloat) - CapThickness(ND_EtFloat)) + 1 in
Z_FloatTop := ZW_Et - HL_Flowmeasure + 1/2*L_CdcFloat + CapThickness(ND_EtFloat)
# The elevation of the float with the center of the float being at the bottom row of orifices of the LFOM.
L_Cable := Z_EtTop + H_LeverHole - Z_FloatTop
# five gallons bucket dimensions for constant head tanks
D_CHT := 30 cm
H_CHT := 37 cm
T_CHTwall := 1 cm
ND_DeliveryPipe := 1 in
PS_FlexTube := 2
L_PVCBallValve := .1625 m
B_DosingTubes := 3 in
T_MountingBoard := 1.5 in
# Added Summer 2014:
L_CoagDeliveryPipe := L_CdcCoagTube + 2*L_PVCBallValve + 2*ShortTeeLength(ND_DeliveryPipe) + ElbowRadius(ND_DeliveryPipe) + ConRadius(ND_DeliveryPipe)
L_ChlorineDeliveryPipe := L_CdcChlorineTube + 2*L_PVCBallValve + 2*ShortTeeLength(ND_DeliveryPipe) + ElbowRadius(ND_DeliveryPipe) + ConRadius(ND_DeliveryPipe)
L_DosingConnectors := L_PVCBallValve + SocketDepth(ND_DeliveryPipe)
# Origin Points
LA_Origin := [
    Et_Origin[0] - L_Et + S_EtFloat + ConRadius(ND_EtFloat);
    Et_Origin[1] + ConRadius(ND_EtFloat) + S_EtFloat/2 - L_CdcLever;
    Z_EtTop + D_LABOrigintoLAOriginZ/2
]
LA2_Origin := [LA_Origin[0] - ConRadius(ND_EtFloat) - S_EtFloat/2; LA_Origin[1]; LA_Origin[2]]
# Modified based on Spring 2014 work:
LADtFitting_Origin := [
    LA_Origin[0] + L_CdcLever - L_LAOriginToDtY + innerdiameter(ND_DropTube, PS_Modules)/2 - .02 in;
    LA_Origin[1] + 1/8*in + L_LAOriginToDtCenterX;
    L_LAOriginToDtZ + LA2_Origin[2]
]
Float_Origin := [LA_Origin[0]; LA_Origin[1] + W_LeverArm/2 + L_CdcLever; Z_FloatTop - CapThickness(ND_EtFloat)] = [-8.57524; 8.72387; 2.65944] m
LAReducerFitting_Origin := [-L_LAOriginToReducerY - T_CdcReducer + L_CdcLever/2; L_LAOriginToReducerX; L_LAOriginToDtZ] + LA_Origin
# need to edit fitting origin to follow new LAorign
Slider1_Origin := [
    LA_Origin[0] - H_Slider + W_Slider;
    LA_Origin[1] - L_LAOriginToDtY/2 - H_Slider;
    LA_Origin[2] + H_LeverArm + W_Slider
] = [-8.58792; 7.86579; 2.88485] m
Slider2_Origin := [
    LA2_Origin[0] - H_Slider + W_Slider;
    LA2_Origin[1] - L_LAOriginToDtY/2 - H_Slider;
    LA2_Origin[2] + H_LeverArm + W_Slider
] = [-8.75619; 7.86579; 2.88485] m
ChemPlatform_Origin = [-12.9235; 6.42456; 3.00625] m
LADt_Center := [
    LA_Origin[0] - L_LAOriginToDtCenterX;
    LA_Origin[1] - L_LAOriginToDtY/2;
    LA_Origin[2] + L_LAOriginToDtZ + H_LeverArm
]
CoagDeliveryPipe_Origin := [
    Et_Origin[0] - L_Et + L_CoagDeliveryPipe;
    Et_Origin[1] - T_PlantWall - ConRadius(ND_DeliveryPipe);
    Et_Origin[2]
]
ShortTeeLength(ND_DeliveryPipe) - ElbowRadius(ND_DeliveryPipe) + SocketDepth(ND_DeliveryPipe)
LAReducer_Center := LA_Origin + [-L_LAOriginToReducerCenterY; L_LAOriginToReducerCenterX; L_LAOriginToDtZ]
# Defines the center of the reducer. (The center in the z direction is the center of the larger part of the reducer).
CoagDosingTube_Origin := CoagDeliveryPipe_Origin + [
    -L_PVCBallValve - SocketDepth(ND_DeliveryPipe);
    0 m;
    ElbowRadius(ND_DeliveryPipe) + 2*SocketDepth(ND_DeliveryPipe) + .5*TeeLength(ND_DeliveryPipe)
]
CHT_Origin := [
    ChemPlatform_Origin[0] + 5/6*L_EtChemPlatform;
    ChemPlatform_Origin[1] - 1/2*D_CHT - T_MountingBoard;
    Z_CdcFloatValveOrifice
] = [-10.4402; 6.23646; 2.96125] m
ChlorDeliveryPipe_Origin := [
    Et_Origin[0] - L_Et + L_ChlorineDeliveryPipe;
    Et_Origin[1] - T_PlantWall - ConRadius(ND_DeliveryPipe);
    CoagDosingTube_Origin[2] + (N_CdcCoagTubes + 1)*B_DosingTubes + S_Fitting + 2*ConRadius(ND_DeliveryPipe)
]
LA2DtFitting_Origin := [
    LA2_Origin[0] + L_CdcLever - L_LAOriginToDtY + innerdiameter(ND_DropTube, PS_Modules)/2 - .02 in;
    LA2_Origin[1] + 1/8*in + L_LAOriginToDtCenterX;
    LA2_Origin[2] + L_LAOriginToDtZ
]
ChlorDosingTube_Origin := ChlorDeliveryPipe_Origin + [
    -L_PVCBallValve - SocketDepth(ND_DeliveryPipe);
    0 m;
    ElbowRadius(ND_DeliveryPipe) + 2*SocketDepth(ND_DeliveryPipe) + .5*TeeLength(ND_DeliveryPipe)
]
LA2ReducerFitting_Origin := [-L_LAOriginToReducerY - T_CdcReducer + L_CdcLever/2; L_LAOriginToReducerX; L_LAOriginToDtZ] + LA2_Origin
LA2Dt_Center := [
    LA2_Origin[0] - L_LAOriginToDtCenterX;
    LA2_Origin[1] - L_LAOriginToDtY/2;
    LA2_Origin[2] + L_LAOriginToDtZ + H_LeverArm
]
# will need to modify the y component of the origin since the constant head tanks will need to be offset more than the lever arms.
LA2Reducer_Center := LA2_Origin + [-L_LAOriginToReducerCenterY; L_LAOriginToReducerCenterX; L_LAOriginToDtZ]
CHT2_Origin := [CHT_Origin[0] - 1.5*D_CHT; CHT_Origin[1]; CHT_Origin[2]]
# Lever Arms, Drop Tubes and Constant head tanks
MakeCdcLayer := layer_new("CdcLayer", black)
LArm1 := BoxF([LA_Origin[0] + 1/8*in; LA_Origin[1] - L_CdcLever; LA_Origin[2]], [LA_Origin[0]; LA_Origin[1] + L_CdcLever; LA_Origin[2] + H_LeverArm], [0; 0; 0]*deg)
DropTube1 := PipeF(LADt_Center, L_DropTube, [0; -90]*deg, ND_DropTube, PS_Modules)
LBracketLA1 := LBracket2F([
    LA_Origin[0] - L_LArmBar/2;
    LA_Origin[1] + L_LArmBar/2;
    LA_Origin[2] + L_LBracket/2 - L_LBracket/8 - 3/4*L_LBracket
], W_LBracket, L_LBracket, T_LBracket, [-90; 0; 0]*deg)
LArm2 := BoxF([LA2_Origin[0] + 1/8*in; LA2_Origin[1] - L_CdcLever; LA2_Origin[2]], [LA2_Origin[0]; LA2_Origin[1] + L_CdcLever; LA2_Origin[2] + H_LeverArm], [0; 0; 0]*deg)
DropTube2 := PipeF(LA2Dt_Center, L_DropTube, [0; -90]*deg, ND_DropTube, PS_Modules)
LBracketLA2 := LBracket2F([
    LA2_Origin[0] - L_LArmBar/2;
    LA2_Origin[1] + L_LArmBar/2;
    LA_Origin[2] + L_LBracket/2 - L_LBracket/8 - 3/4*L_LBracket
], W_LBracket, L_LBracket, T_LBracket, [-90; 0; 0]*deg)
FreezeCdcLayer := FreezeLayer("CdcLayer")
LeverArmCHT2_Script := stack(MakeCdcLayer, LArm1, LArm2, DropTube1, DropTube2, LBracketLA1, LBracketLA2, FreezeCdcLayer)
LeverArmCHT1_Script := stack(MakeCdcLayer, LArm1, DropTube1, LBracketLA1, FreezeCdcLayer)
# The Third lever arm (used to add an additional coagulant dose before filtration) has been thrown out in the version of the CDC code from Spring 2014.
# Connecting bars, Cylinders and Float Cable
ConnectCylinderLayer := layer_new("CdcConnectCylinder", ltgrey)
LarmBar1 := CylinderSUBF([
    LA_Origin[0] + L_LArmBar/2;
    (LA_Origin[1] + L_LArmBar/2) - W_LBracket/2;
    LA_Origin[2] + L_LBracket/2
], R_LArmBar, L_LArmBar, [0; 0]*deg, ["CdcLayer"])
# lambars are the bars that connect the lever arms to the L-brackets
LarmBar2 := CylinderSUBF([
    LA2_Origin[0] + L_LArmBar/2;
    (LA2_Origin[1] + L_LArmBar/2) - W_LBracket/2;
    LA2_Origin[2] + L_LBracket/2
], R_LArmBar, L_LArmBar, [0; 0]*deg, ["CdcLayer"])
ConnectionCylinder2 := CylinderSUBF([LA_Origin[0] + H_LeverArm; LA2_Origin[1] + L_CdcLever - 4*zc; LA_Origin[2] + 4*W_LeverArm], D_Cable, .5*L_CdcLever, [0; 0]*deg, ["CdcLayer"])
FloatCable := CylinderF([LA_Origin[0]; LA_Origin[1] + W_LeverArm/2 + L_CdcLever; Z_FloatTop], D_Cable, L_Cable, [0; 90]*deg)
FreezeConnectCylinderLayer := FreezeLayer("CdcConnectCylinder")
ConnectCyl2_Script := stack(ConnectCylinderLayer, LarmBar1, LarmBar2, ConnectionCylinder2, FloatCable, FreezeConnectCylinderLayer)
ConnectCyl1_Script := stack(ConnectCylinderLayer, LarmBar1, FloatCable, FreezeConnectCylinderLayer)
# Sliders
SliderLayer := layer_new("CdcSliders", dkgrey)
Slider2FirstSide := BoxF(Slider2_Origin, [Slider2_Origin[0] + L_Slider; Slider2_Origin[1] + W_Slider; Slider2_Origin[2] - H_Slider], [90; 0; 0]*deg)
Slider1FirstSide := BoxF(Slider1_Origin, [Slider1_Origin[0] + L_Slider; Slider1_Origin[1] + W_Slider; Slider1_Origin[2] - H_Slider], [90; 0; 0]*deg)
Slider1TopSide := BoxF(Slider1_Origin, [Slider1_Origin[0] + H_Slider; Slider1_Origin[1] + L_Slider; Slider1_Origin[2] - W_Slider], [0; 0; 0]*deg)
Slider2TopSide := BoxF(Slider2_Origin, [Slider2_Origin[0] + H_Slider; Slider2_Origin[1] + L_Slider; Slider2_Origin[2] - W_Slider], [0; 0; 0]*deg)
Slider2SecondSide := BoxF([Slider2_Origin[0] + H_Slider; Slider2_Origin[1]; Slider2_Origin[2]], [
    Slider2_Origin[0] + H_Slider + W_Slider;
    Slider2_Origin[1] + L_Slider;
    Slider2_Origin[2] - H_Slider
], [0; 0; 0]*deg)
Slider1SecondSide := BoxF([Slider1_Origin[0] + H_Slider; Slider1_Origin[1]; Slider1_Origin[2]], [
    Slider1_Origin[0] + H_Slider + W_Slider;
    Slider1_Origin[1] + L_Slider;
    Slider1_Origin[2] - H_Slider
], [0; 0; 0]*deg)
FreezeSliders := FreezeLayer("CdcSliders")
Sliders2_Script := stack(SliderLayer, Slider1FirstSide, Slider2FirstSide, Slider1TopSide, Slider2TopSide, Slider1SecondSide, Slider2SecondSide, FreezeSliders)
Sliders1_Script := stack(SliderLayer, Slider1FirstSide, Slider1TopSide, Slider1SecondSide, FreezeSliders)
# Float
FloatCapsLayer := layer_new("CdcFloatCapPlu", green)
CdcFloatCapTop := CapF(Float_Origin, [0; -90]*deg, ND_EtFloat)
CdcFloatCapBottom := CapF([Float_Origin[0]; Float_Origin[1]; Float_Origin[2] - L_CdcFloat], [0; 90]*deg, ND_EtFloat)
FreezeFloatCaps := FreezeLayer("CdcFloatCapPlu")
FloatPipeLayer := layer_new("CdcFloatPipePlu", blue)
CdcFloatPipe := PipeF(Float_Origin, L_CdcFloat, [0; -90]*deg, ND_EtFloat, PS_Default)
FreezeFloatPipe := FreezeLayer("CdcFloatPipePlu")
PlumbingLayer := stack(FloatCapsLayer, CdcFloatCapTop, CdcFloatCapBottom, FreezeFloatCaps, FloatPipeLayer, CdcFloatPipe, FreezeFloatPipe)
Cdc2_Script := stack(LeverArmCHT2_Script, ConnectCyl2_Script, Sliders2_Script, PlumbingLayer)
Cdc1_Script := stack(LeverArmCHT1_Script, ConnectCyl1_Script, Sliders1_Script, PlumbingLayer)
# Manifold
CoagManifoldPluLayer := layer_new("CoagManifoldPlu", blue)
CoagConnectorPipe := PipeF(CoagDosingTube_Origin + [L_DosingConnectors + ShortTeeLength(ND_DeliveryPipe); 0 m; 0.5*TeeLength(ND_DeliveryPipe)], 2*SocketDepth(ND_DeliveryPipe), [0; 90]*deg, ND_DeliveryPipe, PS_Default)
ArrayCoagConnectorPipe := ArrayLast(N_CdcCoagTubes + 1, 1, B_DosingTubes)
MirrorCoagConnectorPipe := Mirror3dAll("yz", [
    CoagDosingTube_Origin[0] - .5*L_CdcCoagTube;
    CoagDosingTube_Origin[1];
    CoagDosingTube_Origin[2] + 1/4*H_Et + ShortTeeLength(ND_DeliveryPipe) + .5*ND_DeliveryPipe
], "n")
CoagDeliveryConnectorPipe := PipeF(CoagDosingTube_Origin + [
    L_DosingConnectors + ShortTeeLength(ND_DeliveryPipe);
    0 m;
    -0.5*TeeLength(ND_DeliveryPipe) - 2*SocketDepth(ND_DeliveryPipe)
], 2*SocketDepth(ND_DeliveryPipe), [0; 90]*deg, ND_DeliveryPipe, PS_Default)
CoagDeliveryPipe := PipeF(CoagDeliveryPipe_Origin, L_CoagDeliveryPipe, [0; 0]*deg, ND_DeliveryPipe, PS_Default)
FreezeCoagManifoldPlu := FreezeLayer("CoagManifoldPlu")
ChlorManifoldPluLayer := layer_new("ChlorManifoldPlu", blue)
ChlorConnectorPipe := PipeF(ChlorDosingTube_Origin + [L_DosingConnectors + ShortTeeLength(ND_DeliveryPipe); 0 m; 0.5*TeeLength(ND_DeliveryPipe)], 2*SocketDepth(ND_DeliveryPipe), [0; 90]*deg, ND_DeliveryPipe, PS_Default)
ArrayChlorConnectorPipe := ArrayLast(N_CdcChlorineTubes + 1, 1, B_DosingTubes)
MirrorChlorConnectorPipe := Mirror3dAll("yz", [
    ChlorDosingTube_Origin[0] - .5*L_CdcChlorineTube;
    ChlorDosingTube_Origin[1];
    ChlorDosingTube_Origin[2] + 1/4*H_Et + ShortTeeLength(ND_DeliveryPipe) + .5*ND_DeliveryPipe
], "n")
ChlorDeliveryConnectorPipe := PipeF(ChlorDosingTube_Origin + [
    L_DosingConnectors + ShortTeeLength(ND_DeliveryPipe);
    0 m;
    -0.5*TeeLength(ND_DeliveryPipe) - 2*SocketDepth(ND_DeliveryPipe)
], 2*SocketDepth(ND_DeliveryPipe), [0; 90]*deg, ND_DeliveryPipe, PS_Default)
ChlorineDeliveryPipe := PipeF(ChlorDeliveryPipe_Origin, L_ChlorineDeliveryPipe, [0; 0]*deg, ND_DeliveryPipe, PS_Default)
FreezeChlorManifoldPlu := FreezeLayer("ChlorManifoldPlu")
ManifoldFittingsLayer := layer_new("CdcManifoldFittings", green)
ElbowCoagCHT := ElbowF(CoagDeliveryPipe_Origin + [-L_CoagDeliveryPipe; 0 m; 0 m], [90; 0; -90]*deg, ND_DeliveryPipe, PS_Default)
ElbowChlorCHT := ElbowF(ChlorDeliveryPipe_Origin + [-L_ChlorineDeliveryPipe; 0 m; 0 m], [90; 0; -90]*deg, ND_DeliveryPipe, PS_Default)
ElbowCoagDosing := ElbowF(CoagDeliveryPipe_Origin, [-90; 0; 90]*deg, ND_DeliveryPipe, PS_Default)
ElbowChlorDosing := ElbowF(ChlorDeliveryPipe_Origin, [-90; 0; 90]*deg, ND_DeliveryPipe, PS_Default)
ElbowCoagDosingBottomLeft := ElbowF(CoagDosingTube_Origin + [-L_CdcCoagTube - L_DosingConnectors; 0 m; 0 m], [90; 0; -90]*deg, ND_DeliveryPipe, PS_Default)
ElbowChlorDosingBottomLeft := ElbowF(ChlorDosingTube_Origin + [-L_CdcChlorineTube - L_DosingConnectors; 0 m; 0 m], [90; 0; -90]*deg, ND_DeliveryPipe, PS_Default)
TeeCoagDosingTopRight := TeeF(CoagDosingTube_Origin + [L_DosingConnectors; 0 m; B_DosingTubes*N_CdcCoagTubes], [90; 0; -90]*deg, ND_DeliveryPipe, PS_Default)
TeeChlorDosingTopRight := TeeF(ChlorDosingTube_Origin + [L_DosingConnectors; 0 m; B_DosingTubes*N_CdcChlorineTubes], [90; 0; -90]*deg, ND_DeliveryPipe, PS_Default)
FreezeFittings := FreezeLayer("CdcManifoldFittings")
ManifoldCoagTeeLayer := layer_new("CdcCoagTees", green)
CoagTees :=
    CoagTeeStack ← layer_new("CdcCoagTees", green)
    for i ∈ 0 .. max(N_CdcCoagTubes - 1, 0)
        CoagTeeStack ← stack(CoagTeeStack, TeeF(CoagDosingTube_Origin + [L_DosingConnectors; 0 m; B_DosingTubes*i], [90; 0; 90]*deg, ND_DeliveryPipe, PS_Default))
        CoagTeeStack ← stack(CoagTeeStack, TeeF(CoagDosingTube_Origin + [-L_CdcCoagTube - L_DosingConnectors; 0 m; B_DosingTubes*(i + 1)], [-90; 0; 90]*deg, ND_DeliveryPipe, PS_Default))
        i ← i + 1
    return CoagTeeStack
# Changed from N.CdcCoagTubes-2 to N.CdcCoagTubes-1
FreezeCoagTees := FreezeLayer("CdcCoagTees")
ChlorTees :=
    ChlorTeeStack ← layer_new("CdcChlorTees", green)
    for i ∈ 0 .. max(N_CdcChlorineTubes - 1, 0)
        ChlorTeeStack ← stack(ChlorTeeStack, TeeF(ChlorDosingTube_Origin + [L_DosingConnectors; 0 m; B_DosingTubes*i], [90; 0; 90]*deg, ND_DeliveryPipe, PS_Default))
        ChlorTeeStack ← stack(ChlorTeeStack, TeeF(ChlorDosingTube_Origin + [-L_CdcChlorineTube - L_DosingConnectors; 0 m; B_DosingTubes*(i + 1)], [-90; 0; 90]*deg, ND_DeliveryPipe, PS_Default))
        i ← i + 1
    return ChlorTeeStack
L_DosingConnectors = 0.1895 m
FreezeChlorTees := FreezeLayer("CdcChlorTees")
L_PVCBallValve = 0.1625 m
ChlorDosingTube_Origin + [L_DosingConnectors; 0 m; B_DosingTubes*1] = [-6.2249; 8.38416; 2.43186] m
ChlorDosingTube_Origin = [-6.4144; 8.38416; 2.35566] m
ManifoldCoagValveLayer := layer_new("CdcCoagManifoldValves", ltgrey)
CdcCoagBallValve := insertdwg("https://confluence.cornell.edu/download/attachments/173604905/PvcBallValve+Scaled.dwg", CoagDosingTube_Origin + [L_PVCBallValve; 0 m; 0 m], ND_DeliveryPipe/(2 in), ND_DeliveryPipe/(2 in), 0 deg)
RotateCdcCoagBallValve := Rotate3DLast(CoagDosingTube_Origin + [L_PVCBallValve; 0 m; 0 m], "y", -90 deg)
ArrayCoagBallValve := ArrayLast(N_CdcCoagTubes + 1, 1, B_DosingTubes)
MirrorCoagValves := Mirror3dAll("yz", [
    CoagDosingTube_Origin[0] - .5*L_CdcCoagTube;
    CoagDosingTube_Origin[1];
    CoagDosingTube_Origin[2] + 1/4*H_Et + ShortTeeLength(ND_DeliveryPipe) + .5*ND_DeliveryPipe
], "n")
CdcCoagBallValveAir := insertdwg("https://confluence.cornell.edu/download/attachments/173604905/PvcBallValve+Scaled.dwg", CoagDosingTube_Origin + [
    L_PVCBallValve + ShortTeeLength(ND_DeliveryPipe) + SocketDepth(ND_DeliveryPipe);
    0 m;
    (N_CdcCoagTubes + 1)*TeeLength(ND_DeliveryPipe) + ((2*N_CdcCoagTubes + 1)*SocketDepth(ND_DeliveryPipe)) - ShortTeeLength(ND_DeliveryPipe)
], ND_DeliveryPipe/(2 in), ND_DeliveryPipe/(2 in), 90 deg)
FreezeCoagValvesLayer := FreezeLayer("CdcCoagManifoldValves")
ManifoldChlorValveLayer := layer_new("CdcChlorManifoldValves", ltgrey)
CdcChlorineBallValve := insertdwg("https://confluence.cornell.edu/download/attachments/173604905/PvcBallValve+Scaled.dwg", ChlorDosingTube_Origin + [L_PVCBallValve; 0 m; 0 m], ND_DeliveryPipe/(2 in), ND_DeliveryPipe/(2 in), 0 deg)
RotateCdcChlorineBallValve := Rotate3DLast(ChlorDosingTube_Origin + [L_PVCBallValve; 0 m; 0 m], "y", -90 deg)
# Chlorine ball valves not showing up --> done
# All the choosing between max(N-1,1) are changed to N+1 to ensure that an extra tube is drawn in all cases. But some indices may have been messed up
ArrayChlorineBallValve := ArrayLast(N_CdcChlorineTubes + 1, 1, B_DosingTubes)
# There is an extra tee being drawn on the top right side for both chlorine and coagulant, need to figure out how to get rid of it --> done
MirrorChlorineValves := Mirror3dAll("yz", [
    ChlorDosingTube_Origin[0] - .5*L_CdcChlorineTube;
    ChlorDeliveryPipe_Origin[1];
    ChlorDeliveryPipe_Origin[2]
], "n")
CdcChlorineBallValveAir := insertdwg("https://confluence.cornell.edu/download/attachments/173604905/PvcBallValve+Scaled.dwg", ChlorDosingTube_Origin + [
    L_PVCBallValve + ShortTeeLength(ND_DeliveryPipe) + SocketDepth(ND_DeliveryPipe);
    0 m;
    (N_CdcChlorineTubes + 1)*TeeLength(ND_DeliveryPipe) + ((2*N_CdcChlorineTubes + 1)*SocketDepth(ND_DeliveryPipe)) - ShortTeeLength(ND_DeliveryPipe)
], ND_DeliveryPipe/(2 in), ND_DeliveryPipe/(2 in), 90 deg)
FreezeChlorValvesLayer := FreezeLayer("CdcChlorManifoldValves")
ViewFront := view("f")
# Air removal ball valves position not right
ManifoldFitting_Script := stack(CoagManifoldPluLayer, CoagConnectorPipe, ViewFront, ArrayCoagConnectorPipe, MirrorCoagConnectorPipe, ViewTop, CoagDeliveryConnectorPipe, CoagDeliveryPipe, FreezeCoagManifoldPlu, ChlorManifoldPluLayer, ChlorConnectorPipe, ViewFront, ArrayChlorConnectorPipe, MirrorChlorConnectorPipe, ViewTop, ChlorDeliveryConnectorPipe, ChlorineDeliveryPipe, FreezeChlorManifoldPlu, ManifoldFittingsLayer, ElbowCoagCHT, ElbowChlorCHT, ElbowCoagDosing, ElbowChlorDosing, TeeCoagDosingTopRight, TeeChlorDosingTopRight, ElbowCoagDosingBottomLeft, ElbowChlorDosingBottomLeft, FreezeFittings, ManifoldCoagTeeLayer, CoagTees, FreezeCoagTees, ChlorTees, FreezeChlorTees)
ManifoldValve_Script := stack(ManifoldCoagValveLayer, CdcCoagBallValve, RotateCdcCoagBallValve, ViewFront, ArrayCoagBallValve, MirrorCoagValves, ViewTop, CdcCoagBallValveAir, FreezeCoagValvesLayer, ManifoldChlorValveLayer, ViewTop, CdcChlorineBallValve, RotateCdcChlorineBallValve, ViewFront, ArrayChlorineBallValve, MirrorChlorineValves, ViewTop, CdcChlorineBallValveAir, FreezeChlorValvesLayer)
Manifold_Script := stack(ManifoldFitting_Script, ManifoldValve_Script)
# Dosing Tubes
L_CdcCoagTube = 2.87602 m
D_CdcCoag = 0.1875 in
N_CdcCoagTubes = 3
L_CdcChlorineTube = 2.10947 m
D_CdcChlorine = 0.1875 in
N_CdcChlorineTubes = 1
DosingTubesLayer := layer_new("CdcDosingPlu", red)
CoagTube := PipeF(CoagDosingTube_Origin, L_CdcCoagTube, [0; 0]*deg, D_CdcCoag, PS_FlexTube)
ViewFront := view("f")
ArrayCoagTube := ArrayLast(max(N_CdcCoagTubes, 2), 1, B_DosingTubes)
ArrayCoagTube_test := ArrayLast(N_CdcCoagTubes + 1, 1, B_DosingTubes)
ViewTop := view("t")
ChlorineTube := PipeF(ChlorDosingTube_Origin, L_CdcChlorineTube, [0; 0]*deg, D_CdcChlorine, PS_FlexTube)
ArrayChlorineTube := ArrayLast(max(N_CdcChlorineTubes, 2), 1, B_DosingTubes)
ArrayChlorineTube_test := ArrayLast(N_CdcChlorineTubes + 1, 1, B_DosingTubes)
FreezeDosingTubes := FreezeLayer("CdcDosingPlu")
Dosing_Script := stack(DosingTubesLayer, CoagTube, ViewFront, ArrayCoagTube_test, ViewTop, ChlorineTube, ViewFront, ArrayChlorineTube_test, ViewTop, FreezeDosingTubes)
# Connecting bars and Cylinders
ConnectCylinderLayer := layer_new("CdcConnectCylinder", ltgrey)
LarmBar1 := CylinderSUBF([
    LA_Origin[0] + W_LBracket/2;
    LA_Origin[1] - T_LBracket + L_LArmBar/2;
    LA_Origin[2] + L_LBracket/2 - L_LBracket/8
], R_LArmBar, L_LArmBar, [90; 0]*deg, ["CdcLayer"])
LarmBar2 := CylinderSUBF([
    LA2_Origin[0] + W_LBracket/2;
    LA2_Origin[1] - T_LBracket + L_LArmBar/2;
    LA2_Origin[2] + L_LBracket/2 - L_LBracket/8
], R_LArmBar, L_LArmBar, [90; 0]*deg, ["CdcLayer"])
LarmBar3 := CylinderSUBF([
    LA3_Origin[0] + W_LBracket/2;
    LA3_Origin[1] - T_LBracket + L_LArmBar/2;
    LA3_Origin[2] + L_LBracket/2 - L_LBracket/8
], R_LArmBar, L_LArmBar, [90; 0]*deg, ["CdcLayer"])
ConnectionCylinder2 := CylinderSUBF([
    LA_Origin[0] - L_CdcLever/4 + L_CdcLever/2 + .55*L_CdcLever;
    LA2_Origin[1] - 6*W_LeverArm;
    LA_Origin[2] + 4*W_LeverArm
], D_Cable, (LA3_Origin - LA2_Origin)[1] - .25*L_CdcLever, [270; 0]*deg, ["CdcLayer"])
ConnectionCylinder3 := CylinderSUBF([
    LA_Origin[0] - L_CdcLever/4 + L_CdcLever/2 + .55*L_CdcLever;
    LA2_Origin[1] - 3*W_LeverArm;
    LA_Origin[2] + 4*W_LeverArm
], D_Cable, LA3_Origin[1] - LA2_Origin[1] + 6*W_LeverArm, [270; 0]*deg, ["CdcLayer"])
FreezeConnectCylinderLayer := FreezeLayer("CdcConnectCylinder")
# Float Cable, Caps, and Pipe
CdcLayerAll := layer_new("CdcAll", ltgrey)
FloatCable := CylinderF([LA_Origin[0] + L_CdcLever; LA_Origin[1] + W_LeverArm/2; Z_FloatTop], D_Cable, L_Cable, [0; 90]*deg)
[
    LA_Origin[0] - L_CdcLever/4 + L_CdcLever/2 + .55*L_CdcLever;
    LA2_Origin[1] - 6*W_LeverArm;
    LA_Origin[2] + 4*W_LeverArm
]
FreezeCdcAll := FreezeLayer("CdcAll")
FloatCapsLayer := layer_new("CdcFloatCapPlu", green)
CdcFloatCapTop := CapF([LA_Origin[0] + L_CdcLever; LA_Origin[1] + W_LeverArm/2; Z_FloatTop - CapThickness(ND_EtFloat)], [0; -90]*deg, ND_EtFloat)
CdcFloatCapBottom := CapF([
    LA_Origin[0] + L_CdcLever;
    LA_Origin[1] + W_LeverArm/2;
    Z_FloatTop - CapThickness(ND_EtFloat) - L_CdcFloat
], [0; 90]*deg, ND_EtFloat)
FreezeFloatCaps := FreezeLayer("CdcFloatCapPlu")
FloatPipeLayer := layer_new("CdcFloatPipePlu", blue)
CdcFloatPipe := PipeF([LA_Origin[0] + L_CdcLever; LA_Origin[1]; Z_FloatTop - CapThickness(ND_EtFloat)], L_CdcFloat, [0; -90]*deg, ND_EtFloat, PS_Default)
FreezeFloatPipe := FreezeLayer("CdcFloatPipePlu")
Cdc3_Script := stack(CdcLayer, LBracketLA1, LArm1, DropTube1, LBracketLA2, LArm2, DropTube2, LBracketLA3, LArm3, DropTube3, FreezeCdcLayer, ConnectCylinderLayer, ConnectionCylinder3, LarmBar3, LarmBar2, LarmBar1, FreezeConnectCylinderLayer, SliderLayer, Slider1FirstSide, Slider2FirstSide, Slider3FirstSide, Slider1TopSide, Slider2TopSide, Slider3TopSide, Slider1SecondSide, Slider2SecondSide, Slider3SecondSide, FreezeSliders, CdcLayerAll, FloatCable, FreezeCdcAll, FloatCapsLayer, CdcFloatCapTop, CdcFloatCapBottom, FreezeFloatCaps, FloatPipeLayer, CdcFloatPipe, FreezeFloatPipe)
Cdc3_ScriptMod := stack(CdcLayer, LBracketLA1, LArm1, DropTube1, LBracketLA2, LArm2, DropTube2, LBracketLA3, LArm3, DropTube3, FreezeCdcLayer, ConnectCylinderLayer, ConnectionCylinder3, LarmBar3, LarmBar2, LarmBar1, FreezeConnectCylinderLayer, SliderLayer, Slider1FirstSide, Slider2FirstSide, Slider3FirstSide, Slider1TopSide, Slider2TopSide, Slider3TopSide, Slider1SecondSide, Slider2SecondSide, Slider3SecondSide, FreezeSliders)
Cdc2_Script := stack(CdcLayer, CdcLayerAll, LBracketLA1, LArm1, DropTube1, LarmBar1, LBracketLA2, LArm2, DropTube2, LarmBar2, ConnectionCylinder2, FloatCable, FreezeCdcLayer, FreezeCdcAll, SliderLayer, Slider1FirstSide, Slider2FirstSide, Slider1TopSide, Slider2TopSide, Slider1SecondSide, Slider2SecondSide, FreezeSliders, FloatCapsLayer, CdcFloatCapTop, CdcFloatCapBottom, FreezeFloatCaps, FloatPipeLayer, CdcFloatPipe, FreezeFloatPipe)
Cdc2_ScriptMod := stack(CdcLayer, CdcLayerAll, LBracketLA1, LArm1, DropTube1, LarmBar1, LBracketLA2, LArm2, DropTube2, LarmBar2, ConnectionCylinder2, FreezeCdcLayer, FreezeCdcAll, SliderLayer, Slider1FirstSide, Slider2FirstSide, Slider1TopSide, Slider2TopSide, Slider1SecondSide, Slider2SecondSide, FreezeSliders)
Cdc1_Script := stack(CdcLayer, CdcLayerAll, LBracketLA1, LArm1, DropTube1, LarmBar1, FloatCable, FreezeCdcLayer, FreezeCdcAll, SliderLayer, Slider1FirstSide, Slider1TopSide, Slider1SecondSide, FreezeSliders, Slider1TopSide, FloatCapsLayer, CdcFloatCapTop, CdcFloatCapBottom, FreezeFloatCaps, FloatPipeLayer, CdcFloatPipe, FreezeFloatPipe)
Cdc1_ScriptMod := stack(CdcLayer, CdcLayerAll, LBracketLA1, LArm1, DropTube1, LarmBar1, FreezeCdcLayer, FreezeCdcAll, SliderLayer, Slider1FirstSide, Slider1TopSide, Slider1SecondSide, FreezeSliders, Slider1TopSide)
# Fittings (will update to mainfold system soon)
CdcFittingsLayer := layer_new("CdcFittings", ltgrey)
CdcFittingOuter :=
    CylinderSUBF(LADtFitting_Origin, OD_CdcFitting/2, L_CdcFitting, [180; 0]*deg, ["CdcLayer"]) if N_FiCoagCdcTubes ≤ 3
    CylinderSUBF(LADtFitting_Origin, OD_CdcFitting/2, L_CdcFitting, [180; 0]*deg, ["CdcLayer"]) otherwise
CdcFittingOuter_Array :=
    ArrayLastPolar(LADt_Center, N_FiCoagCdcTubes, 180 deg) if N_FiCoagCdcTubes ≤ 3
    ArrayLastPolar(LADt_Center, N_FiCoagCdcTubes, 180 deg) otherwise
CdcFittingOuter2 :=
    CylinderSUBF(LA2DtFitting_Origin, OD_CdcFitting/2, L_CdcFitting, [180; 0]*deg, ["CdcLayer"]) if N_CdcCoagTubes ≤ 3
    CylinderSUBF(LA2DtFitting_Origin, OD_CdcFitting/2, L_CdcFitting, [180; 0]*deg, ["CdcLayer"]) otherwise
CdcFittingOuter2_Array :=
    ArrayLastPolar(LA2Dt_Center, N_CdcCoagTubes, 180 deg) if N_CdcCoagTubes ≤ 3
    ArrayLastPolar(LA2Dt_Center, N_CdcCoagTubes, 180 deg) otherwise
CdcFittingOuter3 :=
    CylinderSUBF(LA3DtFitting_Origin, OD_CdcFitting/2, L_CdcFitting, [180; 0]*deg, ["CdcLayer"]) if N_CdcChlorineTubes ≤ 3
    CylinderSUBF(LA3DtFitting_Origin, OD_CdcFitting/2, L_CdcFitting, [180; 0]*deg, ["CdcLayer"]) otherwise
CdcFittingOuter3_Array :=
    ArrayLastPolar(LA3Dt_Center, N_CdcChlorineTubes, 180 deg) if N_CdcChlorineTubes ≤ 3
    ArrayLastPolar(LA3Dt_Center, N_CdcChlorineTubes, 180 deg) otherwise
SliderDtConnect1 := CylinderSUBF([
    LA_Origin[0] + L_CdcLever - L_LAOriginToDtY;
    LA_Origin[1] + W_LeverArm;
    LA_Origin[2] + .75*H_LeverArm
], ID_CdcFitting/2, 2.1*L_CdcFitting, [270; 0]*deg, ["CdcLayer"; "Sliders"])
SliderDtConnect2 := CylinderSUBF([
    LA2_Origin[0] + L_CdcLever - L_LAOriginToDtY;
    LA2_Origin[1] + W_LeverArm;
    LA2_Origin[2] + .75*H_LeverArm
], ID_CdcFitting/2, 2.1*L_CdcFitting, [270; 0]*deg, ["Sliders"; "CdcLayer"])
SliderDtConnect3 := CylinderSUBF([
    LA3_Origin[0] + L_CdcLever - L_LAOriginToDtY;
    LA3_Origin[1] + W_LeverArm;
    LA3_Origin[2] + .75*H_LeverArm
], ID_CdcFitting/2, 2.1*L_CdcFitting, [270; 0]*deg, ["Sliders"; "CdcLayer"])
ScrewHead1 := CylinderF([
    LA_Origin[0] + L_CdcLever - L_LAOriginToDtY - .65*L_Slider;
    LA_Origin[1] + W_LeverArm + 1.7*L_CdcFitting;
    LA_Origin[2] + .75*H_LeverArm
], 1.5*OD_CdcFitting, .2*L_CdcFitting, [90; 0]*deg)
ScrewHead2 := CylinderF([
    LA2_Origin[0] + L_CdcLever - L_LAOriginToDtY - .65*L_Slider;
    LA2_Origin[1] + W_LeverArm + 1.7*L_CdcFitting;
    LA2_Origin[2] + .75*H_LeverArm
], 1.5*OD_CdcFitting, .2*L_CdcFitting, [90; 0]*deg)
ScrewHead3 := CylinderF([
    LA3_Origin[0] + L_CdcLever - L_LAOriginToDtY - .65*L_Slider;
    LA3_Origin[1] + W_LeverArm + 1.7*L_CdcFitting;
    LA3_Origin[2] + .75*H_LeverArm
], 1.5*OD_CdcFitting, .2*L_CdcFitting, [90; 0]*deg)
Screw1 := CylinderSUBF([
    LA_Origin[0] + L_CdcLever - L_LAOriginToDtY - .65*L_Slider;
    LA_Origin[1] + W_LeverArm;
    LA_Origin[2] + .75*H_LeverArm
], ID_CdcFitting/2, 1.5*L_CdcFitting, [270; 0]*deg, ["Sliders"])
Screw2 := CylinderSUBF([
    LA2_Origin[0] + L_CdcLever - L_LAOriginToDtY - .65*L_Slider;
    LA2_Origin[1] + W_LeverArm;
    LA2_Origin[2] + .75*H_LeverArm
], ID_CdcFitting/2, 1.5*L_CdcFitting, [270; 0]*deg, ["Sliders"])
Screw3 := CylinderSUBF([
    LA3_Origin[0] + L_CdcLever - L_LAOriginToDtY - .65*L_Slider;
    LA3_Origin[1] + W_LeverArm;
    LA3_Origin[2] + .75*H_LeverArm
], ID_CdcFitting/2, 1.5*L_CdcFitting, [270; 0]*deg, ["Sliders"])
FreezeCdcFittings := FreezeLayer("CdcFittings")
CdcFittingInner :=
    CylinderSUBF(LADtFitting_Origin, ID_CdcFitting/2, L_CdcFitting, [180; 0]*deg, ["CdcLayer"]) if N_FiCoagCdcTubes ≤ 3
    CylinderSUBF(LAReducerFitting_Origin, ID_CdcFitting/2, L_CdcFitting, [180; 0]*deg, ["CdcLayer"]) otherwise
CdcFittingInner_Array :=
    ArrayLastPolar(LADt_Center, N_FiCoagCdcTubes, 180 deg) if N_FiCoagCdcTubes ≤ 3
    ArrayLastPolar(LAReducer_Center, N_FiCoagCdcTubes, 180 deg) otherwise
CdcFittingInner2 :=
    CylinderSUBF(LA2DtFitting_Origin, ID_CdcFitting/2, L_CdcFitting, [180; 0]*deg, ["CdcLayer"]) if N_CdcCoagTubes ≤ 3
    CylinderSUBF(LA2ReducerFitting_Origin, ID_CdcFitting/2, L_CdcFitting, [180; 0]*deg, ["CdcLayer"]) otherwise
CdcFittingInner2_Array :=
    ArrayLastPolar(LA2Dt_Center, N_CdcCoagTubes, 180 deg) if N_CdcCoagTubes ≤ 3
    ArrayLastPolar(LA2Reducer_Center, N_CdcCoagTubes, 180 deg) otherwise
CdcFittingInner3 :=
    CylinderSUBF(LA3DtFitting_Origin, ID_CdcFitting/2, L_CdcFitting, [180; 0]*deg, ["CdcLayer"]) if N_CdcChlorineTubes ≤ 3
    CylinderSUBF(LA3ReducerFitting_Origin, ID_CdcFitting/2, L_CdcFitting, [180; 0]*deg, ["CdcLayer"]) otherwise
CdcFittingInner3_Array :=
    ArrayLastPolar(LA3Dt_Center, N_CdcChlorineTubes, 180 deg) if N_CdcChlorineTubes ≤ 3
    ArrayLastPolar(LA3Reducer_Center, N_CdcChlorineTubes, 180 deg) otherwise
GroupFitting := GroupAll("DeleteMe")
SubtractFittingInner := SubtractF(["CdcFittings"], "DeleteMe")
FreezeCdcFittings := FreezeLayer("CdcFittings")
# Flexible Tubing (not currently drawn)
FlexConnectLayer := layer_new("CdcFlexConnect", red)
# n.temp specifies number of divisions the parabola will use (5 is a good number, do not exceed 10)
# dir.t specifies the tangency of the inlet and outlet, in the form of a 2-point point array. e.g. (1,0,0),(0,0,-1) is read as inlet facing positive x direction, outlet facing negative z direction
# Cat.Lt is the length of the tube minus the length of the pieces fitted over the couplings
# Inlet and outlet are the inlet and outlet coordinates, corresponding to the center point directly on the end of the coupling.
# ID and OD are inner and outer diameters of pipe, respectively
SweepPoint1 := LA_Origin + [-.0894; -.792; .1092]*m
SweepPoint2 := SweepPoint1 + [1; 0; 0]*in
FlexTubeF(n_temp, dir_t, inlet, outlet, Cat_Lt, ID, OD, LayerName, LayerColor) :=
    PP ← ParPointF(n_temp, dir_t, inlet, outlet, Cat_Lt)
    TP ← TanPoints(n_temp, dir_t, inlet, outlet, Cat_Lt)
    Inner ← FlexCylinderF(n_temp, dir_t, inlet, outlet, Cat_Lt, ID)
    Group ← GroupLast("DeleteMe")
    Layer ← layer_new(LayerName, LayerColor)
    Outer ← FlexCylinderF(n_temp, dir_t, inlet, outlet, Cat_Lt, OD)
    SubtractInner ← SubtractF([LayerName], "DeleteMe")
    Mirror ← concat("mirror", sp, "g", sp, LayerName, sp, sp, "0,0", sp, "0,100", sp, "y")
    Final ← stack(Layer, Outer, FreezeLayer(LayerName), Inner, Group, SubtractInner, layer_thaw(LayerName), Mirror, FreezeLayer(LayerName))
    return Final
SweepPoint5 := CHT_Origin + [.1432; 0; -.0629]*m
SweepPoint4 := SweepPoint5 + [1; 0; 0]*in
SweepPoint3 := [(SweepPoint1[0] + SweepPoint5[0])/2; (SweepPoint1[1] + SweepPoint5[1])/2; SweepPoint1[2] - 50 cm]
# This section is on hold as of Summer 2014
SweepPathPoints := [SweepPoint1; SweepPoint2; SweepPoint3; SweepPoint4; SweepPoint5]
FlexTube_Trial := FlexTube(SweepPathPoints, .125 in, .2 in, "CdcFlexConnect", red)  # error: This variable is undefined.
# Insert in stack when flexcylinder fixed
FlexConnectLayer, FlexTube_Trial, FreezeLayer("CdcFlexConnect")
# Flex tube Trial with new code!
# n.temp specifies number of divisions the parabola will use (5 is a good number, do not exceed 10)
# dir.t specifies the tangency of the inlet and outlet, in the form of a 2-point point array. e.g. (1,0,0),(0,0,-1) is read as inlet facing positive x direction, outlet facing negative z direction
# Cat.Lt is the length of the tube minus the length of the pieces fitted over the couplings
# Inlet and outlet are the inlet and outlet coordinates, corresponding to the center point directly on the end of the coupling.
# ID and OD are inner and outer diameters of pipe, respectively
FlexTubeF(n_temp, dir_t, inlet, outlet, Cat_Lt, ID, OD, LayerName, LayerColor) :=
    PP ← ParPointF(n_temp, dir_t, inlet, outlet, Cat_Lt)
    TP ← TanPoints(n_temp, dir_t, inlet, outlet, Cat_Lt)
    Inner ← FlexCylinderF(n_temp, dir_t, inlet, outlet, Cat_Lt, ID)
    Group ← GroupLast("DeleteMe")
    Layer ← layer_new(LayerName, LayerColor)
    Outer ← FlexCylinderF(n_temp, dir_t, inlet, outlet, Cat_Lt, OD)
    SubtractInner ← SubtractF([LayerName], "DeleteMe")
    Mirror ← concat("mirror", sp, "g", sp, LayerName, sp, sp, "0,0", sp, "0,100", sp, "y")
    Final ← stack(Layer, Outer, FreezeLayer(LayerName), Inner, Group, SubtractInner, layer_thaw(LayerName), Mirror, FreezeLayer(LayerName))
    return Final
FlexConnectLayer := layer_new("CdcFlexConnect", red)
NewTube := FlexTubeF(5, [-1, 0; 0, 1; 0, 0], LA_Origin, CHT_Origin, 1.5 m, 1 in, 1 in, "CdcFlexConnect", red)  # error: No solution was found. Try changing the guess value or the value of TOL or CTOL.
FlexConnectLayer, NewTube, FreezeLayer("CdcFlexConnect")
CdcFittings3_Script := stack(CdcFittingsLayer, CdcFittingOuter3, CdcFittingOuter3_Array, CdcFittingOuter2, CdcFittingOuter2_Array, SliderDtConnect3, SliderDtConnect2, SliderDtConnect1, Screw3, Screw2, Screw1, ScrewHead3, ScrewHead2, ScrewHead1, FreezeCdcFittings, CdcFittingInner3, CdcFittingInner3_Array, CdcFittingInner2, CdcFittingInner2_Array, GroupFitting, SubtractFittingInner)
CdcFittings2_Script := stack(CdcFittingsLayer, CdcFittingOuter2, CdcFittingOuter2_Array, SliderDtConnect2, SliderDtConnect1, Screw2, Screw1, ScrewHead2, ScrewHead1, FreezeCdcFittings, CdcFittingInner2, CdcFittingInner2_Array, GroupFitting, SubtractFittingInner)
CdcFittings1_Script := stack(CdcFittingsLayer, CdcFittingOuter, CdcFittingOuter_Array, SliderDtConnect1, Screw1, ScrewHead1, FreezeCdcFittings, CdcFittingInner, CdcFittingInner_Array, GroupFitting, SubtractFittingInner)
SF_CalCol := 1.25
Ti_Res := 1.25*min
Q_CoagCalColMax = 2e-5 m^3/s
H_CalCol := 30 cm
# In the Spring 2014 file, the above value is 1.75x10^-5 m3/s
Q_CoagCalColMax := SF_CalCol*Q_CoagStock
Vol_CoagCalCol := Ti_Res*Q_CoagCalColMax
D_inCoagCCMin := sqrt(4*Vol_CoagCalCol/(π*H_CalCol)) = 3.14128 in
ND_CoagCalCol := NominalDiameter(D_inCoagCCMin, PS_Default)
D_inCoagCalCol := innerdiameter(ND_CoagCalCol, PS_Default) = 3.21 in
Q_ChlorCalColMax := SF_CalCol*Q_ChlorineStock
Vol_ChlorCalCol := Ti_Res*Q_ChlorCalColMax
D_inChlorCCMin := sqrt(4*Vol_ChlorCalCol/(π*H_CalCol)) = 1.81362 in
ND_ChlorCalCol := NominalDiameter(D_inChlorCCMin, PS_Default)
D_inChlorCalCol := innerdiameter(ND_ChlorCalCol, PS_Default) = 2.173 in
Q_FCCalColMax := SF_CalCol*Q_FiCoagStock
Vol_FCCalCol := Ti_Res*Q_FCCalColMax
D_inFCCCMin := sqrt(4*Vol_FCCalCol/(π*H_CalCol)) = 0.272043 in
ND_FCCalCol := NominalDiameter(D_inFCCCMin, PS_Default)
D_inFCCalCol := innerdiameter(ND_FCCalCol, PS_Default) = 1.175 in
R_Cylinder := .5 cm
# Calibration Column Definitions
# Calibration Column Origin Points
CoagCalCol_Origin := [
    ChemPlatform_Origin[0] + 1/2*L_EtChemPlatform;
    ChemPlatform_Origin[1] - ConRadius(ND_CoagCalCol) - T_MountingBoard;
    Z_CoagulantOutlet
]
CoagTopCap_Origin := [CoagCalCol_Origin[0]; CoagCalCol_Origin[1]; CoagCalCol_Origin[2] + H_CalCol]
ChlorCalCol_Origin := [
    ChemPlatform_Origin[0] + 1/2*L_EtChemPlatform - ConRadius(ND_CoagCalCol) - ConRadius(ND_ChlorCalCol) - 2*zc;
    ChemPlatform_Origin[1] - ConRadius(ND_CoagCalCol) - 2*zc;
    Z_CoagulantOutlet
]
ChlorTopCap_Origin := [ChlorCalCol_Origin[0]; ChlorCalCol_Origin[1]; ChlorCalCol_Origin[2] + H_CalCol]
# To draw the hole in the top cap, we are subtracting a cylinder from the top cap layer
CoagCylinder_Origin := [CoagCalCol_Origin[0]; CoagCalCol_Origin[1]; CoagCalCol_Origin[2] + H_CalCol/2]
ChlorCylinder_Origin := [ChlorCalCol_Origin[0]; ChlorCalCol_Origin[1]; ChlorCalCol_Origin[2] + H_CalCol/2]
# Calibration Column and Constant Head Tanks
MakeCalColLayer := layer_new("CdcCalColumnPlu", ltpurple)
MainFCCalCol := PipeF(CalCol_Origin, H_CalCol, [0; 90]*deg, ND_FCCalCol, PS_Default)
MainCoagCalCol := PipeF(CoagCalCol_Origin, H_CalCol, [0; 90]*deg, ND_CoagCalCol, PS_Default)
MainChlorCalCol := PipeF(ChlorCalCol_Origin, H_CalCol, [0; 90]*deg, ND_ChlorCalCol, PS_Default)
CHT1 := ConstantHeadTankF(CHT_Origin, [90; 0; 90]*deg, D_CHT/2, H_CHT, T_CHTwall, .75*H_CHT, 1 in, 1 in, 1 in, 1 in)
CHT2 := ConstantHeadTankF(CHT2_Origin, [90; 0; 90]*deg, D_CHT/2, H_CHT, T_CHTwall, .75*H_CHT, 1 in, 1 in, 1 in, 1 in)
FreezeCalCol := FreezeLayer("CdcCalColumnPlu")
MakeCapsLayer := layer_new("CdcColumnCapsPlu", blue2)
CoagTopCap := CapF(CoagTopCap_Origin, [0; -90]*deg, ND_CoagCalCol)
CoagBottomCap := CapF(CoagTopCap_Origin - [0 m; 0 m; H_CalCol], [0; 90]*deg, ND_CoagCalCol)
ChlorTopCap := CapF(ChlorTopCap_Origin, [0; -90]*deg, ND_ChlorCalCol)
ChlorBottomCap := CapF(ChlorTopCap_Origin - [0 m; 0 m; H_CalCol], [0; 90]*deg, ND_ChlorCalCol)
FreezeCapsLayer := FreezeLayer("CdcColumnCapsPlu")
DrawCoagCylinder := CylinderF(CoagCylinder_Origin, R_Cylinder, H_CalCol, [0; 90]*deg)
DrawChlorCylinder := CylinderF(ChlorCylinder_Origin, R_Cylinder, H_CalCol, [0; 90]*deg)
LayCylinder := GroupAll("DeleteMe")
MakeHole := SubtractF(["CdcColumnCapsPlu"], "DeleteMe")
LayStand := layer_new("CdcCalColumnStand", yellow)
BoardDim_Vert := [
    2*ConRadius(ND_CoagCalCol) + 2*ConRadius(ND_ChlorCalCol) + 4*zc + 2*D_CHT + 1/6*L_EtChemPlatform;
    T_MountingBoard;
    H_CalCol + Z_CoagulantOutlet - Z_CdcFloatValveOrifice
]
BoardDim_Horiz := [BoardDim_Vert[0]; BoardDim_Vert[2]/(2*tan(60*deg)); 1.5*in]
VertBoard_Origin := [
    CoagCalCol_Origin[0] - ConRadius(ND_CoagCalCol) - 2*ConRadius(ND_ChlorCalCol) - 2*zc;
    CoagCalCol_Origin[1] + ConRadius(ND_CoagCalCol);
    Z_CdcFloatValveOrifice
]
FarCorner_VertBoard := BoardDim_Vert + VertBoard_Origin
HorizBoard_Origin := [
    VertBoard_Origin[0];
    VertBoard_Origin[1] + BoardDim_Vert[1];
    ChemPlatform_Origin[2] + ChemPlatform_Dimensions[2]
]
FarCorner_HorizBoard := BoardDim_Horiz + HorizBoard_Origin
BoardDim_Slant := [BoardDim_Vert[0]; 1.5 in; BoardDim_Vert[2]/(2*sin(60 deg))]
SlantBoard_Origin := FarCorner_HorizBoard
FarCorner_SlantBoard := SlantBoard_Origin + [-BoardDim_Slant[0]; -BoardDim_Slant[1]; BoardDim_Slant[2]]
MakeSlantBoard := BoxF(SlantBoard_Origin, FarCorner_SlantBoard, [0; 0; 30]*deg)
MakeVertBoard := BoxF(VertBoard_Origin, FarCorner_VertBoard, [0; 0; 0])
MakeHorizBoard := BoxF(HorizBoard_Origin, FarCorner_HorizBoard, [0; 0; 0])
RotateSupport := Rotate_All(VertBoard_Origin, 90 deg)
MoveSupport := MoveAll(VertBoard_Origin, VertBoard_Origin - [0 m; 2*ConRadius(ND_CoagCalCol); 0 m])
FreezeBoards := FreezeLayer("CdcCalColumnStand")
CdcCalColumn2_Script := stack(MakeCalColLayer, MainCoagCalCol, MainChlorCalCol, CHT1, CHT2, FreezeCalCol, MakeCapsLayer, CoagTopCap, CoagBottomCap, ChlorTopCap, ChlorBottomCap, FreezeCapsLayer, DrawCoagCylinder, DrawChlorCylinder, LayCylinder, MakeHole, LayStand, MakeSlantBoard, MakeVertBoard, MakeHorizBoard, FreezeBoards)
CdcCalColumn1_Script := stack(MakeCalColLayer, MainChlorCalCol, CHT1, FreezeCalCol, MakeCapsLayer, ChlorTopCap, ChlorBottomCap, FreezeCapsLayer, DrawChlorCylinder, CHT2, LayCylinder, MakeHole, LayStand, MakeSlantBoard, MakeVertBoard, MakeHorizBoard, FreezeBoards)
AC_Cdc2 := stack(Cdc2_Script, Dosing_Script, Manifold_Script, CdcCalColumn2_Script)
AC_Cdc1 := stack(Cdc1_Script, Dosing_Script, Manifold_Script, CdcCalColumn1_Script)
AC_Cdc := AC_Cdc2
LeverArmHelp := stack(EtTankScript, LeverArmCHT2_Script)
Drawing := stack(EtTankScript, AC_Cdc, AC_ChemTanks)
AltDrawing := stack(EtTankScript, AC_Cdc1, AC_ChemTanks)
# [component: inputs Drawing]
# [component: inputs LeverArmHelp]
