Q_Plant := 5*L/s
# [reference: ExpertInputs.xmcd]
# [reference: MathFunctions.xmcd]
# [reference: PipeDatabase.xmcd]
# [reference: MaterialsDatabase.xmcd]
# [reference: FluidsFunctions.xmcd]
# [reference: CdcFunctions.xmcd]
# [reference: SedTankFunctions.xmcd]
# [reference: SedimentationTank.xmcd]
# [reference: LFOM.xmcd]
# [reference: EntranceTankFlocculatorLow2 abh35.xmcd]
# Low Flow Stacked Rapid Sand Filter
# adapted for a 20" ND filter pipe by Jon Christensen on 3/15/15
# Dimensions and Pipe Sizes
PS_FiDefault := SDR26
PS_FiMan := Sch40
N_FiManBranch := 5  # number of branches on either side
N_FiInletPipes := 4
ND_FiPipe := 24 in
ND_FiManTrunkMin := 2 in
N_FiOutletPipes := 3
ND_BallValve := 3 in
ND_FiManBranchMin := 1 in
ND_BedTester := 1/2*in
ND_BedTesterOuter := 1 in
H_FiCap := 3/8*in
H_Shimstock := 1.5 in = 3.81 cm
ND_FiAirRelValve := 1/2*in
H_Gasket := H_Shimstock + 2 cm = 5.81 cm
T_Gasket := 6 mm
A_Fi := π*innerdiameter(ND_FiPipe, PS_FiDefault)^2/4
L_FiBallValve := .1625 m
L_FiOuterBulkFitting := .0368 m
# Layer Thickness as Function of Trunk Diameter
# round up to the nearest cm to make construction easier
H_FiLayerF(ND_Trunk) := max(H_FiLayerMin, Ceil(outerdiameter(ND_Trunk) + S_FiTrunkMin, 1 cm), Ceil(OuterDiameterFittingPVC(ND_Trunk), 1 cm), Ceil(FerncoOuterDiameter(ND_Trunk), 1 cm))
H_FiBottomLayerF(ND_Trunk, ND_BwTrunk) := max(H_FiLayerMin, Ceil(outerradius(ND_Trunk) + outerradius(ND_BwTrunk) + S_FiTrunkMin, 1 cm), Ceil(ConRadius(ND_Trunk) + ConRadius(ND_BwTrunk), 1 cm), Ceil(FerncoOuterDiameter(ND_Trunk)/2 + FerncoOuterDiameter(ND_BwTrunk)/2, 1 cm))
# Flow Distribution Constraints: Ratio of Pressure Recovery to Clean Bed Head Loss
# There are three flow distribution problems in the filter design: distribution between the slots along a manifold branch, distribution between branches along a trunk, and distribution between filter layers. The first two are both addressed by making pressure recovery in the manifold (both trunks and branches) small relative to the short path head loss (head loss through the clean bed, since slot head loss in forward filtration is small). In backwash mode where there is no bed head loss, the pressure recovery in the manifold plumbing must be small relative to slot head loss.
#
# Head loss through the inlet and outlet plumbing differs for different layers both because the number of elbows varies and because the top and bottom inlets have 1/2 the flow of the middle two. Therefore good flow distribution between layers would be addressed by making head loss through the inlet and outlet plumbing small for all layers relative to clean bed head loss. We do not have an explicit constraint set for this, but the constraint on trunk diameter which gives good flow distribution within the manifolds seems to be sufficient to take care of it. As a check, see the analysis under the section "Path Head Loss Calculations and Flow Distribution Between Layers" below.
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Pi_FiManifoldQ := 0.85  # Ratio of long path flow to short path flow
Pi_FiManifoldHeadLoss := 1 - Pi_FiManifoldQ^2 = 0.2775
# Ratio of pressure recovery in the slotted pipes to the head loss through the clean bed (or through the slots in backwash mode)
# Even though the piezometric head profiles for the inlet and outlet manifolds on the middle layers may be parallel meaning that pressure recovery there need not be small for good distribution between sand bed flow paths, we still need pressure recovery to be small in the outlet manifolds in order to get good flow distribution in the top and bottom layers where the velocity in the manifolds is 1/2 and the pressure recovery 1/4 that of other layers (even smaller in the larger-diameter bottom manifold where velocity head is tiny).
# Number of Filters, Layer Thickness
H_FiLayer := H_FiLayerF(ND_FiManTrunkMin) = 20 cm
Q_FiMax := V_FiBw*A_Fi = 2.70827 L/s
N_Fi := ceil(Q_Plant/Q_FiMax) = 2
# We will have one filter up until the plant flow is the maximum for the filter pipe size, after which we will multiply the filter as needed
N_Fi := 2
# Flow Rate Calculations
Q_Fi := Q_Plant/N_Fi = 2.5 L/s  # The flow will be divided evenly between the N_Fi = 2 filters.
A_FiActive := A_Fi = 0.246206 m^2
Q_FiLayer := Q_Fi/N_FiLayer = 0.416667 L/s  # This is the flow rate through each filter layer
# Clean Bed Head Loss and Maximum Manifold Velocity, Backwash Trunk Diameter
# Filtration manifold maximum velocity
HL_FiCleanLayer := h_lKozeny(H_FiLayer, D_FiSand60, Q_FiLayer/A_Fi, ε_FiSand, Nu_Water) = 5.13436 cm
PR_FiManifoldMax := HL_FiCleanLayer*Pi_FiManifoldHeadLoss
V_FiBranchMaxPR := sqrt(2*g*PR_FiManifoldMax) = 0.528628 m/s
# this is the max velocity through a slotted pipe to ensure the headloss is much smaller than that through a sand layer
# Backwash manifold maximum velocity
HL_FiBwSlotsEst := 5 cm
PR_FiBwManifoldMax := HL_FiBwSlotsEst*Pi_FiManifoldHeadLoss
V_FiBwManMaxPR := sqrt(2*g*PR_FiBwManifoldMax) = 0.521665 m/s
ND_FiBwTrunk := NominalDiameter(CeilNearest(D_circle(Q_Fi/V_FiBwManMaxPR), AvailPipeSizes(PS_Default)[:, 0]), PS_Default) = 3 in
# Backwash Manifold Design and Slot Area
A_FiTrunkMin := Q_Fi/V_FiBwManMaxPR  # max flow rate through any given trunk (backwash limited)
# max flow rate through any branch (filtration limited)
A_FiBranchMin := 1/3*Q_Fi/(2*N_FiManBranch*V_FiBranchMaxPR) = 0.000157641 m^2
# 1/3 is the division of flow through one manifold (top and bottom entrances only receive 1/2 flow)
# N.FiManBranch is the number of branches on a single side!
ND_FiManTrunk := max(NominalDiameter(CeilNearest(D_circle(A_FiTrunkMin), AvailPipeSizes(PS_FiBranch)[:, 0]), PS_FiBranch), ND_FiManTrunkMin) = 4 in
# keep all trunk sizes the same, should also be suffiicient for filtration
ND_FiManBranch := max(NominalDiameter(CeilNearest(D_circle(A_FiBranchMin), AvailPipeSizes(PS_FiBranch)[:, 0]), PS_FiBranch), ND_FiManBranchMin) = 1 in
Q_FiBwManBranch := Q_Fi/(2*N_FiManBranch)
PR_FiBwManBranch := (Q_FiBwManBranch/(π*innerdiameter(ND_FiManBranch, PS_FiBranch)^2/4))^2/(2*g)
HL_FiBwSlot := PR_FiBwManBranch/Pi_FiManifoldHeadLoss
A_FiBwManSlots := A_orifice(HL_FiBwSlot, Pi_VenaContractaOrifice, Q_Fi)
A_FiManSlots := 2*A_FiBwManSlots
A_FiTopManSlots := A_FiBwManSlots
HL_FiBwSlotForward := h_orifice(D_circle(A_FiBwManSlots*ε_FiSand), Pi_VenaContractaOrifice, Q_FiLayer) = 0.0064125 m
HL_FiSlot := (2*Q_FiLayer/(Pi_VenaContractaOrifice*A_FiManSlots*ε_FiSand))^2/(2*g) = 0.64125 cm
# Head Loss Constraint Check
PR_FiBwManTrunk := (Q_Fi/(innerdiameter(ND_FiManTrunk, PS_FiBranch)^2*π/4))^2/(2*g) = 4.72411 mm
Pi_BwHLActual := PR_FiBwManTrunk/HL_FiBwSlot = 0.1279
PR_FiManBranch := (1/3*Q_Fi/(2*N_FiManBranch)/(innerdiameter(ND_FiManBranch, PS_FiBranch)^2*π/4))^2/(2*g) = 0.113886 cm
Pi_FiHLActual := PR_FiManBranch/HL_FiCleanLayer = 0.0221811
# Entrance Box Air Elevator Spacing
S_FiEntranceBaffle := ((Q_Fi/T_ChannelWall)^2/g)^(1/3) = 3.04831 cm  # Space between the entrance box wall and the baffle
S_FiBaffleToBlock := ((Q_Fi/T_ChannelWall)^2/g)^(1/3) = 3.04831 cm
# Entrance and Exit Box Dimensions
ND_FiBypass := D_pipeschedule(Q_Train, PS_FiDefault, 20 cm, 0.5 m, Nu_Water, E_Pvc, K_PipeEnt + K_El90 + K_PipeExit)
ND_DistPipe := D_pipeschedule(Q_Train, PS_FiDefault, 1.5 m, 100 m, Nu_Water, E_Pvc, K_PipeEnt + 3*K_El90 + K_PipeExit)
ND_FiInletChannelDrain := D_pipeschedule(Q_Train, PS_FiDefault, 1.5 m, 0.5 m, Nu_Water, E_Pvc, K_PipeEnt + K_El90 + K_PipeExit)
ND_FiEntBoxDrain := D_pipeschedule(Q_Fi, PS_FiDefault, 1.5 m, 0.5 m, Nu_Water, E_Pvc, K_PipeEnt + K_El90 + K_PipeExit)
ND_FiExitBoxDrain := D_pipeschedule(Q_Fi, PS_FiDefault, 1.5 m, 0.5 m, Nu_Water, E_Pvc, K_PipeEnt + K_El90 + K_PipeExit)
ND_FiBypassDrain := D_pipeschedule(Q_Train, PS_FiDefault, 1.5 m, 0.5 m, Nu_Water, E_Pvc, K_PipeEnt + K_El90 + K_PipeExit)
L_FiEntBox := 2*ConRadius(ND_FiEntBoxDrain) + 14*ConRadius(ND_FiManTrunk) + 9*S_Fitting = 1.40726 m
L_FiExitBox := L_FiEntBox
W_FiEntBox := T_PlantWall + S_Fitting + S_FiEntranceBaffle + S_FiBaffleToBlock + 2*ConRadius(max(ND_FiEntBoxDrain, ND_FiManTrunk)) + 2*S_Fitting = 0.489554 m
W_FiExitBox := 2*ConRadius(max(ND_FiExitBoxDrain, ND_FiManTrunk, ND_DistPipe)) + 2*S_Fitting = 0.228587 m
L_FiDistBox := 2*ConRadius(max(ND_DistPipe, ND_FiBypassDrain)) + 2*S_Fitting = 0.228587 m
L_FiInletChannel := N_Fi*L_FiEntBox + (N_Fi - 1)*(L_FiDistBox + 2*T_PlantWall)
W_FiInletChannel := max(W_ChannelMin, 2*ConRadius(ND_FiInletChannelDrain) + 2*S_Fitting, 2*SocketDepth(ND_SedLaunder) + ElbowRadius(ND_SedLaunder) + ConRadius(ND_SedLaunder)) = 0.335744 m
S_BoxWallToFiPipe := 30 cm
W_FiInletChannelMin := 15 cm
H_FiInletChannel := Z_FiTop - Z_FiInletChannelBottom
HW_FiInletChannel := ZW_FiInletChannel - Z_FiInletChannelBottom
HL_FiInletChannel =  # error: This variable is undefined.
# Pi_QFi should be in expert inputs. This is the ratio of flow through two filters based on head loss in the inlet channel and flow over the weirs into each filter.
Pi_QFi := 0.97
HL_FiInletChannel := Headloss_weir(Q_Fi, L_FiEntranceWeir) - Headloss_weir(Q_Fi*Pi_QFi, L_FiEntranceWeir)  # This shouldn't be redefined here.
W_FiInletChannelFlowDist := W_HorizChannel(Q_Plant, HW_FiInletChannel, HL_FiInletChannel, L_FiInletChannel, Nu_Water, E_Concrete, 0)
W_FiInletChannel := max(W_FiInletChannelFlowDist, W_FiInletChannelMin)
# This weir is the width of the filter inlet box.
W_FiEntrance =  # error
L_FiEntranceWeir =  # error
HL_FiEntranceWeir =  # error
Pi_QFiBw := 0.8
# The water level in the filter inlet channel will vary at most by HL_FiEntranceWeir =as the plant flow rate varies. If there are two filters and the flow rate drops to 50% of design then the water level in the inlet channel will drop  that amount when a filter is backwashed (if the backwashed filter gets its target flow rate) and the entrance weir is removed for the backwashed filter. We won't require the backwash flow rate to be the design flow rate. We'd like the backwash flow rate to be Pi_QFiBw = 0.8 of design flow in that case.
# If Pi_QFiBw = 0.8of the filter flow is going to the backwashing filter then 1 - Pi_QFiBw of the flow is going across the Filtration flow control weir of the other filter. Use that to find the actual water elevation in the inlet channel.
HL_FiEntranceWeirPi.QFiBw := Headloss_weir(Q_Fi*(1 - Pi_QFiBw), L_FiEntranceWeir)  # Water level is this high above the Filtration flow control weir.
# Now find the required height of the backwash flow control weir to get our target Pi_QFiBw
HL_FiBwFlowControl := (HL_FiEntranceWeir - HL_FiEntranceWeirPi.QFiBw)/(1 - Pi_QFiBw^(2/3))
# HL_FiBFlowControl is measured from the height of the water in the inlet channel during design flow and filtration mode.
Z_FiBwFlowControl := ZW_FiInletChannel - HL_FiBwFlowControl  # This is the elevation of the bottom of the backwash flow control weir.
W_FiBwFlowControl := W_rectweir(Q_Fi, HL_FiBwFlowControl)  # This is the backwash flow control weir. This
W_FiBwGate := W_FiBwFlowControl
# This equation is included to define W.FiBwGate since that was the variable that was previously used. This variable should now be removed from the design and drawing code.
H_FiBwGate =  # error  # This is currently defined in Expert inputs. It needs to be removed from expert inputs and from the drawing code.
# There should be freefall downstream from the backwash flow control weir so that Q_Fi is unaffected by the flow control weir during filtration mode. However, this much change in water elevation will force the filters to be even deeper. So now the goal is to see what happens if we don't require freefall from the backwash flow control weir at the end of a filtration cycle when the filter head loss is high. How much is flow through a filter decreased if the water level downstream of the backwash flow control weir is H.weirsubmerged above the bottom of the weir? This will cause a filter that is clogging to begin filtering less than its share of the plant flow.
H_FiBwFlowControlFreefall := 10 cm
# Here we are submerging all but 10 cm of the backwash flow control weir. This means that the overflow weir that dumps water when a filter has too much head loss would be 10 cm below the design flow water surface in the inlet channel
# Now calculate the flow through the backwash flow control weir that is partly a weir with free fall and partly submerged and acting like an orifice.
(Q_RectWeir(H_FiBwFlowControlFreefall, W_FiBwFlowControl) + (HL_FiBwFlowControl - H_FiBwFlowControlFreefall)*W_FiBwFlowControl*Pi_VenaContractaOrifice*sqrt(2*g*H_FiBwFlowControlFreefall))/Q_Fi =  # error
# The ratio calculated above is the fraction of the design flow through a filter that has so much head loss that the water level is only 10 cm below the design flow water surface in the inlet channel. This shows that even with significant submergence the flow through the filter doesn't decrease much. Thus we can get away with
# Monroe thinks H_FiWeirFreefall needs to be increased to H_FiBwFlowControlFreefall = 10 cm if we add the backwash flow control weir. H_FiWeirFreefall is defined in expert inputs. Note that this freefall is defined for the backwash flow control weir when it is operating in filtration mode. In backwash mode their will be plenty of freefall because the water level in the filter entrance tank is much lower during backwash.
# Manifold Pipe Lengths
S_Cap(ND) := CapHeight(ND) - SocketDepth(ND)
L_FiManTrunk := sqrt(innerdiameter(ND_FiPipe, PS_FiDefault)^2 - (2*ConRadius(ND_FiManTrunk))^2) - S_Cap(ND_FiManTrunk) - T_Flange
# Assuming trunk will have a male adpater whose threading feeds through the filter wall.
L_FiManCapOffset := innerR(ND_FiPipe, PS_FiDefault) - ConRadius(ND_FiManBranch)/tan(asin(2*ConRadius(ND_FiManBranch)/innerdiameter(ND_FiPipe, PS_FiDefault))) = 0.070419 cm
S_FiBranchFromWall := max(T_Flange + SocketDepth(ND_FiManTrunk), innerdiameter(ND_FiPipe, PS_FiDefault) - T_Flange - L_FiManTrunk + SocketDepth(ND_FiManTrunk)) + outerradius(ND_FiManBranch)
B_FiManBranch := 2*(innerR(ND_FiPipe, PS_FiDefault) - S_FiBranchFromWall)/(N_FiManBranch - 1) = 8.44523 cm
L_FiManBranch :=
    for i ∈ 0 .. N_FiManBranch - 1
        L[i] ←
            innerR(ND_FiPipe, PS_FiDefault)*sin(acos((innerR(ND_FiPipe, PS_FiDefault) - S_FiBranchFromWall - B_FiManBranch*i + ConRadius(ND_FiManBranch))/innerR(ND_FiPipe, PS_FiDefault))) - outerradius(ND_FiManTrunk) - S_Cap(ND_FiManBranch) if i < N_FiManBranch/2
            innerR(ND_FiPipe, PS_FiDefault) - innerR(ND_FiManTrunk, PS_FiBranch) - L_FiManCapOffset - S_Cap(ND_FiManBranch) if i + 0.5 == N_FiManBranch/2
            L[N_FiManBranch - 1 - i] otherwise
    L
L_FiManCouplingToFernco := SocketDepth(ND_FiManTrunk) + S_Fitting + FerncoCouplingLength(ND_FiManTrunk)/2
L_FiCheckValve := .1651 m
# Total Sand Depth, Filter Pipe Length, Head Loss
H_FiSand := N_FiLayer*H_FiLayer + outerradius(ND_FiManBranch) = 1.2167 m
H_FiSandActive := H_FiSand - outerradius(ND_FiManBranch) = 1.2 m
H_FiFluidizedBed := Pi_FiFluidized*H_FiSand = 1.58171 m
L_FiBodyPipe := H_FiFluidizedBed + H_FiFluidizedBedToSiphon + (ConRadius(ND_FiManTrunk) + S_Fitting/2) + (2*ConRadius(ND_FiBwTrunk) + S_Fitting/2) + 2*(H_Gasket - H_FiCap)
# Sand bed head loss during steady state backwash.
HL_FiBwSS := H_FiSand*(Rho_FiSand - Rho_H2O)*(1 - ε_FiSand)/Rho_H2O = 1.20453 m
# The backwash head loss is almost exactly equal  to the sand bed depth. Note that this ignores losses in the plumbing.
HL_FiDirty := 30 cm  # Mickey suggested this value based on lab experience. Don't know if this is the same for the low flow filter
HL_FiTerminal := HL_FiCleanLayer + HL_FiDirty = 35.1344 cm
HL_FiBwInitiation := HL_FiBwSF + HL_FiBwSS = 1.40453 m
# How much does the filter bed over fluidize when the entrance box level lowers after backwash initiation?
H_FiFluidizedBedVariation := (HL_FiBwInitiation - HL_FiBwSS)*(W_FiEntBox*L_FiEntBox - 4*π*(outerradius(ND_FiManTrunk)^2 + outerradius(ND_FiEntBoxDrain)^2))/A_FiActive = 52.0353 cm
HL_FiBwInletManifold := 1/3*h_f(Q_Fi, innerD(ND_FiManTrunk, PS_Default), L_FiManTrunk, Nu_Water, E_Pvc) + h_e(Q_Fi/(2*N_FiManBranch), innerD(ND_FiManBranch, PS_FiBranch), K_PipeEnt) + 2/3*h_f(Q_Fi/(2*N_FiManBranch), innerD(ND_FiManBranch, PS_FiBranch), L_FiManBranch[0], Nu_Water, E_Pvc) + 1/3*h_f(Q_Fi/(2*N_FiManBranch), innerD(ND_FiManBranch, PS_FiBranch), L_FiManBranch[1], Nu_Water, E_Pvc) + HL_FiBwSlot = 4.44215 cm
HL_FiFwdInletManifold(Q_Layer) := 1/3*h_f(2*Q_Layer, innerD(ND_FiManTrunk, PS_Default), L_FiManTrunk, Nu_Water, E_Pvc) + h_e(Q_Layer/N_FiManBranch, innerD(ND_FiManBranch, PS_FiBranch), K_PipeEnt) + 2/3*h_f(Q_Layer/N_FiManBranch, innerD(ND_FiManBranch, PS_FiBranch), L_FiManBranch[0], Nu_Water, E_Pvc) + 1/3*h_f(Q_Layer/N_FiManBranch, innerD(ND_FiManBranch, PS_FiBranch), L_FiManBranch[1], Nu_Water, E_Pvc) + HL_FiSlot
HL_FiFwdBotTopInletManifold(Q_Layer) := 1/3*h_f(Q_Layer, innerD(ND_FiManTrunk, PS_Default), L_FiManTrunk, Nu_Water, E_Pvc) + h_e(Q_Layer/(2*N_FiManBranch), innerD(ND_FiManBranch, PS_FiBranch), K_PipeEnt) + 2/3*h_f(Q_Layer/(2*N_FiManBranch), innerD(ND_FiManBranch, PS_FiBranch), L_FiManBranch[0], Nu_Water, E_Pvc) + 1/3*h_f(Q_Layer/(2*N_FiManBranch), innerD(ND_FiManBranch, PS_FiBranch), L_FiManBranch[1], Nu_Water, E_Pvc) + HL_FiSlot
HL_FiFwdOutletManifold(Q_Layer) := 1/3*h_f(2*Q_Layer, innerD(ND_FiBwTrunk, PS_Default), L_FiManTrunk, Nu_Water, E_Pvc) + h_e(Q_Layer/N_FiManBranch, innerD(ND_FiManBranch, PS_FiBranch), K_PipeExit) + 2/3*h_f(Q_Layer/N_FiManBranch, innerD(ND_FiManBranch, PS_FiBranch), L_FiManBranch[0], Nu_Water, E_Pvc) + 1/3*h_f(Q_Layer/N_FiManBranch, innerD(ND_FiManBranch, PS_FiBranch), L_FiManBranch[1], Nu_Water, E_Pvc)
L_LongestPath := L_FiBodyPipe + S_BoxWallToFiPipe = 2.39475 m
HL_FiInletPlumbing1(Q_Layer) := h_l(Q_Layer, innerD(ND_FiManTrunk, PS_Default), L_LongestPath, K_PipeEnt + K_TeeFlowBr + K_El45, Nu_Water, E_Pvc) + HL_FiFwdBotTopInletManifold(Q_Layer)
HL_FiInletPlumbing2(Q_Layer) := h_l(2*Q_Layer, innerD(ND_FiManTrunk, PS_Default), L_LongestPath, K_PipeEnt + K_TeeFlowBr + 2*K_El45, Nu_Water, E_Pvc) + HL_FiFwdInletManifold(Q_Layer)
# These are numbered from the top of the filter bed down. The top and bottom inlets have half the flow rate (only serve the layers below and above, respectively). The bottom inlet has the diameter of the backwash trunk.
HL_FiInletPlumbing3(Q_Layer) := h_l(2*Q_Layer, innerD(ND_FiManTrunk, PS_Default), L_LongestPath, K_PipeEnt + K_TeeFlowBr + 2*K_El45, Nu_Water, E_Pvc) + HL_FiFwdInletManifold(Q_Layer)
HL_FiInletPlumbing4(Q_Layer) := h_l(Q_Layer, innerD(ND_FiManTrunk, PS_Default), L_LongestPath, K_PipeEnt + K_TeeFlowBr + K_El45, Nu_Water, E_Pvc) + HL_FiFwdBotTopInletManifold(Q_Layer)
HL_FiInletPlumbingMax(Q_1, Q_2, Q_3, Q_4) := max(HL_FiInletPlumbing1(Q_1), HL_FiInletPlumbing2(Q_2), HL_FiInletPlumbing3(Q_3), HL_FiInletPlumbing4(Q_4))
HL_FiInletPlumbingMin(Q_1, Q_2, Q_3, Q_4) := min(HL_FiInletPlumbing1(Q_1), HL_FiInletPlumbing2(Q_2), HL_FiInletPlumbing3(Q_3), HL_FiInletPlumbing4(Q_4))
HL_FiInletPlumbingAve(Q_1, Q_2, Q_3, Q_4) := (HL_FiInletPlumbing1(Q_1) + HL_FiInletPlumbing2(Q_2) + HL_FiInletPlumbing3(Q_3) + HL_FiInletPlumbing4(Q_4))/4
HL_FiBwInletPlumbing := h_l(Q_Fi, innerD(ND_FiManTrunk, PS_Default), L_LongestPath, K_PipeEnt + K_TeeFlowBr + K_El45, Nu_Water, E_Pvc) + HL_FiBwInletManifold = 5.86689 cm
HL_FiOutletPlumbing1(Q_Layer) := h_l(2*Q_Layer, innerD(ND_FiManTrunk, PS_Default), L_LongestPath, K_El45 + K_TeeFlowBr + K_PipeExit, Nu_Water, E_Pvc) + HL_FiFwdOutletManifold(Q_Layer)
HL_FiOutletPlumbing2(Q_Layer) := h_l(2*Q_Layer, innerD(ND_FiManTrunk, PS_Default), L_LongestPath, K_TeeFlowBr + K_PipeExit, Nu_Water, E_Pvc) + HL_FiFwdOutletManifold(Q_Layer)
HL_FiOutletPlumbing3(Q_Layer) := h_l(2*Q_Layer, innerD(ND_FiManTrunk, PS_Default), L_LongestPath, K_El45 + K_TeeFlowBr + K_PipeExit, Nu_Water, E_Pvc) + HL_FiFwdOutletManifold(Q_Layer)
HL_FiOutletPlumbingMax(Q_1, Q_3) := max(HL_FiOutletPlumbing1(Q_1), HL_FiOutletPlumbing2(Q_1), HL_FiOutletPlumbing3(Q_3))
HL_FiOutletPlumbingMin(Q_1, Q_3) := min(HL_FiOutletPlumbing1(Q_1), HL_FiOutletPlumbing2(Q_1), HL_FiOutletPlumbing3(Q_3))
HL_FiOutletPlumbingAve(Q_1, Q_3) := (HL_FiOutletPlumbing1(Q_1) + HL_FiOutletPlumbing2(Q_1) + HL_FiOutletPlumbing3(Q_3))/3
# Plumbing Head Loss
# Path Head Loss Calculations and Flow Distribution Between Layers
HL_FiCleanLyr(Q) := h_lKozeny(H_FiLayer, D_FiSand60, Q/A_FiActive, ε_FiSand, Nu_Water)
HL_FiPathClean1(Q_Path) := HL_FiInletPlumbing1(Q_Path) + HL_FiCleanLyr(Q_Path) + HL_FiOutletPlumbing1(Q_Path)
HL_FiPathClean2(Q_Path) := HL_FiInletPlumbing2(Q_Path) + HL_FiCleanLyr(Q_Path) + HL_FiOutletPlumbing1(Q_Path)
HL_FiPathClean3(Q_Path) := HL_FiInletPlumbing2(Q_Path) + HL_FiCleanLyr(Q_Path) + HL_FiOutletPlumbing2(Q_Path)
HL_FiPathClean4(Q_Path) := HL_FiInletPlumbing3(Q_Path) + HL_FiCleanLyr(Q_Path) + HL_FiOutletPlumbing2(Q_Path)
HL_FiPathClean5(Q_Path) := HL_FiInletPlumbing3(Q_Path) + HL_FiCleanLyr(Q_Path) + HL_FiOutletPlumbing3(Q_Path)
HL_FiPathClean6(Q_Path) := HL_FiInletPlumbing4(Q_Path) + HL_FiCleanLyr(Q_Path) + HL_FiOutletPlumbing3(Q_Path)
HL_FiPathCleanMax(Q_1, Q_2, Q_3, Q_4, Q_5, Q_6) := max(HL_FiPathClean1(Q_1), HL_FiPathClean2(Q_2), HL_FiPathClean3(Q_3), HL_FiPathClean4(Q_4), HL_FiPathClean5(Q_5), HL_FiPathClean6(Q_6))
HL_FiPathCleanMin(Q_1, Q_2, Q_3, Q_4, Q_5, Q_6) := min(HL_FiPathClean1(Q_1), HL_FiPathClean2(Q_2), HL_FiPathClean3(Q_3), HL_FiPathClean4(Q_4), HL_FiPathClean5(Q_5), HL_FiPathClean6(Q_6))
# In reality the flow will distribute itself such that all paths have the same head loss. We will treat the average of all of the calculated path head losses as the actual complete head loss accross all paths.
HL_FiPathCleanAve(Q_1, Q_2, Q_3, Q_4, Q_5, Q_6) := (HL_FiPathClean1(Q_1) + HL_FiPathClean2(Q_2) + HL_FiPathClean3(Q_3) + HL_FiPathClean4(Q_4) + HL_FiPathClean5(Q_5) + HL_FiPathClean6(Q_6))/6
Pi_QFiLayer(Q_1, Q_2, Q_3, Q_4, Q_5, Q_6) := sqrt(HL_FiPathCleanMin(Q_1, Q_2, Q_3, Q_4, Q_5, Q_6)/HL_FiPathCleanMax(Q_1, Q_2, Q_3, Q_4, Q_5, Q_6))
# This estimate is reasonable as long as the answer is close to 1
# Guess:
Q_1 := Q_FiLayer
Q_2 := Q_FiLayer
Q_3 := Q_FiLayer
Q_4 := Q_FiLayer
Q_5 := Q_FiLayer
Q_6 := Q_FiLayer
Given
HL_FiPathClean1(Q_1) == HL_FiPathClean2(Q_2)
HL_FiPathClean2(Q_2) == HL_FiPathClean3(Q_3)
Q_1 + Q_2 + Q_3 + Q_4 + Q_5 + Q_6 == Q_Fi
HL_FiPathClean3(Q_3) == HL_FiPathClean4(Q_4)
HL_FiPathClean4(Q_4) == HL_FiPathClean5(Q_5)
HL_FiPathClean5(Q_5) == HL_FiPathClean6(Q_6)
HL_FiPath(Q) := Find(Q_1, Q_2, Q_3, Q_4, Q_5, Q_6)
Q_FiPath := HL_FiPath(Q_Fi) = [0.425934; 0.411346; 0.41272; 0.41272; 0.411346; 0.425934] L/s
HL_FiPathClean1(Q_FiPath[0]) = 6.31193 cm
Q_FiLayer1 := Q_FiPath[0]
HL_FiPathClean2(Q_FiPath[1]) = 6.31193 cm
Q_FiLayer2 := Q_FiPath[1]
HL_FiPathClean3(Q_FiPath[2]) = 6.31193 cm
Q_FiLayer3 := Q_FiPath[2]
HL_FiCleanPath := HL_FiPathClean1(Q_FiPath[0])
HL_FiPathClean4(Q_FiPath[3]) = 6.31193 cm
Q_FiLayer4 := Q_FiPath[3]
HL_FiPathClean5(Q_FiPath[4]) = 6.31193 cm
Q_FiLayer5 := Q_FiPath[4]
HL_FiPathClean6(Q_FiPath[5]) = 6.31193 cm
Q_FiLayer6 := Q_FiPath[5]
# Slotted Pipe Design
L_FiManBranchAvail := 2*(sum(L_FiManBranch) - N_FiManBranch*(SocketDepth(ND_FiManBranch) + 2*L_FiManBranchExt)) = 42.0591 in
# This is the total length of branch manifold available on a trunk (i.e., the length available for slots on 2*N.FiManBranch)
L_FiBwManSlotTotal := A_FiBwManSlots/W_FiManSlots = 22.9443 m
L_FiManSlotTotal := A_FiManSlots/W_FiManSlots = 45.8887 m
L_FiTopManSlotTotal := A_FiTopManSlots/W_FiManSlots = 22.9443 m
# We select  B_FiManSlot := 1/16*in = 1.5875 mm  for the closest slot spacing, and N_FiSlotRows := 2  for best structural integrity of these pipes
# We select  B_FiBwTopManSlot := 1/8*in = 3.175 mm  for the closest slot spacing, and N_FiBwSlotRows := 2  for best structural integrity of these pipes
N_FiManSlotsPerBranch := floor((L_FiManBranch - 2*L_FiManBranchExt - SocketDepth(ND_FiManBranch))/B_FiManSlot) = [44; 77; 93; 77; 44]
N_FiBwTopManSlotsPerBranch := floor((L_FiManBranch - 2*L_FiManBranchExt - SocketDepth(ND_FiManBranch))/B_FiBwTopManSlot) = [22; 38; 46; 38; 22]
N_FiSlotsPerMan := 2*N_FiSlotRows*sum(N_FiManSlotsPerBranch) = 1340
N_FiBwTopSlotsPerMan := 2*N_FiBwSlotRows*sum(N_FiBwTopManSlotsPerBranch) = 664
L_FiManSlotCurvedInner := L_FiManSlotTotal/N_FiSlotsPerMan = 3.42453 cm  # Check against available circumference:
C_FiManBranchInner := π*innerdiameter(ND_FiManBranch, PS_FiBranch) = 8.37065 cm
L_FiBwTopManSlotCurvedInner := L_FiBwManSlotTotal/N_FiBwTopSlotsPerMan = 3.45547 cm
L_FiManSlotInner := 2*innerdiameter(ND_FiManBranch, PS_FiBranch)/2*sin(2*π*L_FiManSlotCurvedInner/C_FiManBranchInner/2) = 2.55658 cm
L_FiBwTopManSlotInner := 2*innerdiameter(ND_FiManBranch, PS_FiBranch)/2*sin(2*π*L_FiBwTopManSlotCurvedInner/C_FiManBranchInner/2) = 2.56512 cm
H_FiManCenterToSlot := sqrt((innerdiameter(ND_FiManBranch, PS_FiBranch)/2)^2 - (L_FiManSlotInner/2)^2) = 0.37525 cm
H_FiBwTopManCenterToSlot := sqrt((innerdiameter(ND_FiManBranch, PS_FiBranch)/2)^2 - (L_FiBwTopManSlotInner/2)^2) = 0.360379 cm
L_FiManSlotOuter := 2*sqrt(outerradius(ND_FiManBranch)^2 - H_FiManCenterToSlot^2) = 3.25469 cm
L_FiBwTopManSlotOuter := 2*sqrt(outerradius(ND_FiManBranch)^2 - H_FiBwTopManCenterToSlot^2) = 3.26141 cm
H_FiSlot := outerradius(ND_FiManBranch) - H_FiManCenterToSlot = 1.2948 cm
H_FiBwSlot := outerradius(ND_FiManBranch) - H_FiBwTopManCenterToSlot = 1.30967 cm
N_FiManBranchTotal := N_Fi*(N_FiLayer - 1)*N_FiManBranch = 50
N_FiBwTopManBranchTotal := 2*N_Fi*N_FiManBranch = 20
# SPECIFICATIONS:  we need  N_FiManBranchTotal = 50 pipes of diameter  ND_FiManBranch = 1 in  with slots of width  W_FiManSlots = 0.2032 mm,straight length L_FiManSlotOuter = 3.25469 cm, and a spacing of B_FiManSlot = 0.0625 in
# SPECIFICATIONS:  we need  N_FiBwTopManBranchTotal = 20 pipes of diameter  ND_FiManBranch = 1 in, with slots of width W_FiManSlots = 0.2032 mm, straight length L_FiBwTopManSlotOuter = 3.26141 cm  and a spacing of  B_FiBwTopManSlot = 0.125 in
P_FiManBranches := N_FiManBranchTotal*L_FiManBranch*(9*USD/(5 ft)) = [40.4257; 56.0891; 63.6095; 56.0891; 40.4257] USD
P_FiBwManBranches := N_FiBwTopManBranchTotal*L_FiManBranch*(12*USD/(5 ft)) = [21.5604; 29.9142; 33.9251; 29.9142; 21.5604] USD
Radius_Trunk := innerdiameter(ND_FiManTrunk, 2)/2 = 51.1302 mm
Chord_TrunkPerpendicular := outerdiameter(ND_FiManBranch) = 3.3401 cm
Chord_TrunkHorizontal := (Radius_Trunk*cos(asin(Chord_TrunkPerpendicular/2/Radius_Trunk))) = 4.83259 cm
L_SlotCut := floor(Chord_TrunkHorizontal*2/B_FiManSlot)*B_FiManSlot + W_FiManSlots = 95.4532 mm
# Siphon Design
L_FiSiphonEst := L_FiBodyPipe + 5*S_Fitting = 2.34475 m
K_FiSiphon := K_PipeEnt + K_TeeFlowBr + 2*K_El90 + K_PipeExit = 5.1  # Minor loss coefficients for flow through the siphon. The tee is treated as an extra elbow
# Siphon has to handle the entire flow into the filter plus drain the terminal head in Ti.FiBwInitiation.  This is approximately a "hole in a bucket problem" so the average flow rate is half the max flow (hence the factor of 2).  The HL sum corresponds to the height of water that needs to be drained. Use maximum head loss through the siphon for conservative estimate.
Q_FiSiphonInitiation := Q_Fi + 2*A_FiActive*(HL_FiBwSF + H_FiForwardNoSuckAir + HL_FiDirty + HL_FiBwInletPlumbing + HL_FiBwSS + HL_FiSiphonMax - H_FiSiphonNoSuckAir)/Ti_FiBwInitiationBod = 7.87058 L/s
HL_FiSiphonInitiationMax := HL_FiBwSF + H_FiForwardNoSuckAir + HL_FiDirty + HL_FiBwInletPlumbing + HL_FiBwSS + HL_FiSiphonMax - H_FiSiphonNoSuckAir = 1.9632 m
HL_FiSiphonPipe := h_l(Q_Fi, innerdiameter(ND_FiBwTrunk, PS_Default), L_FiSiphonEst, K_FiSiphon, Nu_Water, E_Pvc) = 6.84429 cm
HL_FiSiphonOutlet := Headloss_weir(Q_Fi, innerD(ND_FiBwTrunk, PS_Default)) = 6.47716 cm
HL_FiSiphonOrifice := h_orifice(innerdiameter(ND_FiBwTrunk, PS_Default), Pi_VenaContractaOrifice, Q_Fi) = 2.94519 cm
HL_FiBwTotalSS := HL_FiBwInletPlumbing + HL_FiBwSS + HL_FiSiphonOrifice + HL_FiSiphonPipe + HL_FiSiphonOutlet = 1.42587 m
Rho_FiFluidized := Rho_H2O*ε_FiSand*Pi_FiFluidized + Rho_FiSand*(1 - ε_FiSand)/Pi_FiFluidized = 1743.08 kg/m^3
# Elevations
HL_FiEntPipe := h_l(Q_Plant, innerdiameter(ND_SedLaunder, PS_Default), W_Sed/2 + T_PlantWall, K_El90 + K_PipeExit, Nu_Water, E_Pvc)  # (not used)
Z_FiEntWeir := Z_SedLaunder + outerradius(ND_SedLaunder)
HL_FiEntWeir := Headloss_weir(Q_Fi, L_FiEntBox) = 0.969825 cm
ZW_FiInletChannel := Z_FiEntWeir + HL_FiEntWeir = 1.50289 m
ZW_FiEntMax := Z_FiEntWeir - H_FiWeirFreefall
Z_FiInletDrain := ZW_FiEntMax
HL_FiOverflowWeir := Headloss_weir(Q_Fi, W_FiEntBox - S_Fitting) = 2.1067 cm
ZW_FiEntTerminal := ZW_FiEntMax - HL_FiOverflowWeir = 1.44213 m
Z_FiOverflowWeir := ZW_FiEntTerminal = 1.44213 m
ZW_FiEntCleanForward := ZW_FiEntTerminal - HL_FiDirty
H_FiExitWeir := 5 cm
HL_FiExitWeir := Headloss_weir(Q_Fi/N_Fi, W_FiExitBox) = 2.05221 cm
Z_FiEntTank := ZW_FiEntCleanForward - HL_FiCleanPath - HL_FiExitWeir - H_FiExitWeir = 1.00849 m
H_FiInletFreeboard := 5 cm
H_FiEntTank := ZW_FiInletChannel + H_FiInletFreeboard - Z_FiEntTank = 0.544407 m
Z_FiEntChannel := Z_FiEntTank
Z_FiExitTank := Z_FiEntTank
ZW_FiEntBwSS := Z_FiEntTank + H_FiBwNoSuckAir
Z_FiSiphonOutlet := ZW_FiEntBwSS - HL_FiBwTotalSS = -0.217382 m
Z_FiTop := Z_FiEntTank - ChkValveLength(ND_FiAirRelValve) - H_FiCap
Z_FiBwPipe := Z_FiTop - S_Fitting/2 - 2*ConRadius(ND_FiBwTrunk) - (H_Gasket - H_FiCap)
S_FiInlet4 := ConRadius(ND_FiManTrunk) + S_Fitting/2 + (H_Gasket - H_FiCap) = 0.137869 m
Z_FiBottom := Z_FiBwPipe - H_FiFluidizedBedToSiphon - H_FiFluidizedBed - S_FiInlet4
Z_FiInlet4 := Z_FiBottom + S_FiInlet4
Z_FiInlet3 := Z_FiInlet4 + 2*H_FiLayer
Z_FiOutlet3 := Z_FiInlet4 + H_FiLayer
Z_FiInlet2 := Z_FiInlet3 + 2*H_FiLayer
Z_FiOutlet2 := Z_FiOutlet3 + 2*H_FiLayer
Z_FiInlet1 := Z_FiInlet2 + 2*H_FiLayer
Z_FiOutlet1 := Z_FiOutlet2 + 2*H_FiLayer
# Main Plant Drain Channel
# To calculate the maximum possible flow through the drain channel, all tanks are assumed to be initially full and emptying in the same time
# Note that the tank heights are used instead of the water levels in the calculation of maximum flow to have a conservative design.
W_PlantDC := 1 m
Q_TankDrainMax := Q_pipeminor(innerdiameter(ND_EtDrain, PS_Default), H_Et, K_PipeEnt + K_PipeExit)*2 + Q_pipeminor(innerdiameter(ND_FlocValve, PS_Default), H_Floc, K_PipeEnt + K_PipeExit)*1 + Q_pipeminor(innerdiameter(ND_SedSludgePipe, PS_Default), HW_Sed, K_PipeEnt + K_PipeExit)*N_SedBays*N_SedTanks
Q_PlantDCMax := Q_TankDrainMax + N_Fi*(1 + N_Fi > 1)*Q_Fi = L/s
H_DrainChannelMax := 1 m
L_PlantDC := W_Sed + 4*T_PlantWall + L_Floc + W_Et + W_HumanMin + W_FiInletChannel + 2*T_SedWeir
ND_PlantDC := NominalDiameter(D_PipeTotal(Q_PlantDCMax, H_DrainChannelMax, L_PlantDC, Nu_Water, E_Concrete, K_PipeEnt + K_PipeExit), PS_Default)
ND_PlantSideDC := NominalDiameter(D_PipeTotal(N_Fi*(1 + N_Fi > 1)*Q_Fi, H_DrainChannelMax, L_PlantDC, Nu_Water, E_Concrete, K_PipeEnt + K_PipeExit), PS_Default)
Z_PlantDCBottom := Z_FiBottom - H_DrainChannelMax = -2.13542 m
