Q_Plant := 4*L/s
# [reference: ExpertInputs.xmcd]
# [reference: MathFunctions.xmcd]
# [reference: PipeDatabase.xmcd]
# [reference: MaterialsDatabase.xmcd]
W_SedPlate := 106 cm
# [reference: FluidsFunctions.xmcd]
# [reference: CdcFunctions.xmcd]
# [reference: SedTankFunctions.xmcd]
# [reference: SedimentationTank.xmcd]
T_FlocSlab := 12 cm
# [reference: LFOM.xmcd]
L_Sed = 4.27413 m
AN_FlocSlope := atan(1 %)
S_EtPlate := S_SedPlate
ND_EtDrainLF := 2 in
# Entrance Tank
ED_FlocMax := 10*mW/kg
V_cGrit := 8*mm/s
AN_EtPlate := 50 deg
W_Et := W_SedPlate/2 = 0.53 m
W_Floc := W_Et
N_EtPlates := ceil(sqrt(Q_Plant/((S_EtPlate + T_SedPlate)*W_Et*V_cGrit*sin(AN_EtPlate)*cos(AN_EtPlate)))) = 9
L_EtPlate := Ceil(Q_Plant/(N_EtPlates*W_Et*V_cGrit*cos(AN_EtPlate)) - S_EtPlate*tan(AN_EtPlate), 10 cm) = 20 cm
L_EtTopPlateExtension := HL_Lfom/sin(AN_EtPlate) + 5 cm = 0.311081 m
L_EtWallToLfom := max(-T_PlantWall + SocketDepth(ND_EtDrain) + ElbowRadius(ND_EtDrain), ConRadius(ND_EtDrain)) + outerradius(ND_EtDrain) + (L_EtPlate + L_EtTopPlateExtension)*cos(AN_EtPlate) + T_SedPlate*sin(AN_EtPlate) = 0.382754 m
L_EtTotal := L_EtWallToLfom + outerradius(ND_RMPipe) + ElbowRadius(ND_RMPipe) + CouplingLength(ND_RMPipe) = 0.622689 m
L_Floc := L_Sed - L_EtTotal = 3.65144 m
HL_FlocEst := 45 cm
H_FlocAveEst := Z_Sed - T_FlocSlab - L_Floc*tan(AN_FlocSlope) + HL_FlocEst = 1.97668 m
HW_FlocEst := H_FlocAveEst - H_PlantFreeboard = 1.87668 m
Vol_FlocEst := L_Floc*HW_FlocEst*W_Floc
ED_FlocAve := ED_FlocMax/2
HL_Floc := ED_FlocAve*Vol_FlocEst/(Q_Plant*g) = 46.2935 cm
# Elevations
D_RMOrifice := D_PipeED(E_MaxRM, Q_Plant, Pi_VenaContractaOrifice, Pi_JetRound) = 8.85232 cm
HL_RMMicroOrifice := h_orifice(D_RMOrifice, Pi_VenaContractaOrifice, Q_Plant) = 5.42601 cm
HL_RMPipe := h_l(Q_Plant, innerdiameter(ND_RMPipe, PS_Default), 2 m, K_El90 + K_PipeExit, Nu_Water, E_Pvc) = 2.5784 cm
ZW_FlocMax := ZW_Sed + HL_Floc = 2.01075 m
Z_FlocTop := ZW_FlocMax + H_PlantFreeboard = 2.11075 m
Z_LfomBottom := ZW_FlocMax + HL_RMMicroOrifice + HL_RMPipe + H_Freefall = 2.19079 m
ZW_EtMax := Z_LfomBottom + HL_Lfom = 2.39079 m
Z_EtTop := ZW_EtMax + H_PlantFreeboard = 2.49079 m
# Doser Elevations
ZW_CdcCht == (Z_EtTop + H_DoserAssembly)  # End of doser tube elevation at zero flow. (also fluid level in constant head tank)
ZW_CdcCht := Z_EtTop + H_DoserAssembly
Z_CdcFloatValveOrifice := ZW_CdcCht + H_CdcFloatvalve = 2.60849 m
Z_CoagulantOutlet := Z_CdcFloatValveOrifice + H_CoagTankAboveHeadTank = 2.90849 m  # This is the height of the outlet from the stock tanks
Z_CoagulantTankBottom := Z_CoagulantOutlet - B_StockOutlet = 2.80849 m  # This is the height of the coagulant stock tank base
# Coagulant Stock Tank Elevation
Z_CoagTank := Z_EtTop + H_CoagTankAboveHeadTank + H_DoserAssembly - B_StockOutlet
Z_CoagTankOutlet := Z_CoagTank + B_StockOutlet
