# Low Flow Entrance Tank and Flocculator
Pi_FlocBaffle := 1
T_FlocSlab := 12 cm
W_SedPlate := 106 cm
S_EtPlate := S_SedPlate
V_cGrit := 8*mm/s
B_EtPlate := S_EtPlate + T_SedPlate
AN_EtPlate := 50 deg
ND_EtDrainLF := 2 in
ED_FlocMaxMin := 10*mW/kg
Pi_HSOpt := 5
H_CdcFloatvalve := 3 cm
ND_FlocDrain := 2 in
H_CoagTankAboveHeadTank := 10 cm
α_ε := 2
# Entrance tank and flocculator width
W_Et := W_SedPlate/2 = 0.53 m
W_Floc := W_Et
# Entrance tank drain
ND_EtDrain := D_pipeschedule(Q_Plant, PS_Default, 2 m, 6 m, Nu_Water, E_Pvc, K_PipeEnt + K_PipeExit + 3*K_El90) = 2 in
# Plate settlers
N_EtPlates := ceil(sqrt(Q_Plant/((S_EtPlate + T_SedPlate)*W_Et*V_cGrit*sin(AN_EtPlate)))) = 7
# Number of plates that minimizes total length of the plate settler unit.
L_EtPlate := Ceil(Q_Plant/(N_EtPlates*W_Et*V_cGrit*cos(AN_EtPlate)) - S_EtPlate*tan(AN_EtPlate), 10 cm) = 20 cm
# Et and flocculator lengths
L_EtTopPlateExtension := HL_Lfom/sin(AN_EtPlate) + 5 cm = 0.311081 m
L_EtWallToPlate := ConRadius(ND_EtDrain) + S_Fitting + outerradius(ND_EtDrain) = 0.114294 m
L_EtFrontWallToLfom := L_EtWallToPlate + (L_EtPlate + L_EtTopPlateExtension)*cos(AN_EtPlate) + T_SedPlate*sin(AN_EtPlate) = 0.444343 m
L_EtBackWallToLfom := max(2*S_Fitting, ElbowRadius(ND_RMPipe) + SocketDepth(ND_RMPipe) + CouplingLength(ND_RMPipe) - T_PlantWall - outerradius(ND_RMPipe)) = 0.1 m
L_Et := L_EtFrontWallToLfom + outerdiameter(ND_RMPipe) + L_EtBackWallToLfom = 0.658643 m
L_EtSlope1 := -(ConRadius(ND_EtDrain) - outerradius(ND_EtDrain)) + N_EtPlates*B_EtPlate*sin(AN_EtPlate) + L_EtPlate*cos(AN_EtPlate) = 0.269371 m
L_EtSlope2 := L_Et - L_EtSlope1 - L_EtWallToPlate - (ConRadius(ND_EtDrain) - outerradius(ND_EtDrain)) = 0.271009 m
L_Floc := L_Sed - L_Et - T_PlantWall = 3.46549 m
# Flocculator Design
# The length of the flocculator is set by the length of the sedimentation tank and the space required for the entrance tank/grit chamber. The width of the flocculator is set by the minimum width for construction of a deep channel.
#
# Because the flocculator reactor has a fixed volume (ignoring contribution from head loss along the flocculator) which always provides excess collision potential (>70 m^2/3) with the previously used max energy dissipation rate of 10 mW/kg, we will continue to design with the max ED for the low-flow case. This energy dissipation rate has been shown to avoid sedimentation in the flocculator, and we don't want to go below it for that reason. Given that increasing the max ED will increase head loss and therefore the cost of the low-flow plant, we will design based on this minimum of 10 mW/kg and creating an efficient geometry (optimal H/S ratio).
#
# Previously, low-flow vertical flocculators were inefficient because of very high H/S ratios. Here we will add obstacles between baffles in order to keep the H/S ratio in the optimal range.
# It is time for a new design algorithm for flocculators. For the past 10 years we designed flocculators knowing that 2 m deep vertical flocculators had very high H/S ratios especially for low flow rates and thus were inherently inefficient. We designed to accommodate that inefficiency because the plan view area of the vertical flocculators was smaller than any other design options. We recently obtained experimental confirmation that operating at higher energy dissipation rates in the flocculator should be acceptable. If we increase the energy dissipation rate it will make the H/S ratio even higher. By increasing the energy dissipation rate and simultaneously increasing the efficiency we can produce much smaller flocculators. The design that I propose (40 cm of head loss and collision potential of 70 m^2/3) below only increases the maximum energy dissipation rate from 10 mW/kg up to 22 mW/kg. The residence time is reduced to 6.1 minutes. It is important to note that at this time we are not proposing to reduce the collision potential. We have experimental results suggesting that 1 minute flocculation is viable when coupled with a floc blanket. The cost of the flocculators will already be a very small fraction of the overall plant cost and thus further reductions in flocculator volume will not have as significant an impact on the plant cost.
# We assume a reasonable head loss as the starting point for this design. Our earlier designs began with a max energy dissipation rate as the primary constraint. Here we use head loss to recognize that cost optimization is an important parameter. Our cost analysis suggested that increasing the head loss to between 40 and 60 cm would be economical with the most cost effective head loss increasing with flow rate. For simplicity we will use a constant head loss for our designs with the option of having expert users adjust the head loss if a hydraulic design requires less head loss to achieve a viable gravity powered plant design.
# Design Algorithm steps
# Reactor dimensions (width and length) are given.
# Assume a max energy dissipation rate of 10 mW/kg.
# Calculate head loss assuming efficient geometry (α_ε=2). This is done iteratively assuming that the head loss contributes to the active volume of the flocculator to get a conservative estimate of total head loss.
# Calculate the baffle spacing (and with it number of baffle spaces) using the maximum H/S ratio for efficient geometry, to match the target max energy dissipation rate.
# Calculate the number of obstacles and spacing between obstacles that corresponds to the baffle spacing to meet the target max energy dissipation rate.
# Calculate the obstacle width to obtain the same jet expansion conditions as produced by the 180 degree bend.
Pi_VC90 := 0.62
Pi_PlaneJet := 0.225
Pi_VCBaffle := Pi_VC90^2
K_FlocBaffle := (1/Pi_VCBaffle - 1)^2 = 2.56466
# Active volume and required energy dissipation rate
Z_FlocBottom := Plant_Origin[0] + T_FlocSlab = 0.12 m
ZW_FlocMin := Z_SedLaunder + outerradius(ND_SedLaunder) = 1.49319 m
# Water level in the flocculator when dumping poorly flocculated water so that it won't continue into the sed tank. The lower baffles will end one baffle space (S) below this level.
H_FlocActiveMin := ZW_FlocMin - Z_FlocBottom = 1.37319 m
L_FlocActive := L_Floc - S_Fitting - 2*ConRadius(ND_SedManifold)
Vol_FlocActiveMin := L_FlocActive*W_Floc*H_FlocActiveMin
ED_FlocMax := max(CP_Floc^3*α_ε^(3/2)*(Q_Plant/Vol_FlocActiveMin)^3, ED_FlocMaxMin) = 10 mW/kg
ED_FlocAve := ED_FlocMax/α_ε = 5 mW/kg
CP_FlocEst := (1/α_ε)^(1/6)*Vol_FlocActiveMin/Q_Plant*ED_FlocAve^(1/3) = 89.5672 m^(2/3)
# H/S ratio
Pi_HSMin := 3
# The precise value of the maximum H/S ratio that has full efficiency is given below.
Pi_HSTransition := Pi_VCBaffle^4*K_FlocBaffle/Pi_PlaneJet^3 = 4.91605
# It might be reasonable to allow for some Π.HS values that are greater than the value calculated above especially since the efficiency won't be affected that quickly. I think we need to have a slighly higher maximum H/S ratio so that creating a viable design is always possible.
Pi_HSMax := 6
Pi_HS := Pi_HSMin = 3  # Use minimum H/S ratio to get largest baffle spacing to minimize coagulant loss to the plates
# Baffle spacing and number of baffles
S_FlocBaffleEst := (Q_Plant/W_Floc)^(3/4)*(K_FlocBaffle/(Pi_HS*ED_FlocMax))^(1/4) = 7.78602 cm
N_FlocBaffles := Round((L_Floc - S_Fitting - 2*ConRadius(ND_SedManifold))/(S_FlocBaffleEst + T_SedPlate) - 1, 2) + 1 = 41
S_FlocBaffle := (L_Floc - S_Fitting - 2*ConRadius(ND_SedManifold))/N_FlocBaffles - T_SedPlate = 7.68131 cm
B_FlocBaffle := S_FlocBaffle + T_SedPlate
# Distance between obstacles
Z_FlocLowBaffleTop := ZW_FlocMin - S_FlocBaffle*Pi_FlocBaffle = 1.41638 m
Z_FlocHighBaffleBottom := Z_FlocBottom + S_FlocBaffle*Pi_FlocBaffle = 0.196813 m
H_FlocBaffleOverlap := Z_FlocLowBaffleTop - Z_FlocHighBaffleBottom = 1.21957 m
S_FlocObstacleMin := K_FlocBaffle/ED_FlocMax*(Q_Plant/(S_FlocBaffle*W_Floc))^3 = 0.243263 m
N_FlocObstaclesPerSpace := floor(H_FlocBaffleOverlap/S_FlocObstacleMin - 1) = 4
# Does not include the turn around the baffle itself, only the additional obstacles between changes in flow direction
S_FlocObstacle := H_FlocBaffleOverlap/(N_FlocObstaclesPerSpace + 1) = 0.243914 m
Pi_HSReal := S_FlocObstacle/S_FlocBaffle = 3.17542
# Actual collision potential
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CP_FlocObstacle := (K_FlocBaffle^2*S_FlocObstacle^4/(4*α_ε))^(1/6) = 0.37785 m^(2/3)
# Discrepancy with estimate above based on active volume is mainly due to this calculation not taking into account the space above the low baffles and below the high baffles (obstacle collision potential only takes into account distance to the next obstacle, which in the case of the last obstacle is the EDGE of the plate).
CP_FlocReal := CP_FlocObstacle*(N_FlocObstaclesPerSpace + 1)*(N_FlocBaffles - 1) = 75.57 m^(2/3)
# Flocculator head loss
HL_Floc := K_FlocBaffle*(Q_Plant/(S_FlocBaffle*W_Floc))^2/(2*g)*N_FlocBaffles*(N_FlocObstaclesPerSpace + 1) = 0.25878 m
# Obstacle design
# The obstacles will block the flow such that the contraction occupies Pi_VCBaffle = 0.3844of the width of the space between the baffles. These obstacles could be placed against the wall of the channel or against one of the baffles. In the design below we assume that the obstacles are placed against one of the baffles.
W_FlocObstacleWake := S_FlocBaffle*(1 - Pi_VCBaffle) = 4.72862 cm
# If the obstacles create wakes that are larger than the obstacle, then we need to account for that in the design. The obstacle should be against one of the baffles so that only one contraction is produced by each obstacle. This maximizes the distance for the expansion and thus minimizes the number of obstacles needed. The obstacles should shed flocs. Thus the obstacles must have a slope of at least 45 degrees.
# Design the sloped obstacles. The first step is to determine the vena contracta coefficient as a function of the angle of the obstacle relative to the fluid flow.
AN_FlocObs := 45 deg  # Angle between the baffle and the obstacle
Pi_VCα(α) := Pi_VC90^(α/(90 deg))
# Estimate of the vena contracta coefficient. This is the same relationship that we use to determine that the vena contracta coefficient for a 180 degree bend is 0.62^2.
Pi_VCα(AN_FlocObs) = 0.787401  # vena contracta on the way down
Pi_VCα(π - AN_FlocObs) = 0.488188  # vena contracta on the way up
L_FlocObstacle(α, Δα_Flow) := (W_FlocObstacleWake - S_FlocBaffle*(1 - Pi_VCα(Δα_Flow)))/(Pi_VCα(Δα_Flow)*sin(α))
L_FlocObstacleDown := L_FlocObstacle(AN_FlocObs, AN_FlocObs) = 5.55982 cm
L_FlocObstacleUp := L_FlocObstacle(AN_FlocObs, 180 deg - AN_FlocObs) = 2.30947 cm
# The obstacles are pointed downward and need to be wider on the down flow baffles because they create less of a vena contracta than they do on the upflow baffles. The obstacles should always be on the side of the previous (upstream) vena contracta to maximize the flow path length.
# Comparison with conventional design
G_Ave := sqrt(ED_FlocMax/α_ε/Nu_Water) = 70.7107 1/s
# The fluid velocity is a traditional design target and thus we can compare our design with tradition.
V_Floc := Q_Plant/(S_FlocBaffle*W_Floc) = 0.0982536 m/s
V_MaxSchulz := 0.3*m/s
V_Max10State := 1.5*ft/s = 0.4572 m/s
V_MinSchulz := 0.1*m/s
V_Min10State := 0.5*ft/s = 0.1524 m/s
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# The graph above shows the ten state standards and Shulz and Okun recommendations for velocity of water in a hydraulic flocculator. This shows that this design is below the maximum velocity guidelines and this confirms that we aren't yet using energy dissipation rates that exceed the traditional guidelines. The velocity in the flocculator increases with the target head loss.
# Flocculator and ET Elevations
ZW_FlocMax := ZW_Sed + HL_SedDiffuser + HL_Floc
Z_FlocTop := ZW_FlocMax + H_PlantFreeboard
H_Floc := Z_FlocTop - Z_FlocBottom
HL_FlocDrainDump := Headloss_weir(Q_Plant, π*innerdiameter(ND_FlocDrain, PS_Default))
Z_FlocDrainDumpStub := ZW_FlocMin - HL_FlocDrainDump
D_RMOrifice := D_PipeED(E_MaxRM, Q_Plant, Pi_VenaContractaOrifice, Pi_JetRound)
HL_RMMicroOrifice := h_orifice(D_RMOrifice, Pi_VenaContractaOrifice, Q_Plant)
HL_RMPipe := h_l(Q_Plant, innerdiameter(ND_RMPipe, PS_Default), 2 m, K_El90 + K_PipeExit, Nu_Water, E_Pvc)
Z_LfomBottom := ZW_FlocMax + HL_RMMicroOrifice + HL_RMPipe + H_Freefall
ZW_EtMax := Z_LfomBottom + HL_Lfom
Z_EtTop := ZW_EtMax + H_PlantFreeboard
H_Et := Z_EtTop - Z_FlocBottom
# This is not apparent depth, but if the entrance tank and flocculator share a slab it's the distance from the slab to the top of the wall. The base of the entrance tank is then filled in (or left empty as a coagulant contact chamber).
Z_EtDrain := Z_LfomBottom - L_EtPlate*sin(AN_EtPlate) - (N_EtPlates*S_EtPlate + T_SedPlate*(N_EtPlates - 1))/cos(AN_EtPlate)
H_EtDrain := Z_EtDrain - Z_FlocBottom
H_EtSlope1 := L_EtSlope1*tan(AN_EtPlate)
H_EtSlope2 := min(Z_LfomBottom - Z_EtDrain - H_EtSlope1, L_EtSlope2*tan(AN_EtPlate))
# Doser Elevations
ZW_CdcCht := Z_EtTop + H_DoserAssembly
Z_CdcFloatValveOrifice := ZW_CdcCht + H_CdcFloatvalve
Z_CoagulantOutlet := Z_CdcFloatValveOrifice + H_CoagTankAboveHeadTank  # This is the height of the outlet from the stock tanks
Z_CoagulantTankBottom := Z_CoagulantOutlet - B_StockOutlet  # This is the height of the coagulant stock tank base
# Coagulant Stock Tank Elevation
Z_CoagTank := Z_EtTop + H_CoagTankAboveHeadTank + H_DoserAssembly - B_StockOutlet
Z_CoagTankOutlet := Z_CoagTank + B_StockOutlet
