Q_Plant := 4*L/s
# [reference: ExpertInputs.xmcd]
# [reference: MathFunctions.xmcd]
# [reference: PipeDatabase.xmcd]
# [reference: MaterialsDatabase.xmcd]
# [reference: FluidsFunctions.xmcd]
# [reference: CdcFunctions.xmcd]
# [reference: SedTankFunctions.xmcd]
# [reference: SedimentationTank.xmcd]
# [reference: LFOM.xmcd]
# [reference: EntranceTankFlocculatorLow abh35.xmcd]
# [reference: LFStackedRapidSandFilter_jsc377.xmcd]
# [reference: LinearCdc.xmcd]
# [reference: ChemStorageTanks.xmcd]
# These are the codes that take MathCAD outputs and create AutoCAD scripts that are used to draw the plant (formerly Basics)
# [reference: MtoATranslators.xmcd]
# The wrapped MtoA translator contains the functions that the user will want to access. These functions will draw pieces with full functionality - specifying the location, dimension, and orientation of the object. Also, it contains layer control and subtraction capabilities for grouped objects.
# [reference: MtoATranslatorsWrapped.xmcd]
# [reference: ChannelF.xmcd]
# [reference: PlumbingF.xmcd]
# [reference: TankF.xmcd]
# [reference: StairsF.xmcd]
# [reference: DrainChannelF.xmcd]
# [reference: SedimentationTankACLow.xmcd]
# [reference: EntranceTankLowAC abh35.xmcd]
# [reference: LowFlowStackedRapidSandFilterAC_jsc377.xmcd]
# Flocculator Drawing Low Flow (Single Channel)
# Layers
FlocConLayer := layer_new("FlocTankCon", grey)
FlocConFrz := FreezeLayer("FlocTankCon")
FlocDrainPipeLayer := layer_new("FlocDrainPipePlu", blue)
FlocDrainPipeFrz := FreezeLayer("FlocDrainPipePlu")
FlocDrainAdapterLayer := layer_new("FlocDrainAdapterPlu", blue3)
FlocDrainAdapterFrz := FreezeLayer("FlocDrainAdapterPlu")
FlocDrainValveLayer := layer_new("FlocDrainValvePlu", blue3)
FlocDrainValveFrz := FreezeLayer("FlocDrainValvePlu")
FlocDrainFittingLayer := layer_new("FlocDrainFittingPlu", green)
FlocDrainFittingFrz := FreezeLayer("FlocDrainFittingPlu")
FlocBaffleLayer := layer_new("FlocModBaffles", ltpurple)
FlocBaffleFrz := FreezeLayer("FlocModBaffles")
FlocModPipeLayer := layer_new("FlocModPipePlu", blue)
FlocModPipeFrz := FreezeLayer("FlocModPipePlu")
FlocModSpacerLayer := layer_new("FlocModSpacerPlu", blue3)
FlocModSpacerFrz := FreezeLayer("FlocModSpacerPlu")
FlocModFittingLayer := layer_new("FlocModFittingPlu", green)
FlocModFittingFrz := FreezeLayer("FlocModFittingPlu")
# Flocculator Masonry
Floc_Dim := [L_Floc; W_Floc; H_Floc]
Floc_Origin := Plant_Origin + [-L_Et - T_PlantWall; W_Sed + T_PlantWall; Z_FlocBottom]
FlocTank := Tank(Floc_Origin, Floc_Dim, T_PlantWall)
FlocTankSlope := WedgeF(Floc_Origin, Floc_Origin + [-L_Floc; W_Floc; L_Floc*tan(AN_FlocSlope)], [0; 0; 0]*deg)
FlocConScript := stack(FlocConLayer, FlocTank, FlocTankSlope, Union_All, FlocConFrz)
# Channel Drain
FlocDrainPipe_Origin := Floc_Origin + [-L_Floc; W_Floc/2; 0 m]
FlocDrainAdapter1_Origin := FlocDrainPipe_Origin + [-T_PlantWall - SocketDepth(ND_FlocDrain); 0 m; 0 m]
FlocDrainValve_Origin := FlocDrainAdapter1_Origin + [SocketDepth(ND_FlocDrain) - MaleAdapterLength(ND_FlocDrain) + ValveSocket(ND_FlocDrain); 0 m; 0 m]
FlocDrainAdapter2_Origin := FlocDrainAdapter1_Origin + [
    -2*MaleAdapterLength(ND_FlocDrain) + 2*SocketDepth(ND_FlocDrain) - ValveLength(ND_FlocDrain) + 2*ValveSocket(ND_FlocDrain);
    0 m;
    0 m
]
FlocDrainElbow_Origin := FlocDrainAdapter2_Origin + [-2*SocketDepth(ND_FlocDrain); 0 m; 0 m]
FlocDrainPipe := PipeSUBF(FlocDrainPipe_Origin, T_PlantWall + SocketDepth(ND_FlocDrain), [0; 0]*deg, ND_FlocDrain, PS_Default, ["FlocTankCon"])
FlocDrainNipple := PipeF(FlocDrainAdapter2_Origin, 2*SocketDepth(ND_FlocDrain), [0; 0]*deg, ND_FlocDrain, PS_Default)
FlocDrainAdapter1 := MaleAdapterF(FlocDrainAdapter1_Origin, [0; 0; 0]*deg, ND_FlocDrain, PS_Default)
FlocDrainAdapter2 := MaleAdapterF(FlocDrainAdapter2_Origin, [180; 0; 0]*deg, ND_FlocDrain, PS_Default)
FlocDrainValve := InsertThreadedValve("Floc", ND_FlocDrain, FlocDrainValve_Origin, 0 deg)
FlocDrainElbow := ElbowF(FlocDrainElbow_Origin, [90; 0; 45]*deg, ND_FlocDrain, PS_Default)
FlocDrainPlumbingScript := stack(FlocDrainPipeLayer, FlocDrainPipe, FlocDrainNipple, FlocDrainPipeFrz, FlocDrainAdapterLayer, FlocDrainAdapter1, FlocDrainAdapter2, FlocDrainAdapterFrz, FlocDrainValveLayer, FlocDrainValve, FlocDrainValveFrz, FlocDrainFittingLayer, FlocDrainElbow, FlocDrainFittingFrz)
L_FlocDrainCut := outerradius(ND_FlocDrain)/tan(30 deg)
H_FlocDrainCut := □  # error: This placeholder is empty.
AC_FlocTank := stack(FlocConScript, FlocDrainPlumbingScript)
plant := stack(AC_SedTank, AC_EntranceTank, AC_FlocTank, AC_Filter)
# [component: inputs plant]
