Q_Plant := 4*L/s
# [reference: ExpertInputs.xmcd]
# [reference: MathFunctions.xmcd]
# [reference: PipeDatabase.xmcd]
# [reference: MaterialsDatabase.xmcd]
NominalDiameter = ƒ(Length, Unitless) → Length
# [reference: FluidsFunctions.xmcd]
# [reference: SedTankFunctions.xmcd]
# [reference: CdcFunctions.xmcd]
# [reference: LfomFunctions.xmcd]
# [reference: SedimentationTank.xmcd]
W_SedPlate = 1.0668 m
Pi_FlocBaffle := 1
W_SedPlate := 1.06 m
W_FlocChannelMin := max(W_HumanMin, W_SedPlate/2) = 0.53 m
Pi_JSOptMin := 3
ND_ODMax(OD_Max) :=
    i ← 0
    OD ← 0 in
    while OD < OD_Max
        ND ← AvailND[i]
        i ← i + 1
        OD ← AvailOD[i]
    return ND
T_Acrylic := 5 mm
W_FlocChannelMax := W_SedPlate
T_FlocSlab := 15 cm
T_FlocBaffleH := T_PlantWall = 0.15 m
AN_FlocSlope := atan(1 %)
# design at half flow rate for plants which are "double train" i.e. over 100Lps. this applies to the sed tank, flocculator and lfom files, in the entrance tank file this returns to the design flow and then goes back to half for the srsf.
# Generic
# Ρ
# S
# J
# Vertical
# Width
# Space
# Height
# Horizontal
# Height
# Space
# Width
# use Q.Train instead of Q.Train (mrf222)
J_JS(Pi_JS, S) := Pi_JS*S
# Flocculator efficiency based on CFD results
Pi_VCBaffle := 1/(sqrt(K_FlocBaffle) + 1) = 0.387426
# |
# |
# |
# |
# |
# |
# |
# |
# |
# |
# |
# |
# |
# |
# |
# |
# |
# |
# |
# |
# |
# |
# |
# |
# |
# |
# |
# |
# |
# |
# |
# |
# |
# |
# |
# |
# |
# |
# |
# |
# |
# |
# |
# |
# |
# |
# |
# |
# |
# |
# |
# |
# |
# |
# |
# |
# |
# |
# |
# |
# |
# |
# |
# |
# |
# |
# |
# |
# |
# |
# |
# |
# |
# |
# |
# |
# |
# |
# |
# |
# |
# |
# |
# |
# |
# |
# |
# |
# |
# |
# |
# |
# |
# |
# |
# |
# |
# |
# |
# |
# |
# |
# |
# |
# |
# |
# |
# |
# |
# |
# |
# |
# |
# |
# |
# |
# |
# |
# |
# |
# |
# |
# |
# |
# |
# |
# Non-uniformity of the energy dissipation rate is a function of J/S ratio:
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# For 3 < J/S < 5
# For J/S > 5
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α_ε(Pi_JS) := max(2, Pi_JetPlane^3/Pi_VCBaffle^4*2/K_FlocBaffle*Pi_JS)
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# Flocculator efficiency:
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α_ψ(Pi_JS) := (1/α_ε(Pi_JS))^(1/6)
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# Collision potential for one baffle:
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ψ_B(J, S) := α_ψ(J/S)*J^(2/3)*(K_FlocBaffle/2)^(1/3)
Pi_JSGraph := 3 .. 40  # Used to create the graphs
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# Horizontal vs vertical flocculator decision
S_FlocBaffleMinH := W_HumanMin = 0.5 m
# Will generally only use horizontal flocculator if flow rate is great enough that efficient geometry (J/S >= 3) gives at least the target max ED when matching the flocculator depth with the sedimentation tank and maintaining human width between baffles for ease of construction.
#
# To simplifying construction the flocculator will by default always match the sed tank depth. However by manually setting the variable H.FlocOption in Expert Inputs a shallower horizontal flocculator can be forced.
Q_MinHorizontal := (HW_Sed - T_FlocSlab)*S_FlocBaffleMinH*(J_JS(Pi_JSOptimal, S_FlocBaffleMinH)*ED_Floc/K_FlocBaffle)^(1/3) = 140.08 L/s
Q_MinHorizontalHighHtoS := (Pi_VCBaffle*S_FlocBaffleMinH)^(4/3)*(HW_Sed - T_FlocSlab)/Pi_JetPlane*ED_Floc^(1/3) = 165.47 L/s
# Not used because we won't design non-optimal horizontal flocculators, but Q to meet ED target for J/S > 5 is independent of flow path length (J). Based only on depth and min baffle spacing. This is the same as Q.MinHorizontal above for J/S = 5 (approx.)
EN_FlocHoriz :=
    EN_FlocHoriz ← 1 if Q_Train > Q_MinHorizontal
    EN_FlocHoriz ← 1 if H_FlocOption == -1
    EN_FlocHoriz ← 0 otherwise
T_FlocBaffle :=
    T_FlocBaffleH if EN_FlocHoriz == 1
    T_SedPlate otherwise
T_FlocChannelWall :=
    T_Acrylic if Q_Train ≤ Q_PlantMaxLF
    T_PlantWall otherwise
    = 0.15
S_FlocPortGap :=
    S_FlocBaffleSetBackPlastic if EN_FlocHoriz == 0
    0 m otherwise
    = 0.02
# Horizontal flocculator design
# The maximum depth of a horizontal flocculator for a given flow rate corresponds to a minimum baffle spacing (S) and a width (J) that optimizes the J/S ratio for that minimum S. This is the water level that gives the desired energy dissipation rate.
H_MaxOptHorizF(Q, S_Min, Pi_JS, ED_MaxBod) := Q/S_Min*(K_FlocBaffle/(J_JS(Pi_JS, S_Min)*ED_MaxBod))^(1/3)
H_MaxOptHoriz := H_MaxOptHorizF(Q_Train, S_FlocBaffleMinH, Pi_JSOptimal, ED_Floc) = 0.0440257 m
# Need water height in sed tank inlet channel measured from bottom of drain pipe
HW_FlocEnd :=
    HW_Sed - T_FlocSlab if H_FlocOption == 0 or H_MaxOptHoriz > (HW_Sed - T_FlocSlab)
    H_MaxOptHoriz if H_FlocOption == -1
    H_FlocOption*m if H_FlocOption > 0
    = 1.54178
# The flocculator shares the same foundation level with the sed tank when H.FlocOption is 0 OR when the optimal depth for the horizontal flocculator with the min baffle spaces is greater than the sed tank depth. This means that the flocculator will never be deeper than the sed tank unless the depth is manually inputted by assigning a positive value to H.FlocOption.
N_FlocSpacesFH(L, T, S_Min) := (Floor((L + T)/(S_Min + T) + 1, 2) - 1)
# This gives the number of spaces per channel for a horizontal flocculator. Floor to ensure minimum spacing constraint met for horizontal. Subtracting 1 forces it to be odd. Add one before flooring though to get more accurate estimate.
SofN_FlocBaffleF(L, T, N_Spaces) := (L + T)/N_Spaces - T
# This calculates the spacing between baffles given a number of spaces in a channel. Will always be greater than the min S used to calculate N.
S_FlocBaffleED(Q, P, Pi_JS, ED_MaxBod) := (Q/P)^(3/4)*(K_FlocBaffle/(Pi_JS*ED_MaxBod))^(1/4)  # Baffle spacing function for target ED for known P and J/S.
S_FlocBaffleHEst := max(S_FlocBaffleMinH, S_FlocBaffleED(Q_Train, HW_FlocEnd, Pi_JSOptimal, ED_Floc)) = 0.5 m
S_FlocBaffleH := SofN_FlocBaffleF(L_Sed, T_FlocBaffleRigidH, N_FlocSpacesFH(L_Sed, T_FlocBaffleRigidH, S_FlocBaffleHEst)) = 0.561812 m
W_FlocChannelH := S_FlocBaffleH*Pi_JSOptMin = 1.68543 m
ψ_SpaceH := ψ_B(W_FlocChannelH, S_FlocBaffleH) = 1.35917 m^(2/3)  # Collision potential per space
# Total number of spaces needed to achieve target collision potential
N_FlocSpacesNeededH := ceil(CP_Floc/ψ_SpaceH) = 56
N_FlocSpacesPerChannelH := N_FlocSpacesFH(L_Sed, T_FlocBaffleRigidH, S_FlocBaffleH) = 5
# Determines the number of channels needed based on the number of spaces per channel and the total number of spaces.
N_FlocChannelsH :=
    ceil(N_FlocSpacesNeededH/N_FlocSpacesPerChannelH) if mod(ceil(N_FlocSpacesNeededH/N_FlocSpacesPerChannelH), 2) == 0
    ceil(N_FlocSpacesNeededH/N_FlocSpacesPerChannelH) + 1 otherwise
    = 12
N_FlocChannelSpacesH :=
    for i ∈ 0 .. N_FlocChannelsH - 1
        Spaces[i] ← N_FlocSpacesPerChannelH - (i == (N_FlocChannelsH - 1))*Floor(W_SedInletChannelPreWeir/S_FlocBaffleH, 2)
    return Spaces
N_FlocChannelBafflesH := N_FlocChannelSpacesH - 1  # Array of numbers of baffles in each channel
# Head loss per floc baffle in horiz flocculator
HL_FlocBaffleH(HW) := K_FlocBaffle*(Q_Train/(S_FlocBaffleH*HW))^2/(2*g)
N_FlocSpacesTotalH := sum(N_FlocChannelSpacesH) = 60
HL_FlocH :=
    HL ← 0 m
    for i ∈ 0 .. N_FlocSpacesTotalH - 1
        HW_space ← HW_FlocEnd + HL
        HL ← HL + HL_FlocBaffleH(HW_space)
    return HL
# Opening to the first space in each channel:
# Extending the center wall between channels into the last flow path creates an expansion in the first baffle space of each channel that would otherwise be wasted. We design the width of the opening such that the vena contracta the follows it has the same velocity as the vena contracta following flow around a baffle.
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L_FlocWallExtensionH := S_FlocBaffleH*(Pi_VenaContractaOrifice - Pi_VCBaffle)/Pi_VenaContractaOrifice = 0.216319 m
# Parameters:
ψ_FlocTotalH := ψ_SpaceH*N_FlocSpacesTotalH = 81.5501 m^(2/3)
V_FlocH := Q_Train/((HW_FlocEnd + HL_FlocH/2)*S_FlocBaffleH) = 0.00461767 m/s
ED_FlocMaxH := α_ε(W_FlocChannelH/S_FlocBaffleH)*K_FlocBaffle*Q_Train^3/(2*W_FlocChannelH*S_FlocBaffleH^3*HW_FlocEnd^3) = 0.000146072 mW/kg
ED_FlocAveH := K_FlocBaffle*Q_Train^3/(2*W_FlocChannelH*S_FlocBaffleH^3*HW_FlocEnd^3) = 7.30358e-5 mW/kg
θ_FlocH := N_FlocChannelsH*(L_Sed*W_FlocChannelH*(HW_FlocEnd + HL_FlocH/2) - (N_FlocSpacesPerChannelH - 1)*T_FlocBaffle*(HW_FlocEnd + HL_FlocH/2)*(W_FlocChannelH - S_FlocBaffleH))/Q_Train = 627.245 min
G_FlocH := (ED_FlocAveH/Nu_Water)^(1/2) = 0.270251 1/s
Gθ_FlocH := G_FlocH*θ_FlocH = 10170.8
T_Slab := 15 cm
Cost_UnitSlab := 950/21*USD/m^2
Cost_UnitWall := 1618/21*USD/m^2 = 77.0476 base_currency/m^2
Cost_UnitBaffle := 1100/21*USD/(12 ft) = 14.3211 base_currency/m
Cost_UnitLowerBeam := 321/21*USD/m
# Vertical Flocculator Design Functions
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# For H/S > 5 (will be the greater of the two when H/S > 5)
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# These are equal when H/S = 5
S_FlocEstVF(ED_FlocBod, Q_Train, W_FlocChannel, HW_FlocEnd) := max((K_FlocBaffle/(ED_FlocBod*HW_FlocEnd))^(1/3)*Q_Train/W_FlocChannel, 1/(ED_FlocBod^(1/4)*Pi_VCBaffle)*(Pi_JetPlane*Q_Train/W_FlocChannel)^(3/4))
# For H/S < 5 (will be the greater of the two when H/S < 5)
N_FlocChannelSpacesVF(ED_FlocBod, Q_Train, W_FlocChannel, L_FlocChannel, T_FlocBaffle, HW_FlocEnd) := Floor((L_FlocChannel + T_FlocBaffle)/(S_FlocEstVF(ED_FlocBod, Q_Train, W_FlocChannel, HW_FlocEnd) + T_FlocBaffle), 2)
S_FlocVF(ED_FlocBod, Q_Train, W_FlocChannel, L_FlocChannel, T_FlocBaffle, HW_FlocEnd) := (L_FlocChannel + T_FlocBaffle - N_FlocChannelSpacesVF(ED_FlocBod, Q_Train, W_FlocChannel, L_FlocChannel, T_FlocBaffle, HW_FlocEnd)*T_FlocBaffle)/N_FlocChannelSpacesVF(ED_FlocBod, Q_Train, W_FlocChannel, L_FlocChannel, T_FlocBaffle, HW_FlocEnd)
ψ_BaffleEstVF(ED_FlocBod, Q_Train, W_FlocChannel, L_FlocChannel, T_FlocBaffle, HW_FlocEnd, AN_FlocSlope) := ψ_B(HW_FlocEnd - tan(AN_FlocSlope)*L_FlocChannel, S_FlocVF(ED_FlocBod, Q_Train, W_FlocChannel, L_FlocChannel, T_FlocBaffle, HW_FlocEnd))
N_FlocChannelsVF(ED_FlocBod, Q_Train, W_FlocChannel, L_FlocChannel, T_FlocBaffle, HW_FlocEnd, AN_FlocSlope) := Ceil(CP_Floc/(N_FlocChannelSpacesVF(ED_FlocBod, Q_Train, W_FlocChannel, L_FlocChannel, T_FlocBaffle, HW_FlocEnd)*ψ_BaffleEstVF(ED_FlocBod, Q_Train, W_FlocChannel, L_FlocChannel, T_FlocBaffle, HW_FlocEnd, AN_FlocSlope)), 2)
N_FlocBafflesMissingLastChannelVF(ED_FlocBod, Q_Train, W_FlocChannel, L_FlocChannel, T_FlocBaffle, HW_FlocEnd) := Ceil(W_SedInletChannelPreWeir/S_FlocVF(ED_FlocBod, Q_Train, W_FlocChannel, L_FlocChannel, T_FlocBaffle, HW_FlocEnd), 2) - 1
N_FlocSpacesVF(ED_FlocBod, Q_Train, W_FlocChannel, L_FlocChannel, T_FlocBaffle, HW_FlocEnd, AN_FlocSlope) := N_FlocChannelsVF(ED_FlocBod, Q_Train, W_FlocChannel, L_FlocChannel, T_FlocBaffle, HW_FlocEnd, AN_FlocSlope)*N_FlocChannelSpacesVF(ED_FlocBod, Q_Train, W_FlocChannel, L_FlocChannel, T_FlocBaffle, HW_FlocEnd) - N_FlocBafflesMissingLastChannelVF(ED_FlocBod, Q_Train, W_FlocChannel, L_FlocChannel, T_FlocBaffle, HW_FlocEnd) - 1
HL_FlocSpaceVF(ED_FlocBod, Q_Train, W_FlocChannel, L_FlocChannel, T_FlocBaffle, HW_FlocEnd, HW) := K_FlocBaffle*(Q_Train/(S_FlocVF(ED_FlocBod, Q_Train, W_FlocChannel, L_FlocChannel, T_FlocBaffle, HW_FlocEnd)*HW))^2/(2*g)
H_FlocFloorVF(ED_FlocBod, Q_Train, W_FlocChannel, L_FlocChannel, T_FlocBaffle, HW_FlocEnd, AN_FlocSlope) :=
    B_Floc ← S_FlocVF(ED_FlocBod, Q_Train, W_FlocChannel, L_FlocChannel, T_FlocBaffle, HW_FlocEnd) + T_FlocBaffle
    N_SpacesLastChannel ← N_FlocChannelSpacesVF(ED_FlocBod, Q_Train, W_FlocChannel, L_FlocChannel, T_FlocBaffle, HW_FlocEnd) - N_FlocBafflesMissingLastChannelVF(ED_FlocBod, Q_Train, W_FlocChannel, L_FlocChannel, T_FlocBaffle, HW_FlocEnd) - 1
    N_SpacesOtherChannels ← N_FlocChannelSpacesVF(ED_FlocBod, Q_Train, W_FlocChannel, L_FlocChannel, T_FlocBaffle, HW_FlocEnd)
    N_Channels ← N_FlocChannelsVF(ED_FlocBod, Q_Train, W_FlocChannel, L_FlocChannel, T_FlocBaffle, HW_FlocEnd, AN_FlocSlope)
    H_Slope[0] ← tan(AN_FlocSlope)*(1/2*S_FlocVF(ED_FlocBod, Q_Train, W_FlocChannel, L_FlocChannel, T_FlocBaffle, HW_FlocEnd) + (N_FlocBafflesMissingLastChannelVF(ED_FlocBod, Q_Train, W_FlocChannel, L_FlocChannel, T_FlocBaffle, HW_FlocEnd) + 1)*B_Floc)
    for i ∈ 0 .. N_SpacesLastChannel - 1
        H_Slope[i + 1] ← H_Slope[i] + B_Floc*tan(AN_FlocSlope)*(i ≠ N_SpacesLastChannel - 1)
    for j ∈ 1 .. N_Channels - 1
        for k ∈ 0 .. N_SpacesOtherChannels - 1
            if j ≠ N_Channels - 1 or k ≠ N_SpacesOtherChannels - 1
                SpaceIndex ← N_SpacesLastChannel + (j - 1)*N_SpacesOtherChannels + k
                H_Slope[SpaceIndex + 1] ← H_Slope[SpaceIndex] + B_Floc*tan(AN_FlocSlope)*(mod(j, 2) == 0 and k ≠ N_SpacesOtherChannels - 1) - B_Floc*tan(AN_FlocSlope)*(mod(j, 2) == 1 and k ≠ N_SpacesOtherChannels - 1)
    return H_Slope
H_eFlocSpacesVF(ED_FlocBod, Q_Train, W_FlocChannel, L_FlocChannel, T_FlocBaffle, HW_FlocEnd, AN_FlocSlope) :=
    N_SpacesLastChannel ← N_FlocChannelSpacesVF(ED_FlocBod, Q_Train, W_FlocChannel, L_FlocChannel, T_FlocBaffle, HW_FlocEnd) - N_FlocBafflesMissingLastChannelVF(ED_FlocBod, Q_Train, W_FlocChannel, L_FlocChannel, T_FlocBaffle, HW_FlocEnd) - 1
    N_SpacesOtherChannels ← N_FlocChannelSpacesVF(ED_FlocBod, Q_Train, W_FlocChannel, L_FlocChannel, T_FlocBaffle, HW_FlocEnd)
    N_Channels ← N_FlocChannelsVF(ED_FlocBod, Q_Train, W_FlocChannel, L_FlocChannel, T_FlocBaffle, HW_FlocEnd, AN_FlocSlope)
    H_Slope ← H_FlocFloorVF(ED_FlocBod, Q_Train, W_FlocChannel, L_FlocChannel, T_FlocBaffle, HW_FlocEnd, AN_FlocSlope)
    HW ← HW_FlocEnd
    HL[0] ← 0 m
    for i ∈ 0 .. N_SpacesLastChannel - 1
        HW ← HW_FlocEnd + sum(HL) - H_Slope[i]
        HL[i] ← HL_FlocSpaceVF(ED_FlocBod, Q_Train, W_FlocChannel, L_FlocChannel, T_FlocBaffle, HW_FlocEnd, HW)
    for j ∈ 1 .. N_Channels - 1
        for k ∈ 0 .. N_SpacesOtherChannels - 1
            SpaceIndex ← N_SpacesLastChannel + (j - 1)*N_SpacesOtherChannels + k
            HW ← HW_FlocEnd + sum(HL) - H_Slope[SpaceIndex]
            HL[SpaceIndex] ← HL_FlocSpaceVF(ED_FlocBod, Q_Train, W_FlocChannel, L_FlocChannel, T_FlocBaffle, HW_FlocEnd, HW)
    return HL
H_eFlocVF(ED_FlocBod, Q_Train, W_FlocChannel, L_FlocChannel, T_FlocBaffle, HW_FlocEnd, AN_FlocSlope) := sum(H_eFlocSpacesVF(ED_FlocBod, Q_Train, W_FlocChannel, L_FlocChannel, T_FlocBaffle, HW_FlocEnd, AN_FlocSlope))
HW_FlocSpacesVF(ED_FlocBod, Q_Train, W_FlocChannel, L_FlocChannel, T_FlocBaffle, HW_FlocEnd, AN_FlocSlope) :=
    N_SpacesLastChannel ← N_FlocChannelSpacesVF(ED_FlocBod, Q_Train, W_FlocChannel, L_FlocChannel, T_FlocBaffle, HW_FlocEnd) - N_FlocBafflesMissingLastChannelVF(ED_FlocBod, Q_Train, W_FlocChannel, L_FlocChannel, T_FlocBaffle, HW_FlocEnd) - 1
    N_SpacesOtherChannels ← N_FlocChannelSpacesVF(ED_FlocBod, Q_Train, W_FlocChannel, L_FlocChannel, T_FlocBaffle, HW_FlocEnd)
    N_Channels ← N_FlocChannelsVF(ED_FlocBod, Q_Train, W_FlocChannel, L_FlocChannel, T_FlocBaffle, HW_FlocEnd, AN_FlocSlope)
    H_Slope ← H_FlocFloorVF(ED_FlocBod, Q_Train, W_FlocChannel, L_FlocChannel, T_FlocBaffle, HW_FlocEnd, AN_FlocSlope)
    HL ← H_eFlocSpacesVF(ED_FlocBod, Q_Train, W_FlocChannel, L_FlocChannel, T_FlocBaffle, HW_FlocEnd, AN_FlocSlope)
    HW[0] ← HW_FlocEnd - H_Slope[0]
    for i ∈ 0 .. N_SpacesLastChannel - 1
        HW[i + 1] ← HW[i] - (H_Slope[i + 1] - H_Slope[i]) + HL[i]
    for j ∈ 1 .. N_Channels - 1
        for k ∈ 0 .. N_SpacesOtherChannels - 1
            if j ≠ N_Channels - 1 or k ≠ N_SpacesOtherChannels - 1
                SpaceIndex ← N_SpacesLastChannel + (j - 1)*N_SpacesOtherChannels + k
                HW[SpaceIndex + 1] ← HW[SpaceIndex] - (H_Slope[SpaceIndex + 1] - H_Slope[SpaceIndex]) + HL[SpaceIndex]
    return HW
ψ_FlocSpacesVF(ED_FlocBod, Q_Train, W_FlocChannel, L_FlocChannel, T_FlocBaffle, HW_FlocEnd, AN_FlocSlope) :=
    S_Floc ← S_FlocEstVF(ED_FlocBod, Q_Train, W_FlocChannel, HW_FlocEnd)
    N_SpacesLastChannel ← N_FlocChannelSpacesVF(ED_FlocBod, Q_Train, W_FlocChannel, L_FlocChannel, T_FlocBaffle, HW_FlocEnd) - N_FlocBafflesMissingLastChannelVF(ED_FlocBod, Q_Train, W_FlocChannel, L_FlocChannel, T_FlocBaffle, HW_FlocEnd) - 1
    N_SpacesOtherChannels ← N_FlocChannelSpacesVF(ED_FlocBod, Q_Train, W_FlocChannel, L_FlocChannel, T_FlocBaffle, HW_FlocEnd)
    N_Channels ← N_FlocChannelsVF(ED_FlocBod, Q_Train, W_FlocChannel, L_FlocChannel, T_FlocBaffle, HW_FlocEnd, AN_FlocSlope)
    HW ← HW_FlocSpacesVF(ED_FlocBod, Q_Train, W_FlocChannel, L_FlocChannel, T_FlocBaffle, HW_FlocEnd, AN_FlocSlope)
    for i ∈ 0 .. N_SpacesLastChannel - 1
        ψ[i] ← ψ_B(HW[i], S_Floc)
    for j ∈ 1 .. N_Channels - 1
        for k ∈ 0 .. N_SpacesOtherChannels - 1
            SpaceIndex ← N_SpacesLastChannel + (j - 1)*N_SpacesOtherChannels + k
            ψ[SpaceIndex] ← ψ_B(HW[SpaceIndex], S_Floc)
    return ψ
ψ_FlocVF(ED_FlocBod, Q_Train, W_FlocChannel, L_FlocChannel, T_FlocBaffle, HW_FlocEnd, AN_FlocSlope) := sum(ψ_FlocSpacesVF(ED_FlocBod, Q_Train, W_FlocChannel, L_FlocChannel, T_FlocBaffle, HW_FlocEnd, AN_FlocSlope))
# The following function counts back from last baffle space in the flocculator adding up the collision potential calculated using the actual height.
#
# Actual H dimension takes into account both head loss and the bottom slope for each baffle space.
#
# Channels with water flowing down the slope have the slope height added as the function counts backwards along the baffle spaces. Channels with water flowing up the slope subtract the slope height. H.Slope is the height of the floor above the minimum elevation at a given position. It begins as the floor level in the last baffle space in the last channel (remember that the last baffle space is not at the end of the channel because at least one baffle is missing before the entrance to the sed tank inlet channel.
ψ_FlocSimpleVF(ED_FlocBod, Q_Train, W_FlocChannel, L_FlocChannel, T_FlocBaffle, HW_FlocEnd, AN_FlocSlope) := N_FlocSpacesVF(ED_FlocBod, Q_Train, W_FlocChannel, L_FlocChannel, T_FlocBaffle, HW_FlocEnd, AN_FlocSlope)*ψ_BaffleEstVF(ED_FlocBod, Q_Train, W_FlocChannel, L_FlocChannel, T_FlocBaffle, HW_FlocEnd, AN_FlocSlope)
H_FlocWallsVF(ED_FlocBod, Q_Train, W_FlocChannel, L_FlocChannel, T_FlocBaffle, HW_FlocEnd, AN_FlocSlope) := Ceil(HW_FlocEnd + H_eFlocVF(ED_FlocBod, Q_Train, W_FlocChannel, L_FlocChannel, T_FlocBaffle, HW_FlocEnd, AN_FlocSlope) + H_PlantFreeboard, 1 cm)
V_FlocVF(ED_FlocBod, Q_Train, W_FlocChannel, L_FlocChannel, T_FlocBaffle, HW_FlocEnd) := Q_Train/(S_FlocVF(ED_FlocBod, Q_Train, W_FlocChannel, L_FlocChannel, T_FlocBaffle, HW_FlocEnd)*W_FlocChannel)
α_εVF(ED_FlocBod, Q_Train, W_FlocChannel, L_FlocChannel, T_FlocBaffle, HW_FlocEnd) := α_ε(HW_FlocEnd/S_FlocVF(ED_FlocBod, Q_Train, W_FlocChannel, L_FlocChannel, T_FlocBaffle, HW_FlocEnd))
ED_FlocMaxVF(ED_FlocBod, Q_Train, W_FlocChannel, L_FlocChannel, T_FlocBaffle, HW_FlocEnd) := α_εVF(ED_FlocBod, Q_Train, W_FlocChannel, L_FlocChannel, T_FlocBaffle, HW_FlocEnd)*K_FlocBaffle*(V_FlocVF(ED_FlocBod, Q_Train, W_FlocChannel, L_FlocChannel, T_FlocBaffle, HW_FlocEnd)^3/(2*HW_FlocEnd))
Vol_FlocVF(ED_FlocBod, Q_Train, W_FlocChannel, L_FlocChannel, T_FlocBaffle, HW_FlocEnd, AN_FlocSlope) := W_FlocChannel*N_FlocChannelsVF(ED_FlocBod, Q_Train, W_FlocChannel, L_FlocChannel, T_FlocBaffle, HW_FlocEnd, AN_FlocSlope)*L_FlocChannel*(HW_FlocEnd + H_eFlocVF(ED_FlocBod, Q_Train, W_FlocChannel, L_FlocChannel, T_FlocBaffle, HW_FlocEnd, AN_FlocSlope)/2 - L_FlocChannel/2*tan(AN_FlocSlope))
Ti_FlocVF(ED_FlocBod, Q_Train, W_FlocChannel, L_FlocChannel, T_FlocBaffle, H_Floc, AN_FlocSlope) := Vol_FlocVF(ED_FlocBod, Q_Train, W_FlocChannel, L_FlocChannel, T_FlocBaffle, H_Floc, AN_FlocSlope)/Q_Train
L_FlocBafflesUpperVF(ED_FlocBod, Q_Train, W_FlocChannel, L_FlocChannel, T_FlocBaffle, HW_FlocEnd, Pi_Baffle, AN_FlocSlope) := H_FlocWallsVF(ED_FlocBod, Q_Train, W_FlocChannel, L_FlocChannel, T_FlocBaffle, HW_FlocEnd, AN_FlocSlope) - Pi_Baffle*S_FlocVF(ED_FlocBod, Q_Train, W_FlocChannel, L_FlocChannel, T_FlocBaffle, HW_FlocEnd)
L_FlocBafflesLowerVF(ED_FlocBod, Q_Train, W_FlocChannel, L_FlocChannel, T_FlocBaffle, HW_FlocEnd, Pi_Baffle) := HW_FlocEnd - Pi_Baffle*S_FlocVF(ED_FlocBod, Q_Train, W_FlocChannel, L_FlocChannel, T_FlocBaffle, HW_FlocEnd)
N_FlocBafflesUpperVF(ED_FlocBod, Q_Train, W_FlocChannel, L_FlocChannel, T_FlocBaffle, HW_FlocEnd, AN_FlocSlope) := (N_FlocChannelSpacesVF(ED_FlocBod, Q_Train, W_FlocChannel, L_FlocChannel, T_FlocBaffle, HW_FlocEnd)/2 - 1)*N_FlocChannelsVF(ED_FlocBod, Q_Train, W_FlocChannel, L_FlocChannel, T_FlocBaffle, HW_FlocEnd, AN_FlocSlope) - floor(1/2*N_FlocBafflesMissingLastChannelVF(ED_FlocBod, Q_Train, W_FlocChannel, L_FlocChannel, T_FlocBaffle, HW_FlocEnd))
N_FlocBafflesLowerVF(ED_FlocBod, Q_Train, W_FlocChannel, L_FlocChannel, T_FlocBaffle, HW_FlocEnd, AN_FlocSlope) := N_FlocChannelSpacesVF(ED_FlocBod, Q_Train, W_FlocChannel, L_FlocChannel, T_FlocBaffle, HW_FlocEnd)/2*N_FlocChannelsVF(ED_FlocBod, Q_Train, W_FlocChannel, L_FlocChannel, T_FlocBaffle, HW_FlocEnd, AN_FlocSlope) - ceil(1/2*N_FlocBafflesMissingLastChannelVF(ED_FlocBod, Q_Train, W_FlocChannel, L_FlocChannel, T_FlocBaffle, HW_FlocEnd))
# Cost Optimization Functions and Channel Widthfor Vertical Flocculators
A_FlocWallsVF(ED_FlocBod, Q_Train, W_FlocChannel, L_FlocChannel, T_FlocBaffle, HW_FlocEnd, AN_FlocSlope) := (L_FlocChannel + 2*W_FlocChannel + 2*T_PlantWall)*H_FlocWallsVF(ED_FlocBod, Q_Train, W_FlocChannel, L_FlocChannel, T_FlocBaffle, HW_FlocEnd, AN_FlocSlope)*N_FlocChannelsVF(ED_FlocBod, Q_Train, W_FlocChannel, L_FlocChannel, T_FlocBaffle, HW_FlocEnd, AN_FlocSlope)
A_FlocSlabVF(ED_FlocBod, Q_Train, W_FlocChannel, L_FlocChannel, T_FlocBaffle, HW_FlocEnd, AN_FlocSlope) := L_FlocChannel*(W_FlocChannel + T_PlantWall)*N_FlocChannelsVF(ED_FlocBod, Q_Train, W_FlocChannel, L_FlocChannel, T_FlocBaffle, HW_FlocEnd, AN_FlocSlope)
Perimeter_FlocBeamVF(ED_FlocBod, Q_Train, W_FlocChannel, L_FlocChannel, T_FlocBaffle, HW_FlocEnd, AN_FlocSlope) := L_FlocChannel + 2*(W_FlocChannel + T_PlantWall)*N_FlocChannelsVF(ED_FlocBod, Q_Train, W_FlocChannel, L_FlocChannel, T_FlocBaffle, HW_FlocEnd, AN_FlocSlope)
Cost_FlocSlabVF(ED_FlocBod, Q_Train, W_FlocChannel, L_FlocChannel, T_FlocBaffle, HW_FlocEnd, AN_FlocSlope) := Cost_UnitSlab*A_FlocSlabVF(ED_FlocBod, Q_Train, W_FlocChannel, L_FlocChannel, T_FlocBaffle, HW_FlocEnd, AN_FlocSlope)
Cost_FlocWallVF(ED_FlocBod, Q_Train, W_FlocChannel, L_FlocChannel, T_FlocBaffle, HW_FlocEnd, AN_FlocSlope) := Cost_UnitWall*A_FlocWallsVF(ED_FlocBod, Q_Train, W_FlocChannel, L_FlocChannel, T_FlocBaffle, HW_FlocEnd, AN_FlocSlope)
Cost_FlocBeamVF(ED_FlocBod, Q_Train, W_FlocChannel, L_FlocChannel, T_FlocBaffle, HW_FlocEnd, AN_FlocSlope) := Cost_UnitLowerBeam*Perimeter_FlocBeamVF(ED_FlocBod, Q_Train, W_FlocChannel, L_FlocChannel, T_FlocBaffle, HW_FlocEnd, AN_FlocSlope)
Cost_FlocStructureVF(ED_FlocBod, Q_Train, W_FlocChannel, L_FlocChannel, T_FlocBaffle, HW_FlocEnd, AN_FlocSlope) := Cost_FlocWallVF(ED_FlocBod, Q_Train, W_FlocChannel, L_FlocChannel, T_FlocBaffle, HW_FlocEnd, AN_FlocSlope) + Cost_FlocSlabVF(ED_FlocBod, Q_Train, W_FlocChannel, L_FlocChannel, T_FlocBaffle, HW_FlocEnd, AN_FlocSlope) + Cost_FlocBeamVF(ED_FlocBod, Q_Train, W_FlocChannel, L_FlocChannel, T_FlocBaffle, HW_FlocEnd, AN_FlocSlope)
# Baffle Material Costs:
L_FlocBafflesTotalVF(ED_FlocBod, Q_Train, W_FlocChannel, L_FlocChannel, T_FlocBaffle, HW_FlocEnd.Floc, Pi_Baffle, AN_FlocSlope) := N_FlocBafflesUpperVF(ED_FlocBod, Q_Train, W_FlocChannel, L_FlocChannel, T_FlocBaffle, HW_FlocEnd, AN_FlocSlope)*L_FlocBafflesUpperVF(ED_FlocBod, Q_Train, W_FlocChannel, L_FlocChannel, T_FlocBaffle, HW_FlocEnd, Pi_Baffle, AN_FlocSlope) + N_FlocBafflesLowerVF(ED_FlocBod, Q_Train, W_FlocChannel, L_FlocChannel, T_FlocBaffle, HW_FlocEnd, AN_FlocSlope)*L_FlocBafflesLowerVF(ED_FlocBod, Q_Train, W_FlocChannel, L_FlocChannel, T_FlocBaffle, HW_FlocEnd, Pi_Baffle)
Cost_FlocBafflesVF(ED_FlocBod, Q_Train, W_FlocChannel, L_FlocChannel, T_FlocBaffle, HW_FlocEnd, Pi_Baffle, AN_FlocSlope) := Cost_UnitBaffle*L_FlocBafflesTotalVF(ED_FlocBod, Q_Train, W_FlocChannel, L_FlocChannel, T_FlocBaffle, HW_FlocEnd, Pi_Baffle, AN_FlocSlope)*((1 + (W_FlocChannel > T_SedPlate/2))/2)
Cost_FlocVF(ED_FlocBod, Q_Train, W_FlocChannel, L_FlocChannel, T_FlocBaffle, HW_FlocEnd, Pi_Baffle, AN_FlocSlope) := Cost_FlocStructureVF(ED_FlocBod, Q_Train, W_FlocChannel, L_FlocChannel, T_FlocBaffle, HW_FlocEnd, AN_FlocSlope) + Cost_FlocBafflesVF(ED_FlocBod, Q_Train, W_FlocChannel, L_FlocChannel, T_FlocBaffle, HW_FlocEnd, Pi_Baffle, AN_FlocSlope)
W_FlocChannelVF(ED_FlocBod, Q_Train, L_FlocChannel, T_FlocBaffle, H_Floc, Pi_FlocBaffleMin, AN_FlocSlope) :=
    for i ∈ 0 .. max(W_FlocChannelMax - W_FlocChannelMin, 0)/cm
        W_FlocArray[i] ← W_FlocChannelMin + i*cm
        Cost_FlocArray[i] ← Cost_FlocVF(ED_FlocBod, Q_Train, W_FlocArray[i], L_FlocChannel, T_FlocBaffle, H_Floc, Pi_FlocBaffleMin, AN_FlocSlope)
    MinCost ← min(Cost_FlocArray)
    Index ← match(min(Cost_FlocArray), Cost_FlocArray)
    W_FlocBest ← W_FlocArray[match(min(Cost_FlocArray), Cost_FlocArray)[0]]
    return W_FlocBest
# 6/25/12 - changed the last index calculation to be a max of zero and the difference between the max and min floc channel width to avoid negative values for high flow rates. As this will only occur at high flow rates when a horizontal flocculator will be drawn, this does not affect the final design, but simply avoids undefined values that will cause AC.FlocTank to be undefined at high flow rates.
Cost_FlocArrayVF(ED_FlocBod, Q_Train, L_FlocChannel, T_FlocBaffle, H_Floc, Pi_FlocBaffleMin, AN_FlocSlope) :=
    for i ∈ 0 .. max(W_FlocChannelMax - W_FlocChannelMin, 0)/cm
        W_FlocArray[i] ← W_FlocChannelMin + i*cm
        Cost_FlocArray[i] ← Cost_FlocVF(ED_FlocBod, Q_Train, W_FlocArray[i], L_FlocChannel, T_FlocBaffle, H_Floc, Pi_FlocBaffleMin, AN_FlocSlope)
    return Cost_FlocArray
W_FlocArrayVF(ED_FlocBod, Q_Train, L_FlocChannel, T_FlocBaffle, H_Floc, Pi_FlocBaffleMin, AN_FlocSlope) :=
    for i ∈ 0 .. max(W_FlocChannelMax - W_FlocChannelMin, 0)/cm
        W_FlocArray[i] ← W_FlocChannelMin + i*cm
    return W_FlocArray
# Vertical Flocculator Dimensions
W_FlocChannelV := W_FlocChannelVF(ED_Floc, Q_Train, L_Sed, T_FlocBaffle, HW_FlocEnd, Pi_FlocBaffleMin, AN_FlocSlope) = 0.53 m
S_FlocBaffleV := S_FlocVF(ED_Floc, Q_Train, W_FlocChannelV, L_Sed, T_FlocBaffle, HW_FlocEnd) = 0.0690983 m
N_FlocChannelsV := N_FlocChannelsVF(ED_Floc, Q_Train, W_FlocChannelV, L_Sed, T_FlocBaffle, HW_FlocEnd, AN_FlocSlope) = 2
N_FlocChannelSpacesV :=
    for i ∈ 0 .. N_FlocChannelsV - 1
        N_Spaces[i] ← N_FlocChannelSpacesVF(ED_Floc, Q_Train, W_FlocChannelV, L_Sed, T_FlocBaffle, HW_FlocEnd) - (i == (N_FlocChannelsV - 1))*N_FlocBafflesMissingLastChannelVF(ED_Floc, Q_Train, W_FlocChannelV, L_Sed, T_FlocBaffle, HW_FlocEnd)
    return N_Spaces
N_FlocChannelBafflesV := N_FlocChannelSpacesV - 1 = [67; 62]
V_FlocV := V_FlocVF(ED_Floc, Q_Train, W_FlocChannelV, L_Sed, T_FlocBaffle, HW_FlocEnd) = 0.109224 m/s
# Vertical Flocculator Parameters
H_eFlocV := H_eFlocVF(ED_Floc, Q_Train, W_FlocChannelV, L_Sed, T_FlocBaffle, HW_FlocEnd, AN_FlocSlope) = 2.37761 cm
ED_FlocMaxV := ED_FlocMaxVF(ED_Floc, Q_Train, W_FlocChannelV, L_Sed, T_FlocBaffle, HW_FlocEnd) = 9.53404 mW/kg
ED_FlocAveV := K_FlocBaffle*V_FlocVF(ED_Floc, Q_Train, W_FlocChannelV, L_Sed, T_FlocBaffle, HW_FlocEnd)^3/(2*HW_FlocEnd) = 1.05642 mW/kg
ψ_BaffleV := ψ_B(HW_FlocEnd - tan(AN_FlocSlope)*L_Sed/2, S_FlocBaffleV) = 0.988513 m^(2/3)
ψ_FlocV := ψ_FlocVF(ED_Floc, Q_Train, W_FlocChannelV, L_Sed, T_FlocBaffle, HW_FlocEnd, AN_FlocSlope) = 128.708 m^(2/3)
Ti_FlocV := Ti_FlocVF(ED_Floc, Q_Train, W_FlocChannelV, L_Sed, T_FlocBaffle, HW_FlocEnd, AN_FlocSlope) = 32.6463 min
# Low Flow Flocculator Dimensions
HW_FlocEndLF := HW_Sed = 1.69178 m
Π_HSTargetLF := 4
W_FlocTankLF := W_HumanMin
ψ_FlocChannelLFest := α_ψ(Π_HSTargetLF)*HW_FlocEndLF*W_FlocTankLF*L_Sed/Q_Train*(ED_Floc/α_ε(Π_HSTargetLF))^(1/3) = 155.69 m^(2/3)
S_FlocSquareSpaceLF := (K_FlocBaffle*Q_Train^3/(Π_HSTargetLF*ED_Floc))^(1/7)
N_FlocSpacesPerChannelLF := Round((W_FlocTankLF + T_FlocBaffle)/(S_FlocSquareSpaceLF + T_FlocBaffle), 2)
N_FlocBafflesPerChannelLF := N_FlocSpacesPerChannelLF - 1 = 1
S_FlocLF := (W_FlocTankLF + T_FlocBaffle)/N_FlocSpacesPerChannelLF - T_FlocBaffle
N_FlocObstaclesLF := floor(HW_FlocEndLF/(S_FlocLF*Π_HSTargetLF))
fW_FlocChannelLF(Q_Train) := Q_Train/S_FlocLF*(K_FlocBaffle/(HW_FlocEndLF/(N_FlocObstaclesLF + 1)*ED_Floc))^(1/3)  # H is really the distance between obstacles.
W_FlocChannelLFest := fW_FlocChannelLF(Q_Train) = 10.7005 cm  # This is the spacing between the ferrocement baffles
W_FlocChannelLastLF := max(outerdiameter(ND_SedManifold) + 2*S_Fitting, W_FlocChannelLFest) = 0.268275 m  # Based on LFOM diameters for different flow rates
N_FlocChannelsLF := Floor((L_Sed - W_FlocChannelLastLF)/(W_FlocChannelLFest + T_Acrylic), 2) + 1 = 41  # Add one for the last channel that is a different size.
W_FlocChannelLF := (L_Sed - W_FlocChannelLastLF)/(N_FlocChannelsLF - 1) - T_Acrylic = 10.911 cm
ED_FlocMaxLF := 40*mW/kg
ED_Floc = 0.01 m^2/s^3
Pi_VCObstacle := 1/S_FlocLF*(Pi_JetPlane*Q_Train/W_FlocChannelLF)^(3/4)*(1/ED_FlocMaxLF)^(1/4) = 0.245792
ND_FlocObstacleLF := ND_ODMax(W_FlocChannelLF*(1 - Pi_VCObstacle)) = 2 in
Pi_VCBaffle = 0.387426
outerdiameter(2 in) = 6.0325 cm
CP_FlocObstacleLF := ψ_B(HW_FlocEndLF/(N_FlocObstaclesLF + 1), S_FlocLF)
CP_FlocSpaceLF := CP_FlocObstacleLF*(1 + N_FlocObstaclesLF)
CP_FlocChannelLF := N_FlocSpacesPerChannelLF*CP_FlocSpaceLF
N_FlocBafflesLF := N_FlocChannelsLF*N_FlocBafflesPerChannelLF = 41
S_FlocBaffleLF :=
    for i ∈ 0 .. N_FlocChannelsLF - 1
        S[i] ← S_FlocLF
    S
N_FlocChannelSpacesLF :=
    for i ∈ 0 .. N_FlocChannelsLF - 1
        N_Spaces[i] ← N_FlocSpacesPerChannelLF
    N_Spaces
N_FlocChannelBafflesLF := N_FlocChannelSpacesLF - 1
fL_FlocActiveLF := (N_FlocChannelsLF - 1)*W_FlocChannelLF + W_FlocChannelLastLF
# This is the length of the floc tank (not including the dimensions of the channel walls)
h_eFlocObstacleLF := K_FlocBaffle*(Q_Train/(S_FlocLF*W_FlocChannelLF))^2/(2*g) = 0.2763 cm
h_eFlocLF := N_FlocChannelsLF*N_FlocSpacesPerChannelLF*(1 + N_FlocObstaclesLF)*h_eFlocObstacleLF = 45.3131 cm
H_FlocLF := HW_FlocEndLF + h_eFlocLF + H_PlantFreeboard = 2.24491 m
L_FlocBafflesUpperLF := H_FlocLF - S_FlocLF*Pi_FlocBaffle = 1.99591 m
L_FlocBafflesLowerLF := HW_FlocEndLF - S_FlocLF*Pi_FlocBaffle = 1.44278 m
N_FlocBafflesUpperLF := floor(N_FlocBafflesPerChannelLF/2) = 0
N_FlocBafflesLowerLF := ceil(N_FlocBafflesPerChannelLF/2) = 1
# Assign correct variables based on horiz/vert/lowflow
N_FlocChannels :=
    N_FlocChannelsLF if Q_Train ≤ Q_PlantMaxLF
    N_FlocChannelsV if EN_FlocHoriz == 0 and Q_Train > Q_PlantMaxLF
    N_FlocChannelsH otherwise
W_FlocChannel :=
    W_FlocChannelLF if Q_Train ≤ Q_PlantMaxLF
    W_FlocChannelV if EN_FlocHoriz == 0 and Q_Train > Q_PlantMaxLF
    W_FlocChannelH otherwise
    = 0.53
S_FlocBaffle :=
    S_FlocBaffleLF if Q_Train ≤ Q_PlantMaxLF
    S_FlocBaffleV if EN_FlocHoriz == 0 and Q_Train > Q_PlantMaxLF
    S_FlocBaffleH otherwise
S_FlocBaffleFirst := S_FlocBaffle[0]  # error: This value must be a vector.
H_Floc :=
    H_Sed + h_eFlocLF if Q_Train ≤ Q_PlantMaxLF
    H_FlocWallsVF(ED_Floc, Q_Train, W_FlocChannelV, L_Sed, T_FlocBaffle, HW_FlocEnd, AN_FlocSlope) if EN_FlocHoriz == 0 and Q_Train > Q_PlantMaxLF
    HL_FlocH + HW_FlocEnd + H_PlantFreeboard otherwise
    = 1.67
HL_Floc :=
    h_eFlocLF if Q_Train ≤ Q_PlantMaxLF
    H_eFlocV if EN_FlocHoriz == 0 and Q_Train > Q_PlantMaxLF
    HL_FlocH otherwise
    = 0.0237761
N_FlocChannelBaffles :=
    N_FlocChannelBafflesLF if Q_Train ≤ Q_PlantMaxLF
    N_FlocChannelBafflesV if EN_FlocHoriz == 0 and Q_Train > Q_PlantMaxLF
    N_FlocChannelBafflesH otherwise
B_FlocBaffle := S_FlocBaffle + T_FlocBaffle
T_FlocChannelWall :=
    T_Acrylic if Q_Train ≤ Q_PlantMaxLF
    T_PlantWall otherwise
    = 0.15
W_FlocPort :=
    S_FlocBaffleV - S_FlocBaffleSetBackPlastic if EN_FlocHoriz == 0
    S_FlocBaffleH - L_FlocWallExtensionH otherwise
H_FlocPort :=
    S_FlocBaffleV*W_FlocChannelV/W_FlocPort if EN_FlocHoriz == 0
    H_Floc otherwise
## Position calculations for each baffle
# Now we need to assign positions, lengths and elevations to floc baffles
L_Floc :=
    W_FlocTankLF if Q_Train ≤ Q_PlantMaxLF
    L_Sed otherwise
W_Floc :=
    L_FlocLF if Q_Train ≤ Q_PlantMaxLF
    N_FlocChannels*W_FlocChannel + (N_FlocChannels - 1)*T_PlantWall otherwise
HW_FlocStart := H_Floc - H_PlantFreeboard = 1.57 m
HW_FlocEnd = 1.54178 m
L_FlocBaffleLower :=
    W_FlocChannel - S_FlocBaffle if EN_FlocHoriz == 1 and Q_Train > Q_PlantMaxLF
    L_FlocBafflesLowerLF(ED_Floc, Q_Train, W_FlocChannelLF, W_FlocTankLF, T_FlocBaffle, HW_FlocEnd, Pi_FlocBaffle) if Q_Train ≤ Q_PlantMaxLF
    L_FlocBafflesLowerVF(ED_Floc, Q_Train, W_FlocChannel, L_Sed, T_FlocBaffle, HW_FlocEnd, Pi_FlocBaffle) otherwise
# Assign generic variables based on horizontal or vertical
L_FlocBaffleUpper :=
    W_FlocChannel - S_FlocBaffle if EN_FlocHoriz == 1 and Q_Train > Q_PlantMaxLF
    L_FlocBafflesUpperLF(ED_Floc, Q_Train, W_FlocChannelLF, W_FlocTankLF, T_FlocBaffle, HW_FlocStart, Pi_FlocBaffle) if Q_Train ≤ Q_PlantMaxLF
    L_FlocBafflesUpperVF(ED_Floc, Q_Train, W_FlocChannel, L_Sed, T_FlocBaffle, HW_FlocEnd, Pi_FlocBaffle) otherwise
N_FlocBaffleLower :=
    for i ∈ 0 .. N_FlocChannels - 1
        N_FlocBaffleLowerV[i] ← floor((N_FlocChannelBaffles[i] + 1)/2)
    return N_FlocBaffleLowerV
# Calculate the number of lower baffles per channel as an array
N_FlocBaffleLowerTotal := sum(N_FlocBaffleLower) = 65  # Calculate the total number of lower baffles
N_FlocBaffleUpper :=
    for i ∈ 0 .. N_FlocChannels - 1
        N_FlocBaffleUpperV[i] ← (N_FlocChannelBaffles[i] - N_FlocBaffleLower)[i]
    return N_FlocBaffleUpperV
# Subtract the total number of  lower baffles in a channel from the total number of baffles in that channel to find the number of upper baffles as an array for each channel.
N_FlocBaffleUpperTotal := sum(N_FlocBaffleUpper) = 64  # Calculate the total number of upper baffles
N_FlocBaffleLowerTotal + N_FlocBaffleUpperTotal + N_FlocChannels = 131
# If the flocculator is vertical with rigid baffles, slots in the channel walls are needed to hold them in place.
# If there is a slot, the width of the baffle needs to be wider than the channel to fit into the slot. Since there are slots at each end, it is wider by twice the length of the slot.
N_FlocChannels = 2  # B is the center to center distance between baffles whereas S was the distance without any thicknesses included.
# The first and last spacing are defined so that they can be returned to the builder.
N_FlocChannelBaffles = [67; 62]
# X.FlocBaffles creates an array for all of the "x" positions of the baffles. The x direction goes in the direction of the longer length of the flocculator channels.
X_FlocBaffles :=
    for channel ∈ 0 .. N_FlocChannels - 2
        for i ∈ 0 .. N_FlocChannelBaffles[channel] - 1
            x[i, channel] ← S_FlocBaffle[channel] + B_FlocBaffle[channel]*i
    for i ∈ 0 .. N_FlocChannelBaffles[N_FlocChannels - 1] - 1
        x[i, N_FlocChannels - 1] ← B_FlocBaffle[N_FlocChannels - 1]*i + (L_Floc - B_FlocBaffle[N_FlocChannels - 1]*N_FlocChannelBaffles[N_FlocChannels - 1])
    return x  # error: This value must be a vector.
# if the spacing between baffles is less than the sum of the inlet channel and the "lip" between ports and the nearest baffle, at least one baffle will be in the midst of the inlet channel (or too close to it). In this case, respace the baffles using the remaining length (Length of the sed tank - width of the inlet channel - "lip"). The remaining space should be divided by the number of calculated spaces -1 because one baffle would be aligned with the edge of the remaining space (not dividing it up into 2 spaces). if the spacing is not such that at least one baffle will be in the midst of the inlet channel, space normally.
Y_FlocBafflesH :=
    if EN_FlocHoriz == 1
        if mod(N_FlocChannels, 2) == 0
            for i ∈ 0 .. (N_FlocChannels - 1)
                for j ∈ 0 .. N_FlocChannelBaffles[i] - 1
                    Y_FlocBaffles[j, i] ← (Plant_Origin[1] + (N_SedTanks*(W_Sed + T_PlantWall)) + ((N_FlocChannels - i - 1)*(W_FlocChannel + T_PlantWall))) + mod(j, 2)*S_FlocBaffle[0] if mod(i, 2) == 1
                    Y_FlocBaffles[j, i] ← (Plant_Origin[1] + (N_SedTanks*(W_Sed + T_PlantWall)) + ((N_FlocChannels - i - 1)*(W_FlocChannel + T_PlantWall))) + mod(j + 1, 2)*S_FlocBaffle[0] otherwise
            Y_FlocBaffles[j, i]
        otherwise
            for i ∈ 0 .. (N_FlocChannels - 1)
                for j ∈ 0 .. N_FlocChannelBaffles[i] - 1
                    Y_FlocBaffles[j, i] ← (Plant_Origin[1] + (N_SedTanks*(W_Sed + T_PlantWall)) + ((N_FlocChannels - i - 1)*(W_FlocChannel + T_PlantWall))) + mod(j, 2)*S_FlocBaffle[0] if mod(i + 1, 2) == 1
                    Y_FlocBaffles[j, i] ← (Plant_Origin[1] + (N_SedTanks*(W_Sed + T_PlantWall)) + ((N_FlocChannels - i - 1)*(W_FlocChannel + T_PlantWall))) + mod(j + 1, 2)*S_FlocBaffle[0] otherwise
            Y_FlocBaffles[j, i]
    return Y_FlocBaffles
# S.FlocBaffle0 should be used because if the last channel is respaced it screws up how it is drawn so that there is a little gap between the bafflle and the edge of the channel.
# Even number of floc channels causes the entrance tank to switch sides
# Odd number of floc channels
Y_FlocBafflesV :=
    if EN_FlocHoriz == 0
        for j ∈ 0 .. (N_FlocChannels - 1)
            Y_FlocBaffles[0, j] ← Plant_Origin[1] + (N_SedTanks*(W_Sed + T_SedWallDivider)) + T_PlantWall - T_SedWallDivider + ((N_FlocChannels - j - 1)*(W_FlocChannel + T_FlocChannelWall))
    return Y_FlocBaffles
# The y position of the baffles is the same within each channel for vertical. Again, draw it out to understand the code.
Y_FlocBafflesLF :=
    if EN_FlocHoriz == 0
        for j ∈ 0 .. (N_FlocChannels - 1)
            Y_FlocBaffles[0, j] ← Plant_Origin[1] + (N_SedTanks*(W_Sed + T_PlantWall)) + W_FlocChannelLast + ((N_FlocChannels - j - 1)*(W_FlocChannel + T_FlocChannelWall))
    return Y_FlocBaffles
Y_FlocBaffles :=
    Y_FlocBaffles ← Y_FlocBafflesH if EN_FlocHoriz == 1
    Y_FlocBaffles ← Y_FlocBafflesLF if Q_Train ≤ Q_PlantMaxLF
    Y_FlocBaffles ← Y_FlocBafflesV otherwise
Channels := 0 .. N_FlocChannels - 1
Z_FlocBafflesH :=
    if EN_FlocHoriz == 1
        for channel ∈ Channels
            for i ∈ 0 .. N_FlocChannelBaffles[channel] - 1
                z[i, channel] ← 0 m
    return z  # Z array is the elevation of the bottom of the baffle. For horizontal, all baffles are at the same elevation.
Channelsnew := 0 .. N_FlocChannels - 2
Z_FlocBafflesV :=
    if EN_FlocHoriz == 0
        for channel ∈ Channelsnew
            for i ∈ 0 .. N_FlocChannelBaffles[channel] - 1
                z[i, channel] ← mod(i, 2)*S_FlocBaffle[channel]*Pi_FlocBaffle
        for i ∈ 0 .. N_FlocChannelBaffles[N_FlocChannels - 1] - 1
            z[i, N_FlocChannels - 1] ← mod(i + 1, 2)*S_FlocBaffle[channel]*Pi_FlocBaffle
    return z  # error: This value must be a vector.
# For vertical, every other baffle is raised. The last channel is slightly different to maintain the flow pattern.
N_FlocChannelBaffles[N_FlocChannels - 1] - 1 = 61
Z_FlocBafflesLF :=
    if EN_FlocHoriz == 0
        for channel ∈ 0 .. N_FlocChannels - 1
            for i ∈ 0 .. N_FlocChannelBaffles[channel] - 1
                z[i, channel] ← mod(i, 2)*S_FlocBaffle[channel]*Pi_FlocBaffle
    return z  # error: This value must be a vector.
Z_FlocBaffles :=
    Z_FlocBaffles ← Z_FlocBafflesH if EN_FlocHoriz == 1
    Z_FlocBaffles ← Z_FlocBafflesLF if Q_Train ≤ Q_PlantMaxLF
    Z_FlocBaffles ← Z_FlocBafflesV otherwise
L_FlocBafflesH :=
    if EN_FlocHoriz == 1
        for channel ∈ Channels
            for i ∈ 0 .. N_FlocChannelBaffles[channel] - 1
                l[i, channel] ← L_FlocBaffleLower
    return l  # L array is the length of the baffles
# The lengths of all the baffles are the same for horizontal
L_FlocBafflesV :=
    if EN_FlocHoriz == 0
        for channel ∈ Channels
            for i ∈ 0 .. N_FlocChannelBaffles[channel] - 1
                l[i, channel] ← L_FlocBaffleUpper if mod(i, 2) == 1
                l[i, channel] ← L_FlocBaffleLower otherwise
        for i ∈ 0 .. N_FlocChannelBaffles[last(N_FlocChannelBaffles)] - 1
            l[i, N_FlocChannels - 1] ← L_FlocBaffleLower if mod(i, 2) == 1
            l[i, N_FlocChannels - 1] ← L_FlocBaffleUpper otherwise
    return l  # For vertical, the lengths of the upper baffles are different from the lower baffles.
# For the last channel, the length of the
# baffles needed to be changed since the
# up/down had been adjusted.
L_FlocBaffles :=
    L_FlocBaffles ← L_FlocBafflesH if EN_FlocHoriz == 1
    L_FlocBaffles ← L_FlocBafflesV otherwise
L_FlocWithWalls := L_Sed + 2*T_PlantWall = 5.13268 m
W_FlocWithWalls := W_FlocChannel*N_FlocChannels + T_PlantWall*N_FlocChannels
# W.FlocWithWalls Doesnt include wall shared with sed tank because that is accounted for in sed tank.
# Z.FlocTank is the elevation of the flocculator with respect to the bottom of the sed tank.
Z_FlocTank := HW_Sed - HW_FlocEnd = 0.15 m
# Calculate the length and width of the flocculator including the walls for easy construction (values are returned to user).
HW_FlocStart := H_Floc - H_PlantFreeboard
HW_FlocChannel := (HW_FlocStart + HW_FlocEnd)/2
# Pipe Spacer Size
OD_PipeSpacerEstF := [FloorNearest(.6*W_FlocChannel, Pipesizes[:, 1]); CeilNearest(.6*W_FlocChannel, Pipesizes[:, 1])] = [10.75; 12.75] in
OD_PipeSpacerEstC := CeilNearest(.6*W_FlocChannel, Pipesizes[:, 1]) = 12.75 in
Index :=
    for i ∈ 0 .. 1
        I[i] ← index(OD_PipeSpacerEstF[i], Pipesizes[:, 1])
        Avail ← CountryPipes[I[i], Country]
        if Avail == 0
            while Avail == 0
                I[i] ← I[i] + 1
                Avail ← CountryPipes[I[i], Country]
    return I
ND_SpacerPipeArray := [Pipesizes[Index[0], 0]; Pipesizes[Index[1], 0]] = [10; 12] in
OD_PipeSpacer := [outerdiameter(ND_SpacerPipeArray[0]); outerdiameter(ND_SpacerPipeArray[1])] = [10.75; 12.75] in
A_Percentage := OD_PipeSpacer/W_FlocChannel = [0.515189; 0.611038]
ND_SpacerPipeLF :=
    ND_SpacerPipeArray[index(RoundNearest(.6, A_Percentage), A_Percentage)] if Q_Train ≤ Q_PlantMaxLF
    0.75 in otherwise
    = 0.75 in
ND_SpacerPipe :=
    ND_SpacerPipe if Q_Train > Q_PlantMaxLF
    ND_SpacerPipeLF otherwise
# Number and Spacing of Obstacles
S_OverLap := L_FlocBaffles[0, 0] - Z_FlocBaffles[1, 0]
S_Obstacle := (S_OverLap - outerdiameter(ND_SpacerPipe)*N_FlocObstaclesLF(Q_Train))/(N_FlocObstaclesLF(Q_Train) + 1)
V_FlocLF := Q_Train/(S_FlocBaffle[0]*W_FlocChannel - outerdiameter(ND_SpacerPipe)*S_FlocBaffle[0])  # error: This value must be a vector.
V_Floc :=
    V_FlocV if EN_FlocHoriz == 0
    V_FlocLF if Q_Train ≤ Q_PlantMaxLF
    V_FlocH otherwise
# use this last term to estimate the volume taken up by the module piping
Vol_FlocFirstChannelsV := (N_FlocChannels - 2)*W_FlocPort*H_FlocPort*T_PlantWall + (W_FlocChannelV*L_Sed*((2*HW_FlocEnd + HL_Floc)/2) - (T_FlocBaffle*W_FlocChannel*(N_FlocBaffleLower[0]*L_FlocBaffleLower + N_FlocBaffleUpper[0]*L_FlocBaffleUpper)) - ConRadius(ND_FlocModulesMain)^2*π*L_Sed*6)*(N_FlocChannels - 1)
Vol_FlocLastChannelV := (W_FlocPort*H_FlocPort*T_PlantWall + W_FlocChannelV*L_Sed*((2*HW_FlocEnd + HL_Floc)/2) - (T_FlocBaffle*W_FlocChannel*(N_FlocBaffleLower[N_FlocChannels - 1]*L_FlocBaffleLower + N_FlocBaffleUpper[N_FlocChannels - 1]*L_FlocBaffleUpper)) - ConRadius(ND_FlocModulesMain)^2*π*L_Sed*6)
Vol_FlocV := Vol_FlocFirstChannelsV + Vol_FlocLastChannelV
Vol_FlocH := (W_FlocChannelH*L_Sed*(HW_FlocEnd + HL_FlocH/2))*N_FlocChannels - sum(N_FlocChannelBaffles)*T_FlocBaffle*L_FlocBaffles[0, 0]*W_FlocBaffle + W_FlocPort*H_FlocPort*T_PlantWall*(N_FlocChannels - 1)
Vol_FlocLF := H_FlocLF*W_FlocTankLF*fN_FlocChannelsLF(Q_Train)*W_FlocChannel - (outerdiameter(ND_SpacerPipe)^2*π/4*W_FlocTankLF*N_FlocObstaclesLF(Q_Train)*fN_FlocChannelsLF(Q_Train))
Vol_Floc :=
    Vol_FlocV if EN_FlocHoriz == 0
    Vol_FlocLF if Q_Train ≤ Q_PlantMaxLF
    Vol_FlocH otherwise
G_Floc := sqrt(HL_Floc*Q_Train*g/(Nu_Water*Vol_Floc))
Ti_FlocH := Vol_FlocH/Q_Train
Ti_FlocLF := Vol_FlocLF/Q_Train
Ti_Floc :=
    Ti_FlocV if EN_FlocHoriz == 0 and Q_Train > Q_PlantMaxLF
    Ti_FlocLF if Q_Train ≤ Q_PlantMaxLF
    Ti_FlocH otherwise
ED_FlocAveH := K_FlocBaffle*V_Floc^3/(2*W_FlocChannel)
ED_FlocAve := g*HL_Floc/Ti_Floc
ED_FlocMaxLF :=
    g*h_eFlocLF/(Vol_FlocLF/Q_Train) if Q_Train ≤ Q_PlantMaxLF
    "null" otherwise
ED_FlocMax :=
    ED_FlocMaxV if EN_FlocHoriz == 0 and Q_Train > Q_PlantMaxLF
    ED_FlocMaxLF if Q_Train ≤ Q_PlantMaxLF
    ED_FlocMaxH otherwise
CP_FlocActual :=
    Ψ_FlocV if EN_FlocHoriz == 0 and Q_Train > Q_PlantMaxLF
    Ψ_FlocLF(Q_Train) if Q_Train ≤ Q_PlantMaxLF
    Ψ_FlocH otherwise
# Calculate Final Parameters
## Drain Calculations (Vertical)
ND_FlocValve :=
    ND_FlocValveLF(Ti_FlocDrain) if Q_Train ≤ Q_PlantMaxLF
    ND_FlocValveF(Ti_FlocDrain) otherwise
D_FlocScale := outerdiameter(ND_FlocValve)/(1.16 m)
# Assupmtions:
# The Flocculator can be assumed as one straight channel rather than wrapping back and forth
# The port size is calculated for the time to drain 2 channels, since there is a valve on at least every other channel
# The volume of each "tank" (space between baffles) is equal
# The size of a port is equal to the size of the valve
# The minor loss through the port is the same as the minor loss through the valve (K.Exp + K.GateValve)
# Drain Valve Position Calcs for Vertical Flocculator
D_pipeschedule(Q, PipeSpecification, h_l, L, ν, ε, K)
Y_FlocDrainValves :=
    for i ∈ 0 .. ceil(N_FlocChannels/2) - 1
        y[i] ← Plant_Origin[1] + N_SedTanks*(W_Sed + T_SedWallDivider) + 0.5*W_FlocChannel + 2*(W_FlocChannel + T_FlocChannelWall)*i
    y
Q_Drain := W_FlocChannel*H_Floc*L_Sed/(30 min)
W_FlocChannel*H_Floc*L_Sed/(30 min) = 0.00237634 m^3/s
# Makes Drain vales a vector even if there is only 1 valve to make drawing easier
D_pipeschedule(Q_Drain, PS_Default, 1 m, 0.2 m, Nu_Water, E_Pvc, K_PipeEnt + K_PipeExit + K_GateValve) = 1.5 in
Y_FlocDrainValves = [1.4818] m
N_FlocValves := length(Y_FlocDrainValves) = 1
# Starts calculating from the side closer tot he sed tank and moves towards the entrance tank.  Places the valve in the center of each channel so that the center of each valve is at-grade.
