Q_Plant := 25*L/s
HL_FlocMax := 40 cm
H_SedSlopesToFlocWeirMin := 25 cm
T_FlocSlab := 15 cm
T_SedWall := 15 cm
T_SedDividingWall := 15 cm
T_SedChannelWall := 15 cm
T_FlocWall := 15 cm
T_FlocDividingWall := 15 cm
T_FiWall := 25 cm
T_FiBoxWall := 15 cm
T_PlantWall := 15 cm
T_PlantFloor := 20 cm
T_ChemSlab := 15 cm
T_DrainChannelWall := 15 cm
C_CoagDoseMax := 40*mg/L
C_ChlorDoseAve := 1*mg/L
Mod := 0
method := "EtFlocSedFi"
# Mathcad to AutoCAD translators:
# [reference: MtoATranslators.xmcd]
# [reference: MtoATranslatorsWrapped.xmcd]
# Plant design calculations:
# [reference: ExpertInputs.xmcd]
# [reference: MathFunctions.xmcd]
# [reference: PipeDatabase.xmcd]
# [reference: MaterialsDatabase.xmcd]
# [reference: FluidsFunctions.xmcd]
# [reference: SedimentationTank.xmcd]
# [reference: LFOM.xmcd]
# [reference: FlocculatorEntranceTank.xmcd]
# [reference: StackedRapidSandFilter.xmcd]
# [reference: ChemicalDoseController.xmcd]
# [reference: ChannelF.xmcd]
# [reference: PlumbingF.xmcd]
# [reference: PlumbingF.xmcd]
# [reference: TankF.xmcd]
# [reference: StairsF.xmcd]
# [reference: DrainChannelF.xmcd]
# [reference: FlocculatorAC.xmcd]
# [reference: SedimentationTankAC.xmcd]
# [reference: EntranceTankCompactAC.xmcd]
# [reference: StackedRapidSandFilterAC.xmcd]
# [reference: ChemStockTanksAC.xmcd]
# [reference: OperatorAccessAC.xmcd]
# [reference: CdcAC.xmcd]
Lang := stringit_nounits(Language)
SetLayout(Layout) := concat("layout", sp, "s", sp, Layout)
CreateLayout(LayoutName) := concat("-layout ", "n ", LayoutName, sp)
LoadTemplate := stack(concat("-layout", sp, "ba", sp, "AguaClara", sp, Lang), "View")
ZoomView := concat("z", sp, "o", sp, "all", sp)
Zoom := concat("zoom", sp, "1/2XP")
RenameBackview := RenameLayout("View", "BackView")
SetBackview := SetLayout("BackView")
RenameLayout(Original, New) := stack(concat("layout", sp, "r", sp, Original), New)
BackViewPlant := stack(LoadTemplate, RenameBackview, SetBackview, ".ms", view("ba"), ZoomView, Zoom, "model")
LoadTemplate := stack(concat("-layout", sp, "ba", sp, "AguaClara", sp, Lang), "View")
LoadTop := stack("-view", "o", "t")
RenameFrontview := RenameLayout("View", "FrontView")
RenameBackview := RenameLayout("View", "BackView")
RenameTopview := RenameLayout("View", "TopView")
SetBackview := SetLayout("Backview")
SetTopview := SetLayout("Topview")
SetFrontview := SetLayout("FrontView")
FrontViewPlant := stack(LoadTemplate, RenameFrontview, SetFrontview, ".ms", view("f"), ZoomView, Zoom, "model")
ZoomView := concat("z", sp, "o", sp, "all", sp)
Zoom := concat("zoom", sp, "1/2XP")
RenameLeftview := RenameLayout("View", "LeftView")
BackViewPlant := stack(LoadTemplate, RenameBackview, SetBackview, ".ms", view("ba"), ZoomView, Zoom, "model")
SetLeftview := SetLayout("LeftView")
LeftViewPlant := stack(LoadTemplate, RenameLeftview, SetLeftview, ".ms", view("l"), ZoomView, Zoom, "model")
TopViewPlant := stack(LoadTop, ".ms", view("t"), ZoomView, Zoom)
RenameRightview := RenameLayout("View", "RightView")
SetRightview := SetLayout("RightView")
RightViewPlant := stack(LoadTemplate, RenameRightview, SetRightview, ".ms", view("ri"), ZoomView, Zoom, "model")
stack(Layout, SetLayout(Num), VPortErase([0; 0]*m, [10; 7.7]*m), VPortNew([.013; .013]*m, [.013 m + L_Border + D_LfomOrifices/2; W_Border + .013 m]), ChangeView([
    XStartPoint - D_LfomOrifices/2 + ((floor(L_Paper/OrificeCenterDist)*OrificeCenterDist)*(a - 1));
    YStartPoint
], [XStartPoint + L_Border*a; YStartPoint + W_Border]))
# L is 1 and T is 0.
SectionCutJog(Point1, Point2, LorT, SectionName, Point3, Angle1, Angle2) :=
    SwitchSpace ← concat("layout", sp, "s", sp, "model", sp)
    FreezeAll ← FreezeLayer("*")
    SectionLayer ← layer_new(SectionName, blue)
    DrawSection ← concat("Sectionplane", sp, "D")
    LT ← [0 m; .02 m; 0 m] if LorT == 1
    LT ← [.02 m; 0 m; 0 m] otherwise
    Direction ← point(Point2 + LT/2)
    Thaw ← concat("laythw")
    SectionPlanetoBlock ← concat("SPTB", sp, "last", Enter)
    Rotation ← stringit_nounits(Angle1/deg)
    InsertionPoint ← stack(point(Point3), "1", "1", Rotation)
    LayerOff ← LayerOff(SectionName)
    Flip ← stack("Rotate3D", "L", Enter, "y", "0,0,0", stringit_nounits(Angle2/deg))
    Layout ← stack(CreateLayout(SectionName), SetLayout(SectionName), VPortErase([0; 0]*m, [1000; 1000]*m), ChangeView([Point1[0]; Point1[2]], [Point2[0]; Point2[2]]))
    return stack(SwitchSpace, FreezeAll, SectionLayer, DrawSection, point(Point1), point(Point2), point(Point2 + LT), point(Point2 + LT + [0 m; 0 m; 1 m]), Enter, Direction, Thaw, SectionPlanetoBlock, InsertionPoint, LayerOff, Flip, Layout)
# Dir is 1 or 0 for forward or backward (based on which edge the plane is closer to)
# This revision does not work for the SPTB command! 'cannot process non-planar section'
SectionCut(Point1, Point2, Direction, SectionName, Point3, Angle1, Angle2) :=
    SwitchSpace ← concat("layout", sp, "s", sp, "model", sp)
    FreezeAll ← FreezeLayer("*")
    SectionLayer ← layer_new(SectionName, blue)
    DrawSection ← concat("Sectionplane", sp, "D")
    Direction ← concat(point(Direction))
    Thaw ← concat("laythw")
    SelectSection ← concat("Select", sp, "L")
    SectionPlanetoBlock ← concat("SPTB", sp, "last", Enter)
    Rotation ← stringit_nounits(Angle1/deg)
    InsertionPoint ← stack(point(Point3), "1", "1", Rotation)
    LayerOff ← LayerOff(SectionName)
    Flip ← stack("Rotate3D", "L", Enter, "y", "0,0,0", stringit_nounits(Angle2/deg))
    Layout ← stack(CreateLayout(SectionName), SetLayout(SectionName), VPortErase([0; 0]*m, [1000; 1000]*m), ChangeView([Point1[0]; Point1[2]], [Point2[0]; Point2[2]]))
    return stack(SwitchSpace, FreezeAll, SectionLayer, DrawSection, point(Point1), point(Point2), Enter, Direction, Thaw, SelectSection, sp, SectionPlanetoBlock, InsertionPoint, LayerOff, Flip, Layout)
SectionCut(Point1, Point2, LorT, Dir, SectionName, Point3, Angle1, Angle2) :=
    SwitchSpace ← concat("layout", sp, "s", sp, "model", sp)
    FreezeAll ← FreezeLayer("*")
    SectionLayer ← layer_new(SectionName, blue)
    DrawSection ← concat("Sectionplane", sp, "D")
    forward ← 1 if Dir == 1
    forward ← -1 otherwise
    LT ← [0 m; .02 m*forward; 0 m] if LorT == 1
    LT ← [.02 m*forward; 0 m; 0 m] otherwise
    Direction ← point(Point2 + LT/2)
    Thaw ← concat("laythw")
    SectionPlanetoBlock ← concat("Sectioner", sp, "last", Enter)
    Rotation ← stringit_nounits(Angle1/deg)
    InsertionPoint ← stack(point(Point3), "1", "1", Rotation)
    LayerOff ← LayerOff(SectionName)
    Flip ← stack("Rotate3D", "L", Enter, "y", "0,0,0", stringit_nounits(Angle2/deg))
    Layout ← stack(CreateLayout(SectionName), SetLayout(SectionName), VPortErase([0; 0]*m, [1000; 1000]*m), ChangeView([Point1[0]; Point1[2]], [Point2[0]; Point2[2]]))
    return stack(SwitchSpace, FreezeAll, SectionLayer, DrawSection, point(Point1), point(Point2), Enter, Direction, Thaw, SectionPlanetoBlock, InsertionPoint, LayerOff, Flip, Layout)
# name is in "quotes" and is the bit of the layer that should stay active!
OnlyLayer(name) := stack("-layer", "off", concat("~", name, "*"), "n", Enter)
# The basic version:
SectionCut(Point1, Point2, LorT, Dir, SectionName, Point3, Angle1, Angle2) :=
    DrawSection ← concat("Sectionplane", sp, "D")
    forward ← 1 if Dir == 1
    forward ← -1 otherwise
    LT ← [0 m; .02 m*forward; 0 m] if LorT == 1
    LT ← [.02 m*forward; 0 m; 0 m] otherwise
    Direction ← point(Point2 + LT/2)
    SectionPlanetoBlock ← concat("SPTB", sp, "last", Enter)
    InsertionPoint ← stack(point(Point3), "1", "1", 0)
    return stack(DrawSection, point(Point1), point(Point2), Enter, Direction, SectionPlanetoBlock, InsertionPoint)
SectionCutViews(Point1, Point2, Direction, SectionName, Point3, Angle1, Angle2, View) :=
    SwitchSpace ← concat("layout", sp, "s", sp, "model", sp)
    FreezeAll ← FreezeLayer("*")
    SectionLayer ← layer_new(SectionName, blue)
    DrawSection ← concat("Sectionplane", sp, "D")
    Direction ← concat(point(Direction))
    Thaw ← concat("laythw")
    SelectSection ← concat("Select", sp, "L")
    SectionPlanetoBlock ← concat("SPTB", sp, "last", Enter)
    Rotation ← stringit_nounits(Angle1/deg)
    InsertionPoint ← stack(point(Point3), "1", "1", Rotation)
    LayerOff ← LayerOff(SectionName)
    Flip ← stack("Rotate3D", "L", Enter, "y", "0,0,0", stringit_nounits(Angle2/deg))
    Layout ← stack(CreateLayout(SectionName), SetLayout(SectionName), VPortErase([0; 0]*m, [1000; 1000]*m), VPortNew([.013 m + Point1[0]; .013 m + Point1[1]], [.013 m + Point2[0]; .013 m + Point2[1]]), ChangeView([Point1[0]; Point1[2]], [Point2[0]; Point2[2]])) if View == "BackView"
    Layout ← stack(CreateLayout(SectionName), SetLayout(SectionName), VPortErase([0; 0]*m, [1000; 1000]*m), ChangeView([Point1[0]; Point1[2]], [Point2[0]; Point2[2]])) if View == "BackView"
    Layout ← stack(CreateLayout(SectionName), SetLayout(SectionName), VPortErase([0; 0]*m, [1000; 1000]*m), ChangeView([Point1[0]; Point1[2]], [Point2[0]; Point2[2]])) if View == "BackView"
    Layout ← stack(CreateLayout(SectionName), SetLayout(SectionName), VPortErase([0; 0]*m, [1000; 1000]*m), ChangeView([Point1[0]; Point1[2]], [Point2[0]; Point2[2]])) if View == "BackView"
    return stack(SwitchSpace, FreezeAll, SectionLayer, DrawSection, point(Point1), point(Point2), Enter, Direction, Thaw, SelectSection, sp, SectionPlanetoBlock, InsertionPoint, LayerOff, Flip, Layout)
SectionCutT(Point1, Point2, Direction, SectionName, Point3, Angle1, Angle2) :=
    SwitchSpace ← concat("layout", sp, "s", sp, "model", sp)
    FreezeAll ← FreezeLayer("*")
    SectionLayer ← layer_new(SectionName, blue)
    DrawSection ← concat("Sectionplane", sp, "D")
    Direction ← concat(point(Direction))
    Thaw ← concat("laythw")
    SelectSection ← concat("Select", sp, "L")
    SectionPlanetoBlock ← concat("SPTB", sp, "last", Enter)
    Rotation ← stringit_nounits(Angle1/deg)
    InsertionPoint ← stack(point(Point3), "1", "1", Rotation)
    LayerOff ← LayerOff(SectionName)
    Flip ← stack("Rotate3D", "L", Enter, "y", "0,0,0", stringit_nounits(Angle2/deg))
    Layout ← stack(CreateLayout(SectionName), SetLayout(SectionName), VPortErase([0; 0]*m, [1000; 1000]*m), VPortNew([Point3[0]; Point3[1]], [Point3[0] + Point2[0] - Point1[0]; Point3[1] + Point2[1] - Point1[1]]), ChangeView([0; 0]*m, [(Point2 - Point1)[0]; (Point2 - Point1)[1]]))
    return stack(FreezeAll, SectionLayer, DrawSection, Point1, Point2, Enter, Direction, Thaw, SelectSection, sp, SectionPlanetoBlock, InsertionPoint, LayerOff, Flip, Layout, SwitchSpace)
# summary of steps:
# copy all of the plant
# select the copy of the plant to slice
# slice along a plane
# retain one half of the slice
# slice just above the first plane (this is what needs to be kept in model view)
# define a model view for the thin slice
#
# repeat!
[Plant_Origin[0] + T_PlantWall; Plant_Origin[1] - T_PlantWall; Plant_Origin[2]]
# Where is the plant?
plantspace1 := [Plant_Origin[0] + 2*T_PlantWall; Plant_Origin[1] - 2*T_PlantWall; Plant_Origin[2]]
plantspace2 := [
    Plant_Origin[0] - 2*L_Sed;
    Plant_Origin[1] + 2*N_FlocChannels*W_Floc + 2*N_SedTanks*W_Sed;
    Plant_Origin[2]
]
up_z := [0; 0; H_Fi]
down_z := [0; 0; -H_Fi]
spacer_x := [2*L_Sed + T_PlantWall; 0; 0]
spacer_y := [0; 2*N_FlocChannels*W_Floc + 2*N_SedTanks*W_Sed + T_PlantWall; 0]
plantspace := stack(point(plantspace1 + down_z), point(plantspace2 + up_z))
amt := .02 m
tiny_x := [amt; 0; 0]
tiny_y := [0; amt; 0]  # Only one slice ALSO conceptual mode.
out_x := [1 m; 0; 0]
# L is 1 and T is 0
thinslice(point1, point2, LorT, Order, SectionName) :=
    LT ← tiny_y if LorT == 1
    LT ← tiny_x otherwise
    adj ← -2*Order*spacer_x
    newbase ← plantspace1 + adj
    copyspace ← stack(point(point1 - H_Fi), point(point2 + tiny_y + H_Fi))
    copyparts ← stack("copy", copyspace, Enter, point(plantspace1), point(newbase), Enter)
    slice1 ← stack("slice", point(newbase - .5*spacer_x - .5*spacer_y + down_z), point(newbase + (plantspace2 - plantspace1) + up_z), Enter, point(point1 + adj), point(point2 + adj), point(point1 + adj + LT))
    slice2 ← stack("slice", point(newbase - .5*spacer_x - .5*spacer_y + down_z), point(newbase + (plantspace2 - plantspace1) + up_z), Enter, point(point1 + adj + LT), point(point2 + adj + LT), point(point1 + adj - LT))
    modelview ← Enter
    return stack(copyparts, slice1, slice2)
Conslice(point1, point2, LorT, Order, SectionName) :=
    LT ← tiny_y if LorT == 1
    LT ← tiny_x otherwise
    adj ← -2*Order*spacer_x
    newbase ← plantspace1 + adj
    copyspace ← stack(point(point1 + down_z + out_x), point(plantspace2 + up_z))
    copyparts ← stack("copy", copyspace, Enter, point(plantspace1), point(newbase), Enter)
    slice1 ← stack("slice", point(newbase - .5*spacer_x - .5*spacer_y + down_z), point(newbase + (plantspace2 - plantspace1) + up_z), Enter, point(point1 + adj), point(point2 + adj), point(point1 + adj + LT))
    modelview ← Enter
    return stack(copyparts, slice1)
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# make rotation good, then everything should work!!!!!!!!!!!!!
# New information about sectionplanes:
# Use the ortho option. Pick the slice option.
# LONGITUDINAL
# The Longitudinal cuts are contained within this area. Each cut is explained and defined.
# 1) Just above the entrance tank upper wall (outside of the plant) - looking downward (negative y direction) inwards into the plant
Long11 := [Plant_Origin[0]; SedLaunderPipe_Origin[1]; Plant_Origin[2]]
# These two points have the same y and z coordinates, but different x coordinates.
Long12 := [
    Plant_Origin[0] + Fi_origin[0] - L_Fi - T_FiWall - 30 cm;
    SedLaunderPipe_Origin[1];
    Plant_Origin[2]
]
# One fix may be a section cut of something that is already a section: If the plant is cut in the desired place, it can be viewed from just inside of that and still show only a thin sliver of the plant.
# Make the direction of view the opposite!
Angle11 := 0 deg
InsertionPoint1L := [20 m; Plant_Origin[1]; Plant_Origin[2]]
Angle12 := 0.0001 deg
SectCut1L := SectionCut(Long11, Long12, 1, 0, "Longitudinal One", InsertionPoint1L, Angle11, Angle12)
Sec1 := Conslice(Long11, Long12, 1, 1, "Long One")
# 2) Entrance tank (through the center of the drainage pipes) - looking upward (positive y direction)
# L.EtSupport is no longer valid. Honestly, most of the entrance tank probably no longer works and will need to be changed! It will probably be added in as part of the flocculator. For now, 'SecCut2L' is not working!
Long21 := [Plant_Origin[0]; LFOM_Origin[1]; Plant_Origin[2]]
LFOM_Origin = [-4.67984; 7.25; 2.30168] m
Long22 := [Plant_Origin[0] - L_Floc; LFOM_Origin[1]; Plant_Origin[2]]
Angle21 := 0 deg
InsertionPoint2L := [2*20*m; Plant_Origin[1]; Plant_Origin[2]]
Angle22 := 180 deg
SectCut2L := stack(OnlyLayer("floc"), SectionCut(Long21, Long22, 1, 1, "Longitudinal Two", InsertionPoint2L, Angle21, Angle22))
Sec2 := Conslice(Long21, Long22, 1, 2, "Long Two")
# 3) Center of second Floc channel
Long31 := [Plant_Origin[0]; LFOM_Origin[1] - W_FlocChannel; Plant_Origin[2]]
Long32 := [Fi_origin[0]; LFOM_Origin[1] - W_FlocChannel; Plant_Origin[2]]
Angle31 := 0 deg
InsertionPoint3L := [3*20*m; Plant_Origin[1]; Plant_Origin[2]]
Angle32 := 180 deg
SectCut3L := SectionCut(Long31, Long32, 1, 1, "Longitudinal Three", InsertionPoint3L, Angle31, Angle32)
Sec3 := Conslice(Long31, Long32, 1, 3, "Long Three", "-layer", "on", "*", Enter)  # error: This function accepts at most 5 arguments but is applied to 9.
# 4) Flocculator (center of a channel, avoiding cutting chem barrels and plumbing off-center if possible) - looking upward
# T.FlocChannelWall is no longer a thing. Instead, using T.FlocWall in its place.
Long41 := [
    Floc_Origin[0];
    Floc_Origin[1] + (N_FlocChannels - 1)*W_FlocChannel + (N_FlocChannels - 1)*T_FlocWall + W_FlocChannel/2;
    Floc_Origin[2]
]
Long42 := [
    Floc_Origin[0] - L_Floc - T_PlantWall;
    Floc_Origin[1] + (N_FlocChannels - 1)*W_FlocChannel + (N_FlocChannels - 1)*T_FlocWall + W_FlocChannel/2;
    Floc_Origin[2]
]
Angle41 := 0 deg
InsertionPoint4L := [4*20*m; Plant_Origin[1]; Plant_Origin[2]]
Angle42 := 180 deg
Layeroff4L := stack(LayerOff("FlocModSpacerPlu"), LayerOff("FlocModCapPlu"), LayerOff("FlocModPipePlu"), LayerOff("FlocModConnectPipePlu"), LayerOff("FlocModCouplingPlu"), LayerOff("EtCon"), LayerOff("EtDrainCouplingsPlu"), LayerOff("EtDrainPipesPlu"), LayerOff("EtDrainPipesPlu"), LayerOff("EtDrainStoppersPlu"), LayerOff("EtDrainValveGripPlu"), LayerOff("EtDrainValveMetalPlu"), LayerOff("EtFlowControlAdapterPlu"), LayerOff("EtFlowControlFittingPlu"), LayerOff("EtFlowControlPipePlu"), LayerOff("EtFlowControlValvePlu"), LayerOff("EtInletFittingPlu"), LayerOff("EtInletPipePlu"), LayerOff("EtOverflowFittingPlu"), LayerOff("EtOverflowPipePlu"), LayerOff("EtTrashrack"), LayerOff("OpWalkwayCon"))
SectCut4L := SectionCut(Long41, Long42, 1, "Longitudinal Four", InsertionPoint4L, Angle41, Angle42)
SectCut4Lf := stack(SectCut4L, Layeroff4L)  # error: This value has the form: (ƒ(any1) → [any2], [any3]), but must have the form: UniTup2 ƒ(any1) → [any2].
Sec4 := thinslice(Long41, Long42, 1, 4, "Long Four")
# 5) Sedimentation tank (down the center of a bay - try to the choose one that cuts the filter in an informative way) - looking upward
# W.SedBay is not real. W.Sed is the same as W.SedPlates... using this for now.
Long51 := [
    Plant_Origin[0] + T_PlantWall;
    Plant_Origin[1] + (N_SedTanks - 1)*W_Sed + (N_SedTanks - 1)*T_SedDividingWall + W_Sed/2;
    Plant_Origin[2]
]  # T.SedWallDivider is now T_SedDividingWall
Long52 := [
    Floor_Dim[0];
    Plant_Origin[1] + (N_SedTanks - 1)*W_Sed + (N_SedTanks - 1)*T_SedDividingWall + W_Sed/2;
    Plant_Origin[2]
]
Angle51 := 0 deg
InsertionPoint5L := [-20 m; Plant_Origin[1]; Plant_Origin[2]]
Angle52 := 180 deg
LayeroffFloc := stack(LayerOff("FlocTankCon"), LayerOff("FlocModSpacerPlu"), LayerOff("FlocModPipePlu"), LayerOff("FlocModCouplingPlu"), LayerOff("FlocModConnectPipePlu"), LayerOff("FlocModCapPlu"), LayerOff("FlocModBaffles"), LayerOff("FlocDrainAdapterPlu"), LayerOff("FlocDrainCouplingPlu"), LayerOff("FlocDrainPipePlu"), LayerOff("FlocDrainValveGripPlu"), LayerOff("FlocDrainValveMetalPlu"), LayerOff("FlocDrainValvePlu"), LayerOff("FlocOrificePlateRod"), LayerOff("FlocRMCouplingPlu"), LayerOff("FlocRMOrificePlate"), LayerOff("FlocRMPlateHolder"), LayerOff("OPWalkwayCon"), LayerOff("DrainChannelCon"))
LayeroffEt := stack(LayerOff("EtCon"), LayerOff("EtDrainCouplingsPlu"), LayerOff("EtDrainPipesPlu"), LayerOff("EtDrainStoppersPlu"), LayerOff("EtDrainValveGripPlu"), LayerOff("EtDrainValveMetalPlu"), LayerOff("EtFlowControlAdapterPlu"), LayerOff("EtFlowControlFittingPlu"), LayerOff("EtFlowControlPipePlu"), LayerOff("EtInletFittingPlu"), LayerOff("EtInletPipePlu"), LayerOff("EtOverflowFittingPlu"), LayerOff("EtOverflowPipePlu"), LayerOff("EtTrashrack"), LayerOff("EtRmElbowPlu"), LayerOff("EtRmPipePlu"), LayerOff("EtFlowControlValvePlu"))
SectCut5L := SectionCut(Long51, Long52, 1, 0, "Longitudinal Five", InsertionPoint5L, Angle51, Angle52)
SectCut5Lf := stack(SectCut5L, LayeroffFloc, LayeroffEt)
Sec5 := thinslice(Long51, Long52, 1, 5, "Long Five")
# 6) Filter (through the center of the overflow box if there are two filters) - looking upward
Long61 := [FiOverflowBox_Origin[0]; FiOverflowBox_Origin[1] + W_FiOverflow/2; FiOverflowBox_Origin[2]]
Long62 := [
    FiOverflowBox_Origin[0] - L_FiOverflow;
    FiOverflowBox_Origin[1] + W_FiOverflow/2;
    FiOverflowBox_Origin[2]
]
Angle61 := 0 deg
InsertionPoint6L := [-20 m; Plant_Origin[1]; Plant_Origin[2]]
Angle62 := 180 deg
SectCut6L := SectionCut(Long61, Long62, 1, 0, "Longitudinal Six", InsertionPoint6L, Angle61, Angle62)
Sec6 := thinslice(Long61, Long62, 1, 6, "Long Six")
# 7) Sedimentation tank with plates (down the center of the bay) - looking upward
Long71 := [Plant_Origin[0] + T_PlantWall; Plant_Origin[1] + W_Sed/2; Plant_Origin[2]]
Long72 := [Plant_Origin[0] - L_Sed - T_PlantWall - Z_Walkway/2; Plant_Origin[1] + W_Sed/2; Plant_Origin[2]]
Angle71 := 0 deg
InsertionPoint7L := [-20 m; Plant_Origin[1]; Plant_Origin[2]]
Angle72 := 180 deg
SectCut7L := SectionCut(Long71, Long72, 1, 0, "Longitudinal Seven", InsertionPoint7L, Angle71, Angle72)
LayeroffFloc := stack(LayerOff("FlocTankCon"), LayerOff("FlocModSpacerPlu"), LayerOff("FlocModPipePlu"), LayerOff("FlocModCouplingPlu"), LayerOff("FlocModConnectPipePlu"), LayerOff("FlocModCapPlu"), LayerOff("FlocModBaffles"), LayerOff("FlocDrainAdapterPlu"), LayerOff("FlocDrainCouplingPlu"), LayerOff("FlocDrainPipePlu"), LayerOff("FlocDrainValveGripPlu"), LayerOff("FlocDrainValveMetalPlu"), LayerOff("FlocDrainValvePlu"), LayerOff("FlocOrificePlateRod"), LayerOff("FlocRMCouplingPlu"), LayerOff("FlocRMOrificePlate"), LayerOff("FlocRMPlateHolder"), LayerOff("OPWalkwayCon"), LayerOff("DrainChannelCon"))
LayeroffEt := stack(LayerOff("EtCon"), LayerOff("EtDrainCouplingsPlu"), LayerOff("EtDrainPipesPlu"), LayerOff("EtDrainStoppersPlu"), LayerOff("EtDrainValveGripPlu"), LayerOff("EtDrainValveMetalPlu"), LayerOff("EtFlowControlAdapterPlu"), LayerOff("EtFlowControlFittingPlu"), LayerOff("EtFlowControlPipePlu"), LayerOff("EtInletFittingPlu"), LayerOff("EtInletPipePlu"), LayerOff("EtOverflowFittingPlu"), LayerOff("EtOverflowPipePlu"), LayerOff("EtTrashrack"), LayerOff("EtRmElbowPlu"), LayerOff("EtRmPipePlu"), LayerOff("EtFlowControlValvePlu"))
LayeroffFi := stack(LayerOff("FiAuxFittingPlu"), LayerOff("FiAuxPipePlu"), LayerOff("FiAuxRemovablePlu"), LayerOff("FiBaffles"), LayerOff("FiBallValveGripMetalPlu"), LayerOff("FiBallValveMetalPlu"), LayerOff("FiCon"), LayerOff("FiDistFittingPlu"), LayerOff("FiDistPipePlu"), LayerOff("FiDrainValveGripPlu"), LayerOff("FiDrainValveMetalPlu"), LayerOff("FiEntExitBoxCon"), LayerOff("FiFerncoCouplingsPlu"), LayerOff("FiFittingsPlu"), LayerOff("FiInletChannelCon"), LayerOff("FiInletFittingsPlu"), LayerOff("FiInletPipePlu"), LayerOff("FiManBranchPlu"), LayerOff("FiManCapPlu"), LayerOff("FiManPipePlu"), LayerOff("FiPipePlu"), LayerOff("FiRemovablePlu"), LayerOff("FiSandDrainPlu"), LayerOff("FiTankCon"), LayerOff("FiValvePlu"))
LayeroffCdc := stack(LayerOff("CdcAll"), LayerOff("CdcCalColumnPlu"), LayerOff("CdcCalColumnStand"), LayerOff("CdcColumnCapsPlu"), LayerOff("CdcFittings"), LayerOff("CdcFloatCapPlu"), LayerOff("CdcFloatPipePlu"), LayerOff("CdcLayer"), LayerOff("Cdcsliders"))
SectCut7Lf := stack(SectCut7L, LayeroffFloc, LayeroffEt, LayeroffFi, LayeroffCdc)
Sec7 := thinslice(Long71, Long72, 1, 7, "Long Seven")
# 8) Just below the last sed tank wall (outside of the plant) - looking upward (inwards into the plant)
Long81 := [Plant_Origin[0] + T_PlantWall; Et_Origin[1] + T_PlantWall; Plant_Origin[2]]
Long82 := [
    Plant_Origin[0] + Fi_origin[0] - L_Fi - T_FiWall - 30 cm;
    Et_Origin[1] + T_PlantWall;
    Plant_Origin[2]
]
Angle81 := 0 deg
InsertionPoint8L := [-20 m; Plant_Origin[1]; Plant_Origin[2]]
Angle82 := 180 deg
SectCut8L := SectionCut(Long81, Long82, 1, 1, "Longitudinal Eight", InsertionPoint8L, Angle81, Angle82)
# This one will look through the entire plant.
# TRANSVERSAL
# The Transversal cuts are contained within this area. Each cut is explained and defined.
# 1) through sed tanks and floc tanks
Trans11 := [Plant_Origin[0] - S_FlocBaffle; Plant_Origin[1] - T_PlantWall; Plant_Origin[2]]
# These have the same x and z coordinates, but different y coordinates.
Trans12 := [Plant_Origin[0] - S_FlocBaffle; Et_Origin[1] + T_PlantWall + W_Et; Plant_Origin[2]]
AngleT11 := 0 deg
Dir1T := [Plant_Origin[0]; Plant_Origin[1]; Plant_Origin[2]]
InsertionPoint1T := [20 m; Plant_Origin[1] + 20 m; Plant_Origin[2]]
AngleT12 := 180 deg
SectCut1T := SectionCut(Trans11, Trans12, 0, 1, "Transversal One", InsertionPoint1T, AngleT11, AngleT12)
Sec9 := thinslice(Trans11, Trans12, 0, 9, "Trans One")
# 2) Inside the filter box (through the center of a branch) - looking left (negative x direction)
Trans21 := [Fi_origin[0] - L_Fi/2; Fi_origin[1] - T_FiWall; Plant_Origin[2]]
Trans22 := [Fi_origin[0] - L_Fi/2; Fi_origin[1] + N_Fi*W_Fi + T_FiWall; Plant_Origin[2]]
AngleT21 := 0 deg
Dir2T := [Plant_Origin[0] + Floor_Dim[0]; Plant_Origin[1]; Plant_Origin[2]]
InsertionPoint2T := [20 m; Plant_Origin[1] + 2*20*m; Plant_Origin[2]]
AngleT22 := 0.0001 deg
SectCut2T := stack(OnlyLayer("fi"), SectionCut(Trans21, Trans22, 0, 0, "Transversal Two", InsertionPoint2T, AngleT21, AngleT22))
Sec10 := thinslice(Trans21, Trans22, 0, 10, "Trans Two")
# 3) Between the filter box and the filter’s exit box (avoid cutting the vertical siphon pipe or cut it down the center, if possible avoid cutting chemical tanks and plumbing off center) - looking left
Trans31 := [FiSiphonTee2_Origin[0] + ShortTeeLength(ND_FiSiphon); Fi_origin[1] - T_FiWall; Plant_Origin[2]]
Trans32 := [
    FiSiphonTee2_Origin[0] + ShortTeeLength(ND_FiSiphon);
    Fi_origin[1] + N_Fi*W_Fi + T_FiWall;
    Plant_Origin[2]
]
AngleT31 := 0 deg
Dir3T := [Plant_Origin[0] + Floor_Dim[0]; Plant_Origin[1]; Plant_Origin[2]]
InsertionPoint3T := [20 m; Plant_Origin[1] + 3*20*m; Plant_Origin[2]]
AngleT32 := 180 deg
SectCut3T := SectionCut(Trans31, Trans32, 0, 0, "Transversal Three", InsertionPoint3T, AngleT31, AngleT32)
Sec11 := thinslice(Trans31, Trans32, 0, 11, "Trans Three")
# 4) Inside the filter’s entrance box (through the center of the most distance entrance pipes or to the right of them) - looking left
# ConRadius no longer exists. It is now OR.Fitting
Trans41 := [
    FiEntranceBox_origin[0] - L_FiEntrance + L_FiOverflowWeir - (OR_Fitting(ND_FiTrunk) + S_Fitting);
    FiEntranceBox_origin[1];
    FiEntranceBox_origin[2]
]
Trans42 := [
    FiEntranceBox_origin[0] - L_FiEntrance + L_FiOverflowWeir - (OR_Fitting(ND_FiTrunk) + S_Fitting);
    FiEntranceBox_origin[1] + W_FiEntrance;
    FiEntranceBox_origin[2]
]
AngleT41 := 0 deg
Dir4T := [
    FiEntranceBox_origin[0] - L_FiEntrance;
    FiEntranceBox_origin[1] + W_FiEntrance;
    FiEntranceBox_origin[2]
]
InsertionPoint4T := [-20 m; Plant_Origin[1]; Plant_Origin[2]]
AngleT42 := 180 deg
SectCut4T := SectionCut(Trans41, Trans42, 0, 0, "Transversal Four", InsertionPoint4T, AngleT41, AngleT42)
# FiSiphonChannelPipe.Origin is not real any more. Is this the best location for this 'Trans'?
# 5) Drain channel (through the center of the siphon pipe exits or to the right of them, avoid cutting into the sed tank drain valves if possible) - looking left
FiSiphonDrainExit_x := FiSiphonTee2_Origin[0] + ShortTeeLength(ND_FiSiphon)
Trans51 := [FiSiphonDrainExit_x; Floor_Dim[1] - T_PlantWall; Plant_Origin[2]]
Trans52 := [FiSiphonDrainExit_x; Plant_Origin[1] - T_PlantWall; Plant_Origin[2]]
Dir5T := [Fi_origin[0]; Fi_origin[1]; Fi_origin[2]]
AngleT51 := 0 deg
InsertionPoint5T := [-20 m; Plant_Origin[1]; Plant_Origin[2]]
AngleT52 := 180 deg
SectCut5T := SectionCut(Trans51, Trans52, 0, 0, "Transversal Five", InsertionPoint5T, AngleT51, AngleT52)
# 6) Center of the first hopper of the entrance tank (should take care of flocculator and sed tank transversal cuts) - looking left
# Again, the entrance tank has totally changed! What would a more helpful slice be? Are we scrapping anything that is just the entrance tank?
Trans61 := [
    (Et_Origin[0] - L_EtHopper - T_EtHopperLedge) - S_Fitting - ConRadius(ND_EtDrain);
    Floor_Dim[1] - T_PlantWall;
    Plant_Origin[2]
]
Trans62 := [
    (Et_Origin[0] - L_EtHopper - T_EtHopperLedge) - S_Fitting - ConRadius(ND_EtDrain);
    Plant_Origin[1] - T_PlantWall;
    Plant_Origin[2]
]
AngleT61 := 0 deg
Dir6T := [Fi_origin[0]; Fi_origin[1]; Fi_origin[2]]
InsertionPoint6T := [-20 m; InsertionPoint2T[1]; InsertionPoint2T[2]]
AngleT62 := 180 deg
SectCut6T := SectionCut(Trans61, Trans62, 0, 1, "Transversal Six", InsertionPoint6T, AngleT61, AngleT62)
LayeroffFi := stack(LayerOff("FiAuxFittingPlu"), LayerOff("FiAuxPipePlu"), LayerOff("FiAuxRemovablePlu"), LayerOff("FiBaffles"), LayerOff("FiBallValveGripMetalPlu"), LayerOff("FiBallValveMetalPlu"), LayerOff("FiCon"), LayerOff("FiDistFittingPlu"), LayerOff("FiDistPipePlu"), LayerOff("FiDrainValveGripPlu"), LayerOff("FiDrainValveMetalPlu"), LayerOff("FiEntExitBoxCon"), LayerOff("FiFerncoCouplingsPlu"), LayerOff("FiFittingsPlu"), LayerOff("FiInletChannelCon"), LayerOff("FiInletFittingsPlu"), LayerOff("FiInletPipePlu"), LayerOff("FiManBranchPlu"), LayerOff("FiManCapPlu"), LayerOff("FiManPipePlu"), LayerOff("FiPipePlu"), LayerOff("FiRemovablePlu"), LayerOff("FiSandDrainPlu"), LayerOff("FiTankCon"), LayerOff("FiValvePlu"))
SectCut6Tf := stack(SectCut6T, LayeroffFi)
# 7) To the right of the furthest wall of the sed/floc tanks (outside the plant) - looking left (inwards into the plant)
Trans71 := [Plant_Origin[0] + T_PlantWall; Plant_Origin[1] - T_PlantWall; Plant_Origin[2]]
Trans72 := [Plant_Origin[0] + T_PlantWall; Et_Origin[1] + T_PlantWall + W_Et; Plant_Origin[2]]
AngleT71 := 0 deg
Dir7T := [Fi_origin[0]; Fi_origin[1]; Fi_origin[2]]
InsertionPoint7T := [20 m; Plant_Origin[1]; Plant_Origin[2]]
AngleT72 := 0.0001 deg
SectCut7T := SectionCut(Trans71, Trans72, 0, 1, "Transversal Seven", InsertionPoint7T, AngleT71, AngleT72)
# Additional graphs
# ad1) To the right of the sedimentation tanks with section cut in the middle - looking right
LongAD11 := [Plant_Origin[0] + T_PlantWall - L_Sed/2; Plant_Origin[1]; Plant_Origin[2]]
LongAD12 := [
    Plant_Origin[0] + T_PlantWall - L_Sed/2;
    Plant_Origin[1] + 3*W_Sed + 2*T_PlantWall;
    Plant_Origin[2]
]
AngleAD11 := 0 deg
DirAD1 := [Plant_Origin[0]; Plant_Origin[1] + 3*W_Sed + 2*T_PlantWall; Plant_Origin[2]]
InsertionPointAD1 := [20 m; InsertionPoint2T[1]; InsertionPoint2T[2]]
AngleAD12 := 0.0001 deg
SectCutAD1 := SectionCut(LongAD11, LongAD12, 0, 1, "Transversal Eight", InsertionPointAD1, AngleAD11, AngleAD12)
LayeroffPartSed := stack(LayerOff("SedRemovablePlu"), LayerOff("SedModCapPlu"), LayerOff("SedPipePlu"), LayerOff("SedModPipePlu"), LayerOff("SedModSpacerPlu"))
SectCutAD1f := stack(SectCutAD1, LayeroffPartSed)
# ad2) Sedimentation tanks with section cut in the middle - looking front
LongAD12 := [Plant_Origin[0]; Plant_Origin[1] + W_Sed; Plant_Origin[2]]
LongAD22 := [Plant_Origin[0] - L_Sed; Plant_Origin[1] + W_Sed; Plant_Origin[2]]
AngleAD21 := 0 deg
DirAD2 := [Plant_Origin[0] - L_Sed; Plant_Origin[1]; Plant_Origin[2]]
InsertionPointAD2 := [-20 m; InsertionPoint2T[1]; InsertionPoint2T[2]]
AngleAD22 := 180 deg
SectCutAD2 := SectionCut(LongAD12, LongAD22, 0, 1, "Sedimentation Cross Section", InsertionPointAD2, AngleAD21, AngleAD22)
# OLD LAYOUTS AC FILE
# This area is code from a previous semester that we used to help guide our creation of the SectionCut function. It is merely here as reference.
# New idea: create slices of the plant.
Lang := stringit_nounits(Language)
SetLayout(Layout) := concat("layout", sp, "s", sp, Layout)
RenameLayout(Original, New) := stack(concat("layout", sp, "r", sp, Original), New)
PrepLayouts := stack("laythw", concat("-layout", sp, "t", sp, "AguaClara", sp, Lang), "View", concat("layout", sp, "d", sp, "Layout1"), concat(sp, "d", sp, "Layout2"))
RenameView := RenameLayout("View", "TopView")
SetTopView := SetLayout("TopView")
# Sed layers - "Sed"
# Filter layers - "Fi"
# Floc Layers - "Floc"
# EntranceTank Layers - "Et"
# Cdc layers - "Cdc"
# rapid mix layers - "RM"
# coagulant tank layers - "Coag"
# chlorine tank layers - "Chlor"
ZoomView := concat("z", sp, "o", sp, "all", sp)
# .ms
TopViewPlantOld := stack(RenameView, SetTopView, ".ms", ZoomView)
LoadTemplate := stack(concat("-layout", sp, "t", sp, "AguaClara", sp, Lang), "View")
RenameFrontView := RenameLayout("View", "FrontView")
SetFrontView := SetLayout("FrontView")
# ZoomView
FrontViewPlant := stack(LoadTemplate, RenameFrontView, SetFrontView, ".ms", view("f"), ZoomView)
RenameLeftView := RenameLayout("View", "LeftView")
SetLeftView := SetLayout("LeftView")
# ZoomView
LeftViewPlant := stack(LoadTemplate, RenameLeftView, SetLeftView, ".ms", view("l"), ZoomView)
# Layouts of specific pieces
EtLayout := ViewPort(["~Et*"], "Et", Lang)
FlocLayout := ViewPort(["~Floc*"], "Floc", Lang)
SedOpLayout := ViewPort(["~Sed*"; "SedInletStopperPlu"; "SedLaunderCouplingCapPlu"], "RunningSed", Lang)
SedDrainLayout := ViewPort(["~Sed*"], "DrainingSed", Lang)
SedRefillLayout := ViewPort(["~Sed*"; "SedLaunderCouplingCapPlu"], "RefillingSed", Lang)
FiltLayout := ViewPort(["~Fi*"], "Filt", Lang)
CdcLayout := ViewPort(["~Cdc*"], "Cdc", Lang)
# Special Layouts
BaffleModuleLayout := ViewPort(["~FlocMod*"], "FlocModule", Lang)
SedModuleLayout := ViewPort(["~SedMod*"], "SedLamina", Lang)
CoagLayout := ViewPort(["~Coag*"], "Coag", Lang)
ChlorLayout := ViewPort(["~Chlor*"], "Chlor", Lang)
ConcreteLayout := ViewPort(["~*Con"], "Concrete", Lang)
PipingLayout := ViewPort(["~*Plu"], "Plu", Lang)
SpecificLayouts :=
    stack(SedModuleLayout, CoagLayout, ChlorLayout, ConcreteLayout, PipingLayout) if EN_FlocHoriz == 1
    stack(BaffleModuleLayout, SedModuleLayout, CoagLayout, ChlorLayout, ConcreteLayout, PipingLayout) otherwise
DimensionScript :=
    SedTopDimLayer ← layer_new("SedTopDimension", purple)
    AddDim1 ← LinearDim(Plant_Origin, W_Sed, L_Sed + W_Sed, "v")
    AddDim2 ← LinearDim(Plant_Origin, -L_Sed, echannelbox_dim[1] + .5 m, "h")
    AddDim3 ← LinearDim(echannel_origin, echannelbox_dim[1], -W_Sed, "v")
    AddDim4 ← LinearDim(echannel_origin, -echannelbox_dim[0], -W_Sed, "h")
    AddDim5 ← LinearDim(channel_origin, -channelbox_dim[0], -W_Sed, "h")
    SedTopDim ← concat(AddDim1, AddDim2, AddDim3, AddDim4, AddDim5)
    SedSideDimLayer ← layer_new("SedSideDimension", purple)
    SedFrontDimLayer ← layer_new("SedFrontDimension", purple)
    return concat(SedTopDimLayer, SedTopDim, SedSideDimLayer, SedFrontDimLayer)
AC_Layout := stack(PrepLayouts, TopViewPlant, FrontViewPlant, LeftViewPlant, EtLayout, FlocLayout, SedOpLayout, SedDrainLayout, SedRefillLayout, FiltLayout, CdcLayout, SpecificLayouts, concat("layout", sp, "s", sp, "model", sp), [concat("-view", sp, "_SEISO", sp)])
OldAC_Layout := stack(PrepLayouts, TopViewPlant, FrontViewPlant, LeftViewPlant, EtLayout, FlocLayout, SedOpLayout, SedDrainLayout, SedRefillLayout, FiltLayout, CdcLayout, SpecificLayouts, ReturnToModelSpace, view("se"))
# Code based on LFOM Template
# Need - matrix of points that you would grab the section planes from
SectionNames := ["Floc"; "Sed"; "Sed"; "Sed"; "Sed"; "Sed"; "Sed"; "Sed"; "Sed"; "Sed"; "Sed"; "Sed"; "Sed"; "Sed"; "Sed"]
SectionPoints := [
    InsertionPoint1L, Long11, Long12;
    InsertionPoint2L, Long21, Long22;
    InsertionPoint3L, Long31, Long32;
    InsertionPoint4L, Long41, Long42;
    InsertionPoint5L, Long51, Long52;
    InsertionPoint6L, Long61, Long62;
    InsertionPoint7L, Long71, Long72;
    InsertionPoint8L, Long81, Long82;
    InsertionPoint1T, Trans11, Trans12;
    InsertionPoint2T, Trans21, Trans22;
    InsertionPoint3T, Trans31, Trans32;
    InsertionPoint4T, Trans41, Trans42;
    InsertionPoint5T, Trans51, Trans52;
    InsertionPoint6T, Trans61, Trans62;
    InsertionPoint7T, Trans71, Trans72
]
PrepLayouts := stack("laythw", concat("-layout", sp, "t", sp, "AguaClara", sp, Lang), "View", concat("layout", sp, "d", sp, "Layout1"), concat(sp, "d", sp, "Layout2"))
SetUpLayouts(Names, Points) :=
    Layout ← CreateLayout(Names[0])
    a ← 0
    for i ∈ 0 .. last(Names)
        Layout ← CreateLayout(Names[i])
        Layout ← stack(Layout, SetLayout(Names[i]), VPortErase([0; 0]*m, [10; 7.7]*m), VPortNew(Points[:, 0][i], Points[:, 0][i] + Points[:, 2][i] - Points[:, 1][i]), ChangeView([0; 0]*m, [(Points[:, 2][i] - Points[:, 1][i])[0]; (Points[:, 2][i] - Points[:, 1][i])[1]])) if a == 0
        Layout ← stack(Layout, CreateLayout(Names[i]), SetLayout(Names[i]), VPortErase([0; 0]*m, [10; 7.7]*m), VPortNew(Points[:, 0][i], Points[:, 0][i] + Points[:, 2][i] - Points[:, 1][i]), ChangeView([0; 0]*m, [(Points[:, 2][i] - Points[:, 1][i])[0]; (Points[:, 2][i] - Points[:, 1][i])[1]])) if a > 0
        a ← a + 1
    return Layout
SetUpSectionCutsLayouts := SetUpLayouts(SectionNames, SectionPoints)
VPortNew(SectionPoints[:, 0][0], SectionPoints[:, 0][0] + SectionPoints[:, 2][0] - SectionPoints[:, 1][0]) =  # error: This variable is undefined.
ReturnToModelSpace := concat("layout", sp, "s", sp, "model", sp)
CreateLayout(SectionNames[0]) = "-layout n Floc "
SetUpLayouts(SectionNames, SectionPoints)
LongitudinalCutsStack == stack(BackViewPlant, SectCut1L, SectCut2L, SectCut3L, SectCut4L, SectCut5L, SectCut6L, SectCut7L, SectCut8L, FrontViewPlant)  # Old
LongitudinalCutsStack := stack(TopViewPlant, SectCut1L, SectCut3L, SectCut4L, SectCut5L, SectCut6L, SectCut7L, SectCut8L, FrontViewPlant)  # error: This value has the form: ([any1], [any1], [any1], ƒ(any2) → [any3], [any4], [any5], [any6], [any7], [any8]), but must have the form: UniTup9 [any1].
TransversalCutsStack == stack(LeftViewPlant, SectCut1T, RightViewPlant, SectCut2T, SectCut3T, SectCut4T, SectCut5T, SectCut6T, SectCut7T, SectCutAD1, SectCutAD2)
# Old
TransversalCutsStack := stack(SectCut1T, SectCut2T, SectCut3T, SectCut4T, SectCut5T, SectCut7T, SectCutAD1, SectCutAD2)
AC_SectionCuts := stack(LongitudinalCutsStack, TransversalCutsStack)
# Note that the 'view' of the plant is important to set before each cut and should be changed accordingly during individual cut testing.
# I'm not sure that the transversal cuts are working...
# This has to come first in the beta server but does not go into testing on other computers.
testSC1 := stack(TopViewPlant, SectCut1L)
netload := stack("netload", "sectionplanetoblock.ddl")
testSC2 := AC_SectionCuts
TEST := stack(LoadTop, "ungroup", "all", "y", "shademode", "h", Sec1, Sec2, Sec3)
TEST2 := stack(LoadTop, "ungroup", "all", "y", "shademode", "h", SectCut1L, SectCut3L)
Test2 := stack(LoadTop, SectCut1L, SectCut2L, SectCut3L, SectCut1T, SectCut2T, SectCut3T, "-layer", "on", "*", Enter)
# [component: inputs Test2]
