# [reference: MasterProgram.xmcd]
Sedbottomslopes_origin := [0; 0; 0]*m
Sedbottomslopes_dim := [
    Sedbottomslopes_origin[0] + W_SedBayActual;
    Sedbottomslopes_origin[1] + H_SedSludge + T_SedSludge;
    Sedbottomslopes_origin[2] + L_Sed
] = [1.0045; 0.164384; 9.52822] m
# add origin points and dimension points
SedDrain_origin := [
    Sedbottomslopes_origin[0] + Sedbottomslopes_dim[0]/2 - W_SedSludge/2;
    Sedbottomslopes_origin[1];
    Sedbottomslopes_origin[2]
] = [0.412507; 0; 0] m
SedDrain_dim := [SedDrain_origin[0] + W_SedSludge; SedDrain_origin[1] + H_SedSludge; SedDrain_origin[2] + L_Sed] = [0.591993; 0.0897425; 9.52822] m
SedDrainCover_origin := [
    Sedbottomslopes_origin[0] + Sedbottomslopes_dim[0]/2 - W_SedDrainCover/2;
    Sedbottomslopes_origin[1] + H_SedSludge;
    Sedbottomslopes_origin[2]
]
SedDrainCover_dim := [
    SedDrainCover_origin[0] + W_SedDrainCover;
    SedDrainCover_origin[1] + T_SedSludge;
    SedDrainCover_origin[2] + L_Sed
]
Sedbottomslopeslope_origin := [
    Sedbottomslopes_origin[0] + W_SedInletBottom;
    Sedbottomslopes_origin[1] + Sedbottomslopes_dim[1];
    Sedbottomslopes_origin[2]
]
Sedbottomslopeslope_mirrorline := [
    Sedbottomslopeslope_origin[0] + W_SedDrainCover/2;
    Sedbottomslopeslope_origin[1];
    Sedbottomslopeslope_origin[2]
]
AC_SedBottomSlopeScript :=
    win1 ← [Sedbottomslopes_origin[0] - zc; Sedbottomslopes_origin[1] - zc; Sedbottomslopes_origin[2] - zc]
    win2 ← [Sedbottomslopes_dim[0] + zc; Sedbottomslopes_dim[1] + zc; Sedbottomslopes_dim[2] + zc]
    zoom1 ← zoom_win(win1, win2)
    pline1 ← pline([Sedbottomslopeslope_origin[0]; Sedbottomslopeslope_origin[1]], [Sedbottomslopeslope_origin[0] - W_SedInletBottom; Sedbottomslopeslope_origin[1]], [
        Sedbottomslopeslope_origin[0] - W_SedInletBottom;
        Sedbottomslopeslope_origin[1] + W_SedInletBottom*tan(AN_SedBottom)
    ])
    extrude1 ← extrude(Sedbottomslopeslope_origin, L_Sed)
    mirror3d1 ← mirror3dyz(Sedbottomslopeslope_origin, Sedbottomslopeslope_mirrorline)
    box1 ← box(Sedbottomslopes_origin, Sedbottomslopes_dim)
    box2 ← box(SedDrain_origin, SedDrain_dim)
    box3 ← box(SedDrainCover_origin, SedDrainCover_dim)
    subtract1 ← subtractD(Sedbottomslopes_origin, SedDrain_origin)
    subtract2 ← subtractD(Sedbottomslopes_origin, SedDrainCover_origin)
    unionall ← union_allA
    rotate3d1 ← rotate_3d(origin, origin, "x", 90)
    rotate3d2 ← rotate_3d(origin, origin, "z", 270)
    one ← stack(zoom1, pline1, extrude1, mirror3d1, box1, box2, box3, subtract1, subtract2, unionall, rotate3d1, rotate3d2)
    return one
# [component: inputs AC_SedBottomSlopeScript]
