# Flocculation Function
# The Flocculator program should be calculating the spacing between baffles for all sections. the number of baffles in each section and the placement of the baffles throughout the flocculator.
# References:
HW_Sed := 2 m
# The length of one channel of the flocculator is equal to the length of a sed tank . Therefore the total length is equal to the number of channels times the length of a sed tank. The width of a flocculator is equal to the width of a sed tank divided by the number of channels (to make "upward velocity" equal in the two tanks. The water depth at the end of the flocculaor must be the same as the water depth in the sed tank.
# [reference: BasicInputs.xmcd]
# [reference: ExpertInputs.xmcd]
# [reference: DesignAssumptions.xmcd]
# [reference: MathFunctions.xmcd]
# [reference: PipeDatabase.xmcd]
# [reference: MinorLossCoefficients.xmcd]
# [reference: FluidsFunctions.xmcd]
# [reference: Influent Sed Manifold.xmcd]
# [reference: SludgeDrain.xmcd]
# [reference: Sedimentation Dimensions.xmcd]
# [reference: Inlet Channel.xmcd]
# [reference: Launder.xmcd]
# [reference: Exit Channel.xmcd]
# [reference: Lamella.xmcd]
# I changed the Π.FlocBod. This is great because this parameter actually makes sense with the model predictions. I had reduced the value from the model predictions previously to get the value of 30 m^2/3 because I erroneously thought that the model predictions were giving too large a residence time.
# [reference: Floc Hopper.xmcd]
# [reference: EntranceTankDim.xmcd]
# Floc Calculations:
# Add equation here to check for minimum width that gives a baffle spacing that is
HW_FlocEnd := HW_Sed = 2 m
# possible ED values
S_FlocBaffleEnd := 1/2*HW_FlocEnd = 1 m
6.4, 1.6, 0.4
W_FlocChannel := max(2*Q_Plant/HW_FlocEnd*(K_FlocBaffle180/(2*Pi_Epsilon*HW_FlocEnd*ED_Floc[last(ED_Floc)]))^(1/3), W_FlocChannelMin) = 71.9212 cm
# Change the Bod to have ED.FlocBod insteadof G to eliminate this step
S_FlocBaffle := Q_Plant/W_FlocChannel*(K_FlocBaffle180/(2*Pi_Epsilon*HW_FlocEnd*ED_Floc))^(1/3) = [0.39685; 0.629961; 1] m
# The distance between baffles was set by the energy dissipation desired for each section. The Width
# of the flocculator was set to be the equal to the large baffle spacing and the depth of the flocculator was set to be Pi.FlocCell times the largest baffle spacing.
B_FlocBaffle := S_FlocBaffle + T_FlocBaffle = [0.39885; 0.631961; 1.002] m
Pi_FlocBaffleCP := (K_FlocBaffle180*(Pi_Epsilon*HW_FlocEnd)^2/2)^(1/3) = 1.78053 m^(2/3)
i := 0 .. last(ED_Floc)
N_FlocBaffleSectionRequired[i] := ceil(CP_Floc/(length(ED_Floc)*Pi_FlocBaffleCP))
# This makes the total collision potential in each baffle spacing section be the same. Hopefully someday we will have a method of choosing this section length based on theory or experiments.
N_FlocBaffleSectionRequired = [21; 21; 21]  # The number of baffles in each section.
# Assume an equal number of baffles in each section
L_FlocSections := vectorize(B_FlocBaffle*N_FlocBaffleSectionRequired) = [8.37586; 13.2712; 21.042] m
# Should this be B.FlocBaffle or S.FlocBaffle. THis isn't really important, just thinking about this conceptually. I think the answer is neither... and that we would need to figure out the volume of the submerged baffles and subtract that from the total volume of the flocculator. But I don't really care because the difference is insignificant!
L_FlocTankEst := sum(L_FlocSections) = 42.689 m  # Estimated total length of floc tanks
N_FlocChannels := ceil(L_FlocTankEst/L_Sed) = 5
L_FlocTank := N_FlocChannels*L_Sed = 47.6411 m  # Total length of floc tanks
Ti_Floc := HW_FlocEnd*L_FlocTank*W_FlocChannel/Q_Plant = 22.8427 min
# A better design will use longer sed tanks and thus will have shorter channels. I think the sed tanks should be made much longer than they are currently. The total wall length including floc channel walls should be calculated and minimized.
HL_FlocBaffle := h_erect(Q_Plant, W_FlocChannel, S_FlocBaffle, K_FlocBaffle180) = [0.625867; 0.248376; 0.0985679] cm
# calculates the head loss per baffle and then finds the total headloss
# This head loss calculation is based on the ideal design that doesn't yet account for how the baffles are actually placed in the channels. The error will be small since it is the last section of baffle spacings that might have a different number of baffles
HL_Floc := HL_FlocBaffle*N_FlocBaffleSectionRequired = 20.429 cm
HW_FlocStart := HW_FlocEnd + HL_Floc = 2.20429 m  # Calculate the water level at the entrance to the floc tank
H_Floc := HW_FlocStart + H_PlantFreeboard = 2.30429 m
# G at the port is based on the G at the end of the flocculator because the low G region of the flocculator is so long.
# Need to write code that assigns the port width based on the baffle spacing in each channel
W_FlocPort := B_FlocBaffle = [39.885; 63.1961; 100.2] cm  # The width of the floc port that connects channels will be based on the baffle spacing in that channel
A_FlocPort := A_Port(Pi_FlocDissipation, K_PipeEnt, Q_Plant, ED_Floc[last(ED_Floc)], Pi_VenaContractaOrifice)
H_FlocPort := A_FlocPort/W_FlocPort = [157.578; 99.4524; 62.7245] cm  # This keeps the velocity through the port the same as the velocity in the channel
W_GritWeir := 15 cm  # This length needs to be defined by the floating floc team.
# The baffles in each channel will have the same spacing
L_AvailFirst[0] := L_Sed - 2*W_FlocPort[0] - W_GritWeir = 8.58052 m
# Each channe's available length decreases because the ports that connect the channels increase since the spacing between baffles increases.
L_Avail := L_Sed - 2*W_FlocPort = [8.73052; 8.2643; 7.52422] m
# The first channel has less available length because of the grit chamber
N_BaffleSpaceFirst[0] := round(L_AvailFirst[0]/B_FlocBaffle[0]/2)*2 = 22
N_BaffleSpace := round(L_Avail/B_FlocBaffle/2)*2 = [22; 14; 8]
# This insures that the number of baffle spaces is an even number since there needs to be an odd number of baffles (to start on a lower baffle and end on a lower baffle).
N_FlocBaffleSpaceRequired := N_FlocBaffleSectionRequired + 1 = [22; 22; 22]
N_BaffleSpaceRemaining := ceil(N_FlocBaffleSpaceRequired - N_BaffleSpace) = [0; 8; 14]
N_FlocChannelBaffles :=
    N_ChannelBaffleSpace[0] ← N_BaffleSpaceFirst[0]
    i ← 1
    j ← 1
    while i ≤ N_FlocChannels - 1
        if N_BaffleSpaceRemaining[j] ≤ 0
            N_ChannelBaffleSpace[i] ← N_BaffleSpace[j]
            i ← i + 1
            j ← j + 1
        otherwise
            N_ChannelBaffleSpace[i] ← N_BaffleSpace[j]
            N_ChannelBaffleSpace[i + 1] ← N_BaffleSpace[j]
            i ← i + 2
            j ← j + 1
    return N_ChannelBaffleSpace - 1
    = [21; 13; 13; 7; 7]
# i counts the tank number
# j counts the spacing number
# Can we incorporate the spacing (denoted now as j) and the number of baffles into this channel array?
# This will give you the number of baffles in each tank, not spaces
# Now we need to assign positions, lengths and elevations to floc baffles
L_FlocBaffleLower := HW_FlocEnd - S_FlocBaffle*Pi_FlocBaffle = [1.60315; 1.37004; 1] m
L_FlocBaffleUpper := H_Floc - S_FlocBaffle*Pi_FlocBaffle = [1.90744; 1.67433; 1.30429] m
L_BaffleSection :=
    for i ∈ 0 .. last(N_FlocBaffleSectionRequired)
        L[i] ← N_FlocBaffleSectionRequired[i]*B_FlocBaffle[i]
    return L
    = [8.37586; 13.2712; 21.042] m  # This calculates the length of flocculator taken up by each section of baffles
# First baffle is a lower baffle because rapid mix pipe enters low
# Ideally have odd number of baffles in first channel (enter low, exit low)
# Ideally have even number of baffles in 2nd channel (enter low, exit high), but I haven't done any coding to get the right number of baffles (odd or even). The fit of the baffles could potentially be improved by
Loc_FlocBaffles :=
    X[0, N_FlocChannels - 1] ← 0 m
    L[0, N_FlocChannels - 1] ← 0 m
    Z[0, N_FlocChannels - 1] ← 0 m
    section ← 0
    BafflesInSection ← 0
    N_FlocBaffles ← 0
    W_RapidMix ← B_FlocBaffle[last(B_FlocBaffle)]
    X[0, 0] ← T_ChannelWall
    for Channel ∈ 0 .. N_FlocChannels - 1
        i ← 0
        j ← 0
        PortSide[0, Channel] ← 1
        X_FirstBaffleInChannel ← W_RapidMix if Channel == 0
        X_FirstBaffleInChannel ← W_FlocPort[section] + S_FlocPort otherwise
        X[i, Channel] ← X_FirstBaffleInChannel
        L[i, Channel] ← L_FlocBaffleLower[section]
        Z[i, Channel] ← 0 m
        X_LastBaffleInChannel ← L_Sed - (W_InletChannel + S_FlocPort) if Channel == N_FlocChannels - 1
        X_LastBaffleInChannel ← L_Sed - (W_FlocPort[section] + S_FlocPort) otherwise
        while X[i, Channel] + B_FlocBaffle[section] < X_LastBaffleInChannel
            i ← i + 1
            N_FlocBaffles ← N_FlocBaffles + 1
            BafflesInSection ← BafflesInSection + 1
            if BafflesInSection == N_FlocChannelBaffles[Channel] and section < last(ED_Floc)
                section ← section + 1
                BafflesInSection ← 1
            X[i, Channel] ← X[i - 1, Channel] + B_FlocBaffle[section]
            if mod(i, 2) == 1
                L[i, Channel] ← L_FlocBaffleUpper[section]
                Z[i, Channel] ← S_FlocBaffle[section]*Pi_FlocBaffle
            otherwise
                j ← j + 1
                L[i, Channel] ← L_FlocBaffleLower[section]
                Z[i, Channel] ← 0 m
                PortSide[j, Channel] ← 1 if mod(i, 4) == 0
                PortSide[j, Channel] ← 2 otherwise
        for k ∈ 0 .. last(X[:, 0])
            X[k, Channel] ← L_Sed - X[k, Channel] if mod(Channel + N_FlocChannels, 2) == 1 and X[k, Channel] ≠ 0
    return [X, L, Z, N_FlocBaffles*m, PortSide*m]
# section is index of the spacing of baffles
# First baffle is away from wall to allow elbow to deflect water downward
# This code works with any number of flocculator channels
# i is the number of baffles in a channel
# X placement starts with an offset equal to the channel wall thickness
# The first baffle is place in the channel by an offest required for the
# rapid mix apparatus. Which is subject to change?!
# j is the index that counts lower baffles only
# PortSide keeps track of what side the port in the baffle will be on. These ports will be used for draining the floc tank.
# Each channel starts with a lower baffle
# Should the first baffle in the first channel start at W.grit??
# Move to the next spacing if baffles in section equals target number of baffles in section and if the section isn't the last section
# We need to write something so that section changes at the end of the designated channel, not just because the end of the channel is reached
# Mod handles the odd and even baffles
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# Mod = 1 means the number is odd
# Mod = 0 means the numbeer is even
# Reverse the direction of odd numbered channels
[X, L, Z, N_FlocBaffle*m, PortSide*m]
# Do we need to reverse the Z array too?
# Lower baffles are on even indexes, so every fourth baffle (second lower baffle) will have ports on the same side so that they alternate sides and don't shortcircuit the flow.
# artificially attach units of meters to the number of baffles so all dimensions are the same.
X ← L_Sed - X if mod(N_FlocChannels, 2) == 1
X_FlocBaffles := Loc_FlocBaffles[0, 0]
L_FlocBaffles := Loc_FlocBaffles[0, 1]
Z_FlocBaffles := Loc_FlocBaffles[0, 2]
# strip artificial units
N_FlocBaffles := Loc_FlocBaffles[0, 3]/m
X_FlocBaffles = [
    8.52622, 0.41385, 9.11437, 0.41385, 9.11437;
    8.12737, 0.812701, 8.71552, 0.812701, 8.71552;
    7.72852, 1.21155, 8.31667, 1.21155, 8.31667;
    7.32967, 1.6104, 7.91782, 1.6104, 7.91782;
    6.93082, 2.00925, 7.51897, 2.00925, 7.51897;
    6.53197, 2.4081, 7.12012, 2.4081, 7.12012;
    6.13312, 2.80695, 6.72127, 2.80695, 6.72127;
    5.73427, 3.2058, 6.32242, 3.2058, 6.32242;
    5.33542, 3.60465, 5.92357, 3.60465, 5.92357;
    4.93657, 4.0035, 5.52472, 4.0035, 5.52472;
    4.53772, 4.40235, 5.12587, 4.40235, 5.12587;
    4.13887, 4.8012, 4.72702, 4.8012, 4.72702;
    3.74002, 5.20005, 4.32817, 5.20005, 4.32817;
    3.34117, 5.5989, 3.92932, 5.5989, 3.92932;
    2.94232, 5.99775, 3.53047, 5.99775, 3.53047;
    2.54347, 6.3966, 3.13162, 6.3966, 3.13162;
    2.14462, 6.79545, 2.73277, 6.79545, 2.73277;
    1.74577, 7.1943, 2.33392, 7.1943, 2.33392;
    1.34692, 7.59315, 1.93507, 7.59315, 1.93507;
    0.948066, 7.99201, 1.53622, 7.99201, 1.53622;
    0.549215, 8.39086, 1.13737, 8.39086, 1.13737;
    0, 8.78971, 0.738515, 8.78971, 0.738515
] m  # The first channel has the right number of baffles, but the others are adding one more
PortSide := Loc_FlocBaffles[0, 4]/m
B_FlocBaffle = [0.39885; 0.631961; 1.002] m
N_FlocBaffles = 104
