# Pumped LFSRSF System for India
# [reference: ExpertInputs.xmcd]
# [reference: MathFunctions.xmcd]
# [reference: PipeDatabase.xmcd]
# [reference: MaterialsDatabase.xmcd]
# [reference: FluidsFunctions.xmcd]
# [reference: CdcFunctions.xmcd]
# Assumptions
Vol_OverheadTank := 30000*L
N_Fills := 2  # number of times you run the system per day
T_OperationIdeal := 3 hr  # per fill
Q_FiEst := Vol_OverheadTank/T_OperationIdeal = 2.77778 L/s
PS_Fi := 2
V_FiUpflow := 11*mm/s
ND_FiPipe := NominalPipeSize(sqrt(4*Q_FiEst/V_FiUpflow/π)) = 24 in
Q_Fi := π*innerdiameter(ND_FiPipe, PS_Fi)^2/4*V_FiUpflow = 2.85342 L/s
T_Operation := Vol_OverheadTank/Q_Fi = 2.92047 hr  # per fill
V_Storage := Q_Fi*T_Operation/3 = 10 m^3  # change this based on actual pumping rates
H_Freeboard := 10 cm
Q_Plant := Q_Fi
HL_CleanBed := 10 cm
# [reference: LFOM.xmcd]
L_Et := 1 m
W_Et := S_EtFloat + 2*ConRadius(ND_EtFloat) + ND_RMPipe + 2*S_Fitting = 0.512737 m
H_Et := 2*CapHeight(ND_EtFloat) + HL_Lfom + H_Freeboard
ND_EtOverflow := D_pipeschedule(Q_Fi, PS_Fi, H_Et, H_Et, Nu_Water, E_Pvc, K_El90) = 1.5 in
HL_EtOverflow := Headloss_weir(Q_Fi, 2*π*outerradius(ND_EtOverflow)) = 0.046781 m
# Entrance Tank
# [reference: LinearCdc.xmcd]
# [reference: ChemStorageTanks.xmcd]
# AutoCAD drawing programs:
# Translators:
# These are the codes that take MathCAD outputs and create AutoCAD scripts that are used to draw the plant (formerly Basics)
# [reference: MtoATranslators.xmcd]
# The wrapped MtoA translator contains the functions that the user will want to access. These functions will draw pieces with full functionality - specifying the location, dimension, and orientation of the object. Also, it contains layer control and subtraction capabilities for grouped objects.
# [reference: MtoATranslatorsWrapped.xmcd]
# Drawing functions:
# [reference: ChannelF.xmcd]
# [reference: PlumbingF.xmcd]
# [reference: TankF.xmcd]
# [reference: StairsF.xmcd]
# [reference: DrainChannelF.xmcd]
# Low Flow Stacked Rapid Sand Filter
# AutoCAD Dimesions and Origins
ND_RMPipe = 3 in
ND_RMPipe := 4 in
L_FiPipe := 205 cm
N_FiLayer = 6
S_FiInletMan := 40 cm
# Internal Manifold
ND_FiManTrunk := 3 in
ND_FiManBranch := 1 in
H_FiManCap := CapHeight(ND_FiManTrunk)/2
T_FiLayer := 20 cm
H_FiSand := T_FiLayer*N_FiLayer
L_FiManCouplingOffset := 0.5*innerdiameter(ND_FiPipe, PS_Fi) - ConRadius(ND_FiManTrunk)/tan(asin(2*ConRadius(ND_FiManTrunk)/innerdiameter(ND_FiPipe, PS_Fi))) = 0.00452605 m
# offset of the coupling trunk from inner filter body
L_FiManCapOffset := 0.5*innerdiameter(ND_FiPipe, PS_Fi) - ConRadius(ND_FiManBranch)/tan(asin(2*ConRadius(ND_FiManBranch)/innerdiameter(ND_FiPipe, PS_Fi)))
# offset of the cap branch from inner filter body
S_FiManBranchEnds := L_FiManCouplingOffset + CouplingLength(ND_FiManTrunk) + outerdiameter(ND_FiManBranch)/2 = 0.121239 m
L_FiManTrunk := innerdiameter(ND_FiPipe, PS_Fi) - CouplingLength(ND_FiManTrunk) - CapThickness(ND_FiManTrunk) - (2*L_FiManCouplingOffset)
N_FiManBranch := 6  # number of branches on either side
# distance from inner end of filter body to center of nearest branch
S_FiManBranch := (innerdiameter(ND_FiPipe, PS_Fi) - 2*S_FiManBranchEnds)/(N_FiManBranch - 1) = 0.0664445 m
# cut coupling down
L_FiManBranch :=
    for i ∈ 0 .. N_FiManBranch - 1
        L[i] ←
            0.5*innerdiameter(ND_FiPipe, PS_Fi)*sin(acos((0.5*innerdiameter(ND_FiPipe, PS_Fi) - S_FiManBranchEnds + ConRadius(ND_FiManBranch) - S_FiManBranch*i)/(0.5*innerdiameter(ND_FiPipe, PS_Fi)))) - (0.5*innerdiameter(ND_FiManTrunk, PS_FiBranch) + CapThickness(ND_FiManBranch)) if i < N_FiManBranch/2
            (0.5*innerdiameter(ND_FiPipe, PS_Fi) - innerdiameter(ND_FiManTrunk, PS_FiBranch) - L_FiManCapOffset - CapThickness(ND_FiManBranch)) if i + 0.5 == N_FiManBranch/2
            L[N_FiManBranch - 1 - i] otherwise
    L
L_FiManBranch = [0.176961; 0.219212; 0.240301; 0.240301; 0.219212; 0.176961] m
H_FiSandFluidizedSafe := Pi_FiFluidized*H_FiSand + T_FiLayer  # add T.FiLayer for safety
# Slot Design
# slotted manifold design and areas
L_slotter(ND_body, X_fromc) := sqrt(ND_body^2 - X_fromc^2)
L_slotsPipe := innerdiameter(ND_FiPipe, PS_Fi) + 4*L_slotter(innerdiameter(ND_FiPipe, PS_Fi)/2, 11.5 cm) + 4*L_slotter(innerdiameter(ND_FiPipe, PS_Fi)/2, 23 cm) - 10*2.5*in = 1.68204 m
N_slots := 16/in
W_slots := 0.2 mm
L_slots := 0.9 in
A_slots := L_slotsPipe*N_slots*W_slots*L_slots = 0.00484427 m^2
D_slots := sqrt(4*A_slots/π) = 0.0785361 m
# Filtration Head Loss
K_ballValve := 0.05
K_tee90 := 1
K_bushing := 0.20
K_checkValve := 2.5
HL_FiOutPipe := h_l(Q_Plant, innerdiameter(ND_RMPipe, PS_Fi), H_FiSandFluidizedSafe, K_ballValve + 2*K_El90, Nu_Water, 0) + HL_Manifold(Q_Plant, innerdiameter(ND_RMPipe, PS_Fi), H_FiSandFluidizedSafe, 0, Nu_Water, 0, 3) = 1.49971 cm
HL_FiSlottedOut := HL_Manifold(Q_Plant/3, innerdiameter(ND_FiManTrunk, PS_Fi), L_FiManTrunk, K_checkValve + K_bushing, Nu_Water, 0, N_FiManBranch) + h_orifice(D_slots*sqrt(ε_FiSand), Pi_VenaContractaOrifice, Q_Plant/3) = 3.33964 cm
HL_SandBed := h_lKozeny(20 cm, D_FiSand60, Q_Plant/(6*A_circle(innerdiameter(ND_FiPipe, PS_Fi))), ε_FiSand, Nu_Water) = 5.56209 cm
HL_FiSlottedIn := HL_Manifold(Q_Plant/4, innerdiameter(ND_FiManTrunk, PS_Fi), innerdiameter(ND_FiPipe, PS_Fi), K_checkValve + K_bushing, Nu_Water, 0, N_FiManBranch) + h_orifice(D_slots*sqrt(ε_FiSand), Pi_VenaContractaOrifice, Q_Plant/4) = 1.88128 cm
HL_FiInPipe := h_l(Q_Plant, innerdiameter(ND_RMPipe, PS_Fi), L_FiPipe, K_ballValve + 2*K_tee90, Nu_Water, 0) + HL_Manifold(Q_Plant, innerdiameter(ND_RMPipe, PS_Fi), L_FiPipe, 0, Nu_Water, 0, 4) = 1.66852 cm
HL_Filtration := HL_FiOutPipe + HL_FiSlottedOut + HL_SandBed + HL_FiSlottedIn + HL_FiInPipe = 13.9512 cm
FiPipe_Origin := [0 m; 0 m; 0 m]
FiManCoupling_Origin := [
    L_FiManCouplingOffset - 0.5*innerdiameter(ND_FiPipe, PS_Fi) + CouplingLength(ND_FiManTrunk) - SocketDepth(ND_FiManTrunk);
    0;
    T_Flange + ConRadius(ND_FiManTrunk)
] + FiPipe_Origin
FiManInletPipe_Origin := [L_FiManTrunk; 0 m; 0] + FiManCoupling_Origin
FiBranch_Origin(i) := [
    FiPipe_Origin[0] + innerdiameter(ND_FiPipe, PS_Fi)/2 - S_FiManBranchEnds - S_FiManBranch*i;
    FiPipe_Origin[1] + innerdiameter(ND_FiManTrunk, PS_FiBranch)/2;
    FiManInletPipe_Origin[2]
]
# Backwash Plumbing
HL_FiBwSand := H_FiSand*(Rho_FiSand - Rho_H2O)*(1 - ε_FiSand)/Rho_H2O = 1.188 m
ND_FiBwDrain := D_pipeschedule(Q_Fi, PS_Fi, L_FiPipe - N_FiLayer*T_FiLayer, L_FiPipe, Nu_Water, E_Pvc, 3*K_El90)
ND_FiBwDrain := ND_RMPipe
L_FiBwCouplingOffset := 0.5*innerdiameter(ND_FiPipe, PS_Fi) - ConRadius(ND_FiBwDrain)/tan(asin(2*ConRadius(ND_FiBwDrain)/innerdiameter(ND_FiPipe, PS_Fi))) = 0.00728512 m
L_FiBwMan := innerdiameter(ND_FiPipe, PS_Fi) - CouplingLength(ND_FiBwDrain) - L_FiBwCouplingOffset - CapThickness(ND_FiBwDrain) = 0.441209 m
L_FiBwManAvail := L_FiBwMan - 0.5*CapHeight(ND_FiBwDrain) - 0.5*CouplingLength(ND_FiBwDrain) = 0.34199 m
# fit the pipe halfway into the coupling and cut the cap in half
B_FiBwOrificesEst := 2 cm
N_FiBwOrifices := floor(L_FiBwManAvail/B_FiBwOrificesEst) + 1 = 18
N_FiBwOrifices := 40
D_FiBwOrifices := innerdiameter(ND_FiBwDrain, PS_Fi)/sqrt(N_FiBwOrifices) = 0.636566 in
D_FiBwOrifices := 1/2*in
B_FiBwOrifices := (L_FiBwManAvail - D_FiBwOrifices)/(N_FiBwOrifices - 1) = 0.00844334 m
# headloss analysis during backwash
K_exit := 1
K_enter := 0.5
HL_BwDrain := h_l(Q_Plant, innerdiameter(ND_FiBwDrain, PS_Fi), L_FiPipe, 1*K_El90 + K_exit, Nu_Water, 0) = 0.0144634 m
HL_FiBwManBranch := HL_Manifold(Q_Plant, innerdiameter(ND_FiBwDrain, PS_Fi), L_FiBwMan, 0, Nu_Water, 0, N_FiBwOrifices) = 0.000206271 m
HL_FiBwOrifice := h_orifice(D_FiBwOrifices, Pi_VenaContractaOrifice, Q_Plant/N_FiBwOrifices) = 0.0407366 m
HL_FiBwInlet := HL_Manifold(Q_Plant, innerdiameter(ND_RMPipe, PS_Fi), L_FiPipe, K_El90 + K_tee90, Nu_Water, 0, 4) = 0.00677972 m
HL_FiBwManTrunk := HL_Manifold(Q_Plant, innerdiameter(ND_FiManTrunk, PS_FiBranch), L_FiBwMan, K_enter, Nu_Water, 0, 3) = 0.00586127 m
# the length was hard coded as 7in before...
HL_SlotOrifice := h_orifice(D_slots, Pi_VenaContractaOrifice, Q_Plant) = 0.0445699 m
HL_FiBwTotal := HL_FiBwSand + HL_BwDrain + HL_FiBwManBranch + HL_FiBwOrifice + HL_FiBwInlet + HL_FiBwManTrunk + HL_SlotOrifice = 1.30062 m
ZW_FiOutPipe := H_FiSand
ZW_FiInPipe := ZW_FiOutPipe + HL_Filtration
Z_FiBwOutlet := ZW_FiInPipe - 1.1*HL_FiBwTotal
# AutoCAD Drawing of Filter
# Filter Body
LayerFiBody := layer_new("FiBodyPlu", blue3)
DrawFiBody := PipeF(FiPipe_Origin, L_FiPipe, [0; 90]*deg, ND_FiPipe, PS_FiBranch)
FreezeFiBody := FreezeLayer("FiBodyPlu")
FiBodyOrificeInlet := CylinderF(FiManCoupling_Origin, outerdiameter(ND_FiManTrunk)/2, CouplingLength(ND_FiManTrunk), [0; 0]*deg)
ArrayInletOrifice := ArrayLast(N_FiLayer/2 + 1, 1, T_FiLayer*2)
FiBodyOrificeOutlet := CylinderF([
    FiPipe_Origin[0] + ConRadius(ND_FiPipe) + CouplingLength(ND_FiManTrunk)/2;
    FiManCoupling_Origin[1];
    T_FiLayer + FiManCoupling_Origin[2]
], outerdiameter(ND_FiManTrunk)/2, CouplingLength(ND_FiManTrunk), [0; 0]*deg)
ArrayOutletOrifice := ArrayLast(N_FiLayer/2, 1, T_FiLayer*2)
# GroupDelete
SubtractFiInletsOutlets := SubtractF(["FiBodyPlu"], "DeleteMe")
FiBodyPipe := stack(LayerFiBody, DrawFiBody, FreezeFiBody, FiBodyOrificeInlet, view("f"), ArrayInletOrifice, view("t"), FiBodyOrificeOutlet, view("f"), ArrayOutletOrifice, view("t"), GroupDelete, SubtractFiInletsOutlets)
# Piping
FiManTrunkLyr := layer_new("FiManTrunkPlu", blue3)
FiManTrunk := PipeF(FiManInletPipe_Origin, L_FiManTrunk, [0; 0]*deg, ND_FiManTrunk, PS_FiBranch)
FiManTrunkFrz := FreezeLayer("FiManTrunkPlu")
FiManTrunkOrifice := CylinderF(FiBranch_Origin(0) + [0; ConRadius(ND_FiManTrunk); 0], outerdiameter(ND_FiManBranch)/2, 2*ConRadius(ND_FiManTrunk), [90; 0]*deg)
ArrayTrunkOrifice := ArrayLast(1, N_FiManBranch, -S_FiManBranch)
# GroupDelete
SubtractFiOrifices := SubtractF(["FiManTrunkPlu"], "DeleteMe")
FiManPlu :=
    Local ← layer_new("FiManBranchPlu", blue3)
    for i ∈ 0 .. N_FiManBranch - 1
        Local ← stack(Local, PipeF(FiBranch_Origin(i), L_FiManBranch[i], [270; 0]*deg, ND_FiManBranch, PS_FiBranch))
    Local
FiManFreeze := FreezeLayer("FiMan*Plu")
DrawFiManPipes := stack(FiManTrunkLyr, FiManTrunk, FiManTrunkFrz, FiManTrunkOrifice, ArrayTrunkOrifice, GroupDelete, SubtractFiOrifices, FiManPlu, FiManFreeze)
FiManBranchCaps :=
    Local ← layer_new("FiManCapsPlu", red)
    for i ∈ 0 .. N_FiManBranch - 1
        Local ← stack(Local, CutCapF(FiBranch_Origin(i) + [0; L_FiManBranch[i]; 0], H_FiManCap, [90; 0]*deg, ND_FiManBranch))
    Local
FiManTrunkCap := CutCapF(FiManInletPipe_Origin, H_FiManCap, [0; 0]*deg, ND_FiManTrunk)
FiManCapFrz := FreezeLayer("FiManCapsPlu")
ThawFiManPlu := ThawMultiple(["FiManBranchPlu"; "FiManCapsPlu"])
MirrorFiMan := MirrorAll([FiPipe_Origin[0]; FiPipe_Origin[1]], [FiPipe_Origin[0] + zc; FiPipe_Origin[1]], "n")
FiManPluFrz := FreezeMultiple(["FiMan*"])
3.5
FiManCouplingLyr := layer_new("FiManCouplingPlu", green)
# 7.5 | from the center of the pipe
10.5
L_CenterOuterPipes := 28.3 cm
FiManCoupling := CouplingF(FiManCoupling_Origin, [0; 0]*deg, ND_FiManTrunk, PS_FiBranch)
FiManCouplingFrz := FreezeLayer("FiManCouplingPlu")
DrawFiManFittings := stack(FiManBranchCaps, FiManTrunkCap, FiManCapFrz, ThawFiManPlu, MirrorFiMan, FiManPluFrz, FiManCouplingLyr, FiManCoupling, FiManCouplingFrz)
MirrorFiManSet :=
    Local ← stack(ThawMultiple(["FiMan*"]), view("f"), array_all(N_FiLayer + 1, 1, T_FiLayer), view("f"))
    for i ∈ 0 .. N_FiLayer/2 - 1
        ManWin[i, 0] ← [
            -ConRadius(ND_FiPipe) + FiPipe_Origin[0];
            T_FiLayer*(2*i + 1) - 1.05*ConRadius(ND_FiManTrunk) + FiManInletPipe_Origin[2];
            0
        ]
        ManWin[i, 1] ← [
            ConRadius(ND_FiPipe) + FiPipe_Origin[0];
            T_FiLayer*(2*i + 1) + 1.05*ConRadius(ND_FiManTrunk) + FiManInletPipe_Origin[2];
            0
        ]
    SelectMans ← SelectWindow(ManWin)
    MirrorMans ← MirrorSelection([FiPipe_Origin[0]; FiPipe_Origin[2]], [FiPipe_Origin[0]; FiPipe_Origin[2] + zc], "y")
    Local ← stack(Local, SelectMans, MirrorMans)
    Local
FrzFiMan := FreezeMultiple(["FiMan*"])
ArrayFiManifolds := stack(MirrorFiManSet, view("t"), FrzFiMan)
# Bed Tester
reducerF(OriginPoint, AngleVector, ND_in, ND_out, ReducerLength, EN)
FiTesterOuter_Origin := [ConRadius; □; □] + FiPipe_Origin  # error: This placeholder is empty.
FiTesterInner_Origin := □  # error: This placeholder is empty.
# AutoCAD Drawing of Other Parts
AC_LFSRSF := stack(FiBodyPipe, DrawFiManPipes, DrawFiManFittings, ArrayFiManifolds)
# [component: inputs AC_LFSRSF]
