# [reference: MasterProgram.xmcd]
couplingscript(o, outerradiusocket, outerradius, innerradiussocket, innerradius, L, L_socket) :=
    zoom ← zoom_win([o[0] - outerradiusocket; o[1] + outerradiusocket; o[2]], [o[0] + outerradiusocket; o[1] - outerradiusocket; o[2]])
    cylinder1 ← cylinderC(o, outerradius, -L)
    cylinder3 ← cylinderC([o[0]; o[1]; o[2]], outerradiusocket, L_socket)
    cylinder4 ← cylinderC([o[0]; o[1]; o[2] - zc], innerradiussocket, L_socket + zc)
    subtract2 ← subtractD([o[0] - outerradiusocket; o[1]; o[2]], [o[0] - innerradiussocket; o[1]; o[2]])
    union1 ← union_allA
    cylinder2 ← cylinderC([o[0]; o[1]; o[2] - L - zc], innerradius, L + L_socket + 2*zc)
    zoom ← zoom_win([o[0] - outerradiusocket; o[1] + outerradiusocket; o[2]], [o[0] + outerradiusocket; o[1] - outerradiusocket; o[2]])
    subtract1 ← subtractD([o[0] - outerradius; o[1]; o[2]], [o[0] - innerradius; o[1]; o[2]])
    one ← stack(zoom, cylinder1, cylinder3, cylinder4, subtract2, union1, cylinder2, zoom, subtract1)
    return one
coupling(o, ID_pipe, L, EN) := couplingscript([o[0]; o[1]; o[2] - SocketDepth(ID_pipe)], 1.1*NominalDiameter(ID_pipe, EN)/2, NominalDiameter(ID_pipe, EN)/2, NominalDiameter(ID_pipe, EN)/2, ID_pipe/2, L, SocketDepth(ID_pipe))
coupling([0; 0; 0], 1 in, 1 m, 2) = ["_zoom w -0.01397,0.01397,-0.027 0.01397,-0.01397,-0.027"; "_cylinder 0,0,-0.027 0.0127 -1"; "_cylinder 0,0,-0.027 0.01397 0.027"; "_cylinder 0,0,-0.037 0.0127 0.037"; "_subtract -0.01397,0,-0.027  -0.0127,0,-0.027 "; "_union all "; "_cylinder 0,0,-1.037 0.0127 1.047"; "_zoom w -0.01397,0.01397,-0.027 0.01397,-0.01397,-0.027"; "_subtract -0.0127,0,-0.027  -0.0127,0,-0.027 "]
NominalDiameter(3 in, 2) = 3 in
ElbowRadius(NominalDiameter) =  # error: This value must be a scalar.
