# Flocculation Function
# References:
# [reference: DesignAssumptions.xmcd]
# This function calculates the size of the hole between the two channels in the flocculator. The function is called below by the flocculator function. (Note: this function will NOT work for any number of flocculator channels or baffle spacings)
# I think it would be helpful to review if you could define the variable name on top of the function. Maybe this is too time consuming, but for exmaple, what is m? - m is just meters
uturnhole(baffle_spacing, FlocTank_width, FlocTank_length, n_baffle) :=
    uturnhole_area ← baffle_spacing[2]*m*FlocTank_width
    uturnhole_width ← baffle_spacing[1]*m - uturnhole_unusedspace if FlocTank_length/n_channels > baffle_spacing[0]*m*n_baffle[0]
    uturnhole_width ← baffle_spacing[0]*m - uturnhole_unusedspace otherwise
    uturnhole_height ← uturnhole_area/uturnhole_width
    return [uturnhole_width; uturnhole_height]
# The area of the hole should be equal to the flow area (baffle spacing x tank width) of the last baffle. This guarantees that the shear through this hole is not going to break up flocs. It is assumed that the baffle spacing at the beginning of the second channel is either the first or second spacing size. The width of the u turn hole cannot be greater than this baffle spacing. There should be some space around the hole that is solid (ie the hole should not extend all the way from the end of the channel to the baffle). After finding the width of the hole, the height of it should be set to make the hole the desired area. This function returns the dimensions of the hole. (Note: We are putting the hole in the center of the wall, but how should the location be ouputted?)
# Tamar's Comments:
# 1. Should the hole that allows water between the u-turn be a circle or a square? Currently it is a square, but I think it makes more sense to be a circle. - for ease of construction i would keep it a sq (and in order to get the necessary area it would probably become an oval because of the width constraints....)
# 2. I will try to think about how to make this uturn work for more than 2 channels.
# 3. I will talk to AutoCAD team to ask how the hole size should be outputted.
uturnhole([.1; .3; .5], .5*m, 15*m, [30; 20; 5]) = [0.27; 0.925926] m
# This function checks to see if shortcircuiting, (due to the large baffle spacing) will be a problem at the end of the tank. The function is called below by the flocculator function. (Note: this function will work for any number of flocculator channels and baffle spacings)
# Can you explain more why 3b=h for short circuting?
shortcircuit(baffle_spacing, FlocTank_enddepth) :=
    gap ← spacingratio*baffle_spacing*m
    baffle_length ← FlocTank_enddepth - gap
    baffle_overlap ← FlocTank_enddepth - 2*gap
    spacingratio_new ← (FlocTank_enddepth - overlap_min)/(2*baffle_spacing*m)
    i ← 0
    while i < length(baffle_spacing)
        baffle_length[i] ← FlocTank_enddepth - spacingratio_new[i]*baffle_spacing[i]*m if baffle_overlap[i] < overlap_min
        i ← i + 1
    return baffle_length
# Short circuiting will occur when the total space above or below adjacent baffles is approximately the same as the water depth of the flocculator. In other words, when 3b = h. If short circuiing has occured, it means adjacent baffles no longer overlap and the water can go straight through the center of the tank, rather than around the baffles.
# Typically, the space above or below a baffle (gap) is equal to spacingratio*bafflespacing. In this function, spacingratio is equal to 1.5. Therefore the length of the baffle is the water height minus gap (assuming no head loss). The overlap between adjacent baffles would then be determined by the water depth minus 3*baffle spacing). If this overlap is less than 2 cm (design assumption), a new gap ratio (less than 1.5) should be used. This ratio should be set to guarentee an overlap of 2 cm.  This function caclulates the new spacing ratio and then uses a loop to check for short circuiting at all baffle spacings. If necessary it changes the baffle length and returns a new vector of the lengths at each spacing.
# By how much do you change the baffle length if there is short circuiting? Is it just a definite value or is it enlarged by just the necessary amount? - right now, we just want to see a minimum overlap of 2 cm (this was the value used in Marcala), so if we need to change the length we just change it enough to give us this overlap)
shortcircuit([.1; .3; .75], 2.1*m) = [1.95; 1.65; 1.06] m
# This function creates a matrix for each channel giving the x and y coordinates of each baffle.  The function is called below by the flocculator function. (Note: this function will NOT work for any number of flocculator channels)
bafflepositions(flocDim, n_baffles, b_lengths, b_spacings) :=
    n ← 0
    k ← 0
    h ← 0
    j ← 0
    firstchannel ← 1
    length_perchannel ← flocDim[0]/n_channels
    while n < (sum(n_baffles) - 1)
        if j > n_baffles[k] - 1
            k ← k + 1
            j ← 0
        if firstchannel == 1
            baffle_xposition1[n] ← b_spacings[k] if n == 0
            baffle_xposition1[n] ← baffle_xposition1[n - 1] + b_spacings[k] otherwise
            if baffle_xposition1[n] > length_perchannel - b_spacings[k]
                baffle_xposition1 ← submatrix(baffle_xposition1, 0, n - 1, 0, 0)
                firstchannel ← 0
                n ← n - 1
                m ← 0
        if firstchannel == 0
            baffle_xposition2[m] ← length_perchannel - b_spacings[k] if m == 0
            baffle_xposition2[m] ← baffle_xposition2[m - 1] - b_spacings[k] otherwise
        m ← m + 1
        n ← n + 1
        j ← j + 1
    if baffle_xposition2[m - 1] > 2*b_spacings[k]
        while baffle_xposition2[m - 1] > 2*b_spacings[k]
            baffle_xposition2[m] ← flocDim[0]/n_channels - ((m + 1)*b_spacings[k])
            h ← h + 1
            m ← m + 1
    otherwise
        while baffle_xposition2[m - 1] < b_spacings[k]
            baffle_xposition2 ← submatrix(baffle_xposition2, 0, m - 2, 0, 0)
            h ← h - 1
            m ← m - 1
    numbaffles ← length(baffle_xposition2) + length(baffle_xposition1)
    p ← 1
    y ← 0
    t ← 0
    n_bafflesfirst ← n_baffles[0]
    n_bafflesthird ← n_baffles[2] + h
    n_bafflessecond ← numbaffles - (n_bafflesfirst + n_bafflesthird)
    n_bafflesnew ← [n_bafflesfirst; n_bafflessecond; n_bafflesthird]
    while t ≤ numbaffles - 1
        if p > n_bafflesnew[y]
            y ← y + 1
            p ← 1
        bafflelength[t, 0] ← b_lengths[y]
        p ← p + 1
        t ← t + 1
    firstchannel ← 1
    m ← 0
    i ← 0
    while i < length(baffle_xposition1)
        j ← 0
        if mod(i + 1, 2) == 0
            while j < 3
                baffleposition1[i, j] ← baffle_xposition1[i] if j == 0
                baffleposition1[i, j] ← 0 if j == 1
                baffleposition1[i, j] ← bafflelength[i] if j == 2
                j ← j + 1
            i ← i + 1
        otherwise
            while j < 3
                baffleposition1[i, j] ← baffle_xposition1[i] if j == 0
                baffleposition1[i, j] ← flocDim[2] if j == 1
                baffleposition1[i, j] ← flocDim[2] - bafflelength[i] if j == 2
                j ← j + 1
            i ← i + 1
    while m < length(baffle_xposition2)
        j ← 0
        if mod(i + 1, 2) ≠ 0
            while j < 3
                baffleposition2[m, j] ← baffle_xposition2[m] if j == 0
                baffleposition2[m, j] ← flocDim[2] if j == 1
                baffleposition2[m, j] ← flocDim[2] - bafflelength[i] if j == 2
                j ← j + 1
            i ← i + 1
            m ← m + 1
        otherwise
            while j < 3
                baffleposition2[m, j] ← baffle_xposition2[m] if j == 0
                baffleposition2[m, j] ← 0 if j == 1
                baffleposition2[m, j] ← bafflelength[i] if j == 2
                j ← j + 1
            i ← i + 1
            m ← m + 1
    baffle_positions ← [baffleposition1, baffleposition2]
    return [baffle_positions, length(bafflelength), n_bafflesnew]  # initializes variables and assigns initial values
return "2 channels not needed. Design Fails" if n_baffles*b_spacings < length_perchannel
# the length of each channel is equal to the length of one sed tank
# what do we do in this case? code should not just fail...
# TAMAR WILL TRY TO WORK ON THIS!
# this while loop finds the x position of each baffle (x=0 at start of tank)
# this if statement determines what baffle spacing should be used to find the position of the next baffle. k (0,1,2) will be equal to the current baffle spacing and increments after all the baffles of a specific spacing have been assigned an x value.
# first assign the x positions for the baffles in channel 1
# for the first baffle, the position is just equal to the baffle spacing. The positions of the rest of the baffles are equal to the position of the previous baffle plus the baffle spacing.
# This if statement makes sure that the baffle that was just assigned an x position is not too close to the wall at the end of the channel (ie, closer than a baffle spacing). If it is too close this baffle is taken out and reassigned in the next channel.
# Now the x positions of the second channel are calculated. The x positions are still relative to a datum set at the start of the FIRST channel, however the positions are determined from the start of THIS channel to the end of THIS channel (ie backwards). The first baffle is at a position equal to the tank length minus the baffle spacing and the rest of the baffle have an x coordinated equal to the position of the previous baffle minus baffle spacing.
# increments the counter variables
# This loop adds baffles if the length of the channel is longer than baffle spacing * number of baffles. The baffles added have a spacing equal to the last baffle spacing. A baffle should be added if the space left is greater than 2*baffle spacing. This will ensure that the space between the wall and the last baffle is greater than or equal to the desired baffle spacing. This loop adds as many baffles as are needed.
# This loop takes out baffles if the length of the channel is shorter than baffle spacing * number of baffles. The baffles are taken out of the last section. (Note: we need to check the new Gtheta value to make sure it has not fallen too low). A baffle needs to be taken out if the space between it and the wall is less than the desired baffle spacing. This loops takes out all extra baffles.
# Regarding the red text from leslie, this was completed, correct? It seems to me that we check the Gtheta value on the loop in pink below? - oh yeah, i can take that note out, i forgot i added the loop below...
# initializes variables and sets initial values
# This loop creates a vector of baffle lengths
# increments counter variables
# initializes variables and sets initial values
# this loop assigns three coordinates for each baffle in the 1st channel. The first column is the x coordinate and the 2nd and 3rd columns are the starting and ending points (y coordinates) of a baffle. Note: The first baffle always starts at the floor and extends upward. The datum for the y coordiante is set at the water level with down as the positive direction.
# an even numbered baffle gets these coordinates. These baffles extend from the top of the tank downward.
# an odd numbered baffle gets these coordinates. These baffles extend from the bottom of the tank upward.
# this loop assigns three coordinates for each baffle in the 2nd channel
# an odd numbered baffle gets these coordinates. These baffles extend from the bottom of the tank upward.
# an even numbered baffle gets these coordinates. These baffles extend from the top of the tank downward.
# increments counter variables
# This function returns 2 matrices (one for each channel) with the coordinates for each baffle. This will be used by the autoCAD team to draw the baffles
bafflepositions([15; .5; 2.5], [30; 20; 5], [1.6; 1.3; 1.1], [.1; .3; .5]) = [[[
    0.1, 2.5, 0.9;
    0.2, 0, 1.6;
    0.3, 2.5, 0.9;
    0.4, 0, 1.6;
    0.5, 2.5, 0.9;
    0.6, 0, 1.6;
    0.7, 2.5, 0.9;
    0.8, 0, 1.6;
    0.9, 2.5, 0.9;
    1, 0, 1.6
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], [
    7.2, 2.5, 1.2;
    6.9, 0, 1.3;
    6.6, 2.5, 1.2;
    6.3, 0, 1.3;
    6, 2.5, 1.2;
    5.7, 0, 1.3;
    5.2, 2.5, 1.4;
    4.7, 0, 1.1;
    4.2, 2.5, 1.4;
    3.7, 0, 1.1;
    3.2, 2.5, 1.4;
    1.5, 0, 1.1;
    1, 2.5, 1.4
]], 57, [30; 20; 7]]
# This function checks to see if the Gθ value for the flocculator has fallen too low after baffles were removed the fit the flocculator in the tank.
# Baffle should only have been removed from the last baffle spacing, so this recaculates how many baffles are left at this spacing
Gθmin_check(baffle_spacing, tot_baffle, n_bafflenew, G_min, θ_min) :=
    newGθ_totalpersection ← vectorize(G_min*θ_min*n_bafflenew)
    newGθ_total ← 0
    for i ∈ 0 .. 2
        newGθ_total ← newGθ_total + newGθ_totalpersection[i] if newGθ_totalpersection[i] > 0
        i ← i + 1
    return [newGθ_totalpersection, newGθ_total]
    return 1 if newGθ_total < Gθ_absmin
    return 0 otherwise
# This recalculates the Gθ for each section and then sums the three values to get the Gθ for the entire tank. Note: this will not be an exact value because the baffle spacings at the end of the tanks might be larger than expected. This estimation should be close enough to decide when a tank fails and when it succeeds.
Gθmin_check([1.6; 1.3; 1.1], 100, [30; 50; 10], [2000; 4500; 12.341]*1/s, [3.315; 14.482; 28.963]*s) = [[198900; 3258450; 3574.32], 3460924]
flocculator(Q_plant, SedDim) :=
    FlocTank_length ← SedDim[0]*n_channels*m
    FlocTank_width ← SedDim[1]/n_channels*m
    FlocTank_enddepth ← SedDim[2]*m - freeboard_sed
    baffle_spacing ← (1/G)^(1/2)*(k_b*Q_plant^3/(2*Π_cell*ν*FlocTank_width^3))^(1/4)
    G_min ← G*flowratio_hightolowflow^(3/2)
    θ_min ← Π_cell*FlocTank_width*baffle_spacing^2/Q_plant
    Gθ_minpersection ← Gθ_min*G_min/sum(G_min)
    n_baffle ← ceil(vectorize(Gθ_minpersection/(G_min*θ_min)))
    length_duetobaffles ← baffle_spacing*n_baffle
    uturnhole_dim ← uturnhole(baffle_spacing/m, FlocTank_width, FlocTank_length, n_baffle)
    baffle_length ← shortcircuit(baffle_spacing/m, FlocTank_enddepth)
    v ← Q_plant/(FlocTank_width*baffle_spacing)
    h_l ← vectorize(n_baffle*(k_b*v^2/(2*g)))
    total_hl ← sum(h_l)
    d_start ← FlocTank_enddepth + total_hl
    FlocTank_height ← d_start + freeboard_floc
    floc_dim ← [FlocTank_length; FlocTank_width; FlocTank_height]
    [baffle_positions, tot_baffle, n_bafflesnew] ← bafflepositions(floc_dim/m, n_baffle, baffle_length/m, baffle_spacing/m)
    Gθ_newmin ← Gθmin_check(baffle_spacing, tot_baffle, n_bafflesnew, G_min, θ_min)
    lowGθ ← "Failure: Your Gθ for the flocculator is too low. It should not fall below 4500. Consider increasing the length."
    return lowGθ if Gθ_newmin == 1
    floc_inleth ← 1.5*m
    return [floc_dim/m, baffle_spacing/m, tot_baffle, total_hl/m, uturnhole_dim/m, baffle_length/m, baffle_positions, Gθ_newmin, length_duetobaffles/m]
# The length of one channel of the flocculator is equal to the length of a sed tank . Therefore the total length is equal to the number of channels times the length of a sed tank. The width of a flocculator is equal to the width of a sed tank divided by the number of channels (to make "upward velocity" equal in the two tanks. The water depth at the end of the flocculaor must be the same as the water depth in the sed tank.
# calculates the baffle spacing based on desired G value
# calculates the min G value based on the velocity at low flow
# Calculates the minimum residence time for the flocculator
# each baffle spacing is resposible for contributing a certain Gtheta to the tanks total Gtheta. This is caculated based on the ratio between the G of a certain spacing divided by the sum of the G values for all three sections. There will be more baffles at the smaller baffle spacing.
# determines the number of baffles at each spacing based on the Gtheta requirement calculated above.
# calls the function which finds the dimensions of the uturn hole
# calls the function which checks for short circuiting and determines the baffle length for each spacing
# finds the velocity per baffle spacing based on the flow rate and the flow area of each baffle spacing
# calculates the head loss per baffle and then finds the total headloss
# the water height at the end of the tank will be less than the water height at the beginning due to head loss. The tank must be deep enough so that water does not overfloww at the beginning. Additionally, there is 10 cm of free space between the water surface and the top of the tank
# This calls the function that finds the coordinates of each baffle. This calculation of baffle positions should probably come earlier so calculations such as head loss are based
# This calls the function to check the new Gθ minimum value. It then checks to see if this value is too low. If it is an error message will be sent to the user.
# this is the height of the inlet pipe. This should probably just be in basis of design. The water should enter at the bottom of the tank.  Note: we need to check the first baffle spacing to make sure it is big enough for the influent pipe. Even so, it should still be output.
# TAMAR WILL DO THIS!!!!
flocculator(700*gpm, [3.51; 1.067; 2.06]) = [[7.02; 0.5335; 2.25813], [0.352497; 0.736746; 1.04192], 15, 0.198133, [0.322497; 1.72362], [1.43125; 0.99; 0.99], [[
    0.352497, 2.25813, 0.826878;
    0.704994, 0, 1.43125;
    1.05749, 2.25813, 0.826878;
    1.40999, 0, 1.43125;
    1.76248, 2.25813, 0.826878;
    2.11498, 0, 1.43125;
    2.46748, 2.25813, 0.826878;
    2.81998, 0, 1.43125
], [
    3.1575, 2.25813, 0.826878;
    2.80501, 0, 1.43125;
    2.45251, 2.25813, 0.826878;
    2.10001, 0, 1.43125;
    1.74752, 2.25813, 0.826878;
    1.39502, 0, 1.43125;
    1.04252, 2.25813, 0.826878
]], [[3876.15; 880.944; -2114.27], 4757.1], 14.5644]
# Leslie, I think these numbers do not work -
# The baffles currently do not overlap. The gap is 1.401-1.21.
# I did not want to change the code, but I am sure it is minor
# because the individual functions do work. You did a great job!!
#
# Tamar - Everything should be tested through the masterprogram. I just inputted random stuff here to make sure my functions would output stuff, but without realistic sed tank dimensions it's hard to tell what gives realistic values and what doesn't....
# Tamar's Notes:
# 1. Code does not work when I input 100gpm. - in order to test this you need to go through the master program, so your flocculator design is based on actual sed tank dim. the floc function does not fail at 100 gpm when done this way.
# 2. I think that after the correction is applied to change the short circuiting - we remove too much of the baffle length.
# 3. I changed my mind about drawing the baffles, I do think that it would be useful to do. I promise when I get back on Wednesday this will be my priority! The instant feedback is good to see how the number change!
# 4. I think that currently setting the channel length, we should be able to specify to the user a range that the code works for. i can help work on this as well.
