# Fluids Functions
# [reference: FluidsFunctions.xmcd]
# Pipe Database
# [reference: PipeDatabase.xmcd]
# Design Assumptions
# [reference: DesignAssumptions.xmcd]
# [reference: Pipe Design and minor loss coefficients.xmcd]
# Gives an array of the vertical location of each set of holes given hole spacing and the maximum head:
heads(Spacing, Change) :=
    for i ∈ 0 .. Change/Spacing
        h_grit[i] ← i*Spacing
    return h_grit
# This function provides the flow rate for a given head.  Requires an array with hole numbers at each level up to the current head level.
Q(h, n, Orifice_spacing, A_drillbit, K_orifice) :=
    Q ← 0
    return Q if h == 0
    otherwise
        levels ← floor(h/Orifice_spacing)
        Q ← Q + K_orifice*A_drillbit*n[0]*sqrt(2*g*h) if levels == 0
        otherwise
            for i ∈ 0 .. levels - 1
                Q ← Q + K_orifice*A_drillbit*n[i]*sqrt(2*g*(h - Orifice_spacing*i))
        return Q
# This returns an array with the number of holes required to create a linear relationship between flow and depth at each vertical orifice spacing:
N_holes(h_grit, Base, MaxHeadChange, Orifice_spacing, FirstFlow, A_drillbit, K_orifice) :=
    n_holes[0] ← Base
    for p ∈ 1 .. MaxHeadChange/Orifice_spacing - 1
        n_holes[p] ← 0
        while Q(h_grit[p + 1], n_holes, Orifice_spacing, A_drillbit, K_orifice) ≤ FirstFlow*(p + 1)
            n_holes[p] ← n_holes[p] + .1
        n_holes[p] ← round(n_holes[p])
    return n_holes
# This returns an the number of tees, crosses, and elbows in the grit chamber based on the number of risers: this works for any number of risers, but should perhaps be limited somewhere else.
# The number of connections refers to the number of ends that
# will overlap between two components instead of being used
# for elbows to the risers. For instance if you have five
# risers you will need at least five elbows. But a cross can only
# account for three since one is an inlet, which is accounted for in
# ends with the +1.
N_components(n_risers) :=
    n_connections ← 0 if n_risers < 4
    n_connections ← (n_risers - 1) if n_risers ≥ 4 and mod(n_risers, 2) ≠ 0
    n_connections ← (n_risers - 2) otherwise
    ends ← n_risers + 1 + n_connections
    n_crosses ← trunc(ends/4)
    left ← ends - 4*n_crosses
    n_tees ← trunc(left/3)
    left ← left - 3*n_tees
    n_straight ← left
    n_elbows ← n_risers + 1
    n_components ← [n_elbows; n_tees; n_crosses]
    return n_components
# The number of ends includes the inlet, the connections and the
# risers.
# The largest number of crosses needed is first calculated, and the
# ends left to be accounted for is calculated. Similarly the largest
# number of tees and straight pipes are calculated based on the ends
# left after each calculation.
# An extra elbow was added to the grit chamber
# Given the number of holes at each vertical orifice spacing above, what are the actual flow rates what art the flow rates when the water reaches just below each set of holes?
OurFlows(h, n, Orifice_spacing, A_drillbit, K_orifice) :=
    for i ∈ 0 .. length(h) - 1
        Flows[i] ← Q(h[i], n, Orifice_spacing, A_drillbit, K_orifice)
    return Flows
# Calculates available pipe sizes from pipe database
D_avail := AvailPipeSizes1(PipeSpecification)  # disabled  # Should be in the grit chamber function
Q_plant := 470*L/min  # disabled  # just for testing
h_grit := heads(Orifice_spacing, h_lmax)  # Based on Design Assumptions
# Diameter of each riser
D_riser(Q_plant, D_avail) := D_pipe(Q_plant, D_avail, h_lmax, L_rmpipe, ν, ε_pvc, K_sum(0, n_elbowsgrit, 0, n_tgrit, 0, 0, 0, 0, 0))
D_riser(Q_plant, D_avail) =  # error: This variable is undefined.
# Number of risers
n_risers(Q_plant, D_avail) := ceil(4*A_orifice(h_lorificemax, K_orifice, Q_plant)/(π*D_pipe(Q_plant, D_avail, h_lmax, L_rmpipe, ν, ε_pvc, K_sum(0, n_elbowsgrit, 0, n_tgrit, 0, 0, 0, 0, 0))^2*A_ratio))
# Desired flowrate through plant
Q_ideal(Q_plant, h_grit, h_riser) := h_grit*Q_plant/h_riser
# Actual flowrate through plant given headloss through risers??
FirstFlow(Q_plant, h_lmax, Orifice_spacing) := Q_plant/(h_lmax/Orifice_spacing)
# Array of drill bit diameters based on english and metric drill sets. The min and max diameter was determined based on a nonlinear flow measurement design function.
D_metdrill := [
    3 mm;
    4 mm;
    5 mm;
    6 mm;
    7 mm;
    8 mm;
    9 mm;
    10 mm;
    11 mm;
    12 mm;
    13 mm;
    14 mm;
    15 mm;
    16 mm;
    17 mm;
    18 mm;
    19 mm;
    20 mm
]
D_engdrill := [
    2/16*in;
    3/16*in;
    4/16*in;
    5/16*in;
    6/16*in;
    7/16*in;
    8/16*in;
    9/16*in;
    10/16*in;
    11/16*in;
    12/16*in
]
# Determine which array of drillbit sizes to use based on type of drill set (english or metric)
D_drill(DrillSize) :=
    D_engdrill if DrillSize == 1
    D_metdrill otherwise
DrillSize := 0  # disabled  # just for testing
# Calculates the drill bit size to use and the number of orfices at each vertical spacing of the grit chamber.
Riser_orifices(Q_plant, DrillSize) :=
    i ← last(D_drill(DrillSize))
    while Q_error > Max_error
        A_drillbit ← π*D_drill(DrillSize)[i]^2/4
        BaseHoles ← round(FirstFlow(Q_plant, h_lmax, Orifice_spacing)/Q_orifice(D_drill(DrillSize)[i], h_lmax, K_orifice))
        n_orifices ← N_holes(h_grit, BaseHoles, h_lmax, Orifice_spacing, FirstFlow(Q_plant, h_lmax, Orifice_spacing), A_drillbit, K_orifice)
        Q_actual ← OurFlows(h_grit, n_orifices, Orifice_spacing, A_drillbit, K_orifice)
        Q_error ← 100*max(|Q_actual - Q_ideal(Q_plant, h_grit, h_riser)|)/Q_plant
        i ← i - 1
        if i < 0
            {
                break
            }
    i - 1 if i == last(D_drill(DrillSize))
    return [D_drill(DrillSize)[i + 1]/m, n_orifices]  # Max.error is the max allowable error between the desired flow rate and the actual flowrate
# A.drillbit is the area of the orifice
# BaseHoles is the number of orfices in the first vertical spacing of the riser
# n orifices is the number of orifices at each vertical spacing
# Q.actual is the actual flowrate
# Q.error is calculating the error between actual and desired flowrates
# just checking function
Riser_orifices(Q_plant, DrillSize)[:, 0] =  # error
Riser_orifices(Q_plant, DrillSize)[:, 1] =  # error
# Calcutlates the grit chamber width by which is widest the spacing needed to place the risers in the grit chamber or the width of the chemical feed platform
grit_width(PipeSpecification, Q_plant, D_avail) :=
    grit_width ← n_tgrit*TeeLength(D_nominal(D_riser(Q_plant, D_avail), PipeSpecification)) + n_elbowsgrit*ElbowRadius(D_nominal(D_riser(Q_plant, D_avail), PipeSpecification))
    D_drum ← 2*r_drum
    grit_width if grit_width > D_drum
    D_drum otherwise
# Grit depth and length need to be updated based on new configuration.
SedTank_level := 2 m  # These constants should be defined in the design assumptions
grit_length := 2 m  # These will not be constants they will be updated once AutoCad determines new configuration
grit_depth := SedTank_level
# This function uses all of the neccessary user inputs and outputs the dimensions of the grit chamber, the number of risers, the number of orfices at each veritcal spacing, the diameter of the riser and the diameter of the orifice.
gritchamber(Q_plant, PipeSpecification, DrillSize) :=
    D_orifice ← Riser_orifices(Q_plant, DrillSize)[:, 0]
    D_avail ← AvailPipeSizes1(PipeSpecification)
    n_risers ← n_risers(Q_plant, D_avail)
    D_riser ← D_pipe(Q_plant, D_avail, h_lmax, L_rmpipe, ν, ε_pvc, K_sum(0, n_elbowsgrit, 0, n_tgrit, 0, 0, 0, 0, 0))
    n_orifices ← Riser_orifices(Q_plant, DrillSize)[:, 1]
    grit_dim ← [grit_length/m; grit_width(PipeSpecification, Q_plant, D_avail)/m; grit_depth/m]
    return [grit_dim, n_risers, n_orifices, D_riser/m, D_orifice]
# This is not being used in the Master Program, just for reference as of right now!
# Could be deleted!
gritchamber2(Q_plant, DrillSize, PipeSpecification) :=
    D_avail ← AvailPipeSizes1(PipeSpecification)
    K_sum ← K_sum(0, n_elbowsgrit, 0, n_tgrit, 0, 0, 0, 0, 0)
    D_riser ← D_pipe(Q_plant, D_avail, h_lmax, L_rmpipe, ν, ε_pvc, K_sum)
    A_orif ← A_orifice(h_lorificemax, K_orifice, Q_plant)
    n_risers ← ceil(4*A_orif/(π*D_riser^2*A_ratio))
    A_drillbit ← π*DrillSize^2/4
    h_grit ← heads(Orifice_spacing, h_lmax)
    FirstFlow ← Q_plant/(h_lmax/Orifice_spacing)
    Q_ideal ← h_grit*Q_plant/h_riser
    D_orifice ← DrillSize
    BaseHoles ← round(FirstFlow/Q_orifice(DrillSize, h_lmax, K_orifice))
    n_orifices ← N_holes(h_grit, BaseHoles, h_lmax, Orifice_spacing, FirstFlow, A_drillbit, K_orifice)
    Q_actual ← OurFlows(h_grit, n_orifices, Orifice_spacing, A_drillbit, K_orifice)
    Q_error ← 100*max(|Q_actual - Q_ideal|)/Q_plant
    Q ← Q(h_lmax, h_grit)
    riser_area ← D_riser^2/4*π
    riser_areaTotal ← riser_area*n_risers
    drum_circumference ← r_drum^2*π
    riser_areaTotal ← drum_circumference if drum_circumference > riser_areaTotal
    grit_length ← sqrt(riser_areaTotal)
    grit_width ← r_drum*2 + sqrt(riser_areaTotal)
    grit_depth ← 2 m
    grit_dim ← [grit_length; grit_width; grit_depth]
    return [grit_dim/m, n_risers, n_orifices, D_riser/m, D_orifice/m]
