n
# Hydraulic Design
# References
# Fluids Functions
# [reference: FluidsFunctions.xmcd]
# Pipe Database
# [reference: PipeDatabase.xmcd]
# Constants
ν := 1*10^-6*m^2/s  # The kinematic viscosity of water.
ε_pvc := .12 mm  # The roughness coefficient for a pvc pipe.
A_ratio := 0.3
# The maximum inlet orifice area into a vertical pipe normalized by the pipe area. This prevents the orifice flow from becoming so large that the orifice flows interfere with each other. This estimate is based on experience we have at Ojojona, and may be revised as we build more of these flow measuring devices. The orfices should also be placed on one side of the pipe so that the orifice jets don't impinge on each other.
L_rmpipe := 2 m  # The total pipe length between the orifices and the flocculator (rapid mix pipe) .
# Minor Headlosss Coefficients
# Individual K Values | Expansions
K_el90 := 0.9
K_Tflowrun := 0.6
K_1 := 0
diamratio_exp0.75 := 0
diamratio_exp0.5 := 0
K_el45 := 0.45
K_Tflowbr := 1.8
K_returnbend := 1.5
K_gatevalve := 0.39
K_globevalve := 10
diamratio_exp0.25 := 0
K_chkvalveconv := 4
K_anglevalve := 4.3
K_chkvalveball := 4.5  # Contractions
K_exp0.75 := 0.18
K_exp0.5 := 0.55
diamratio_cont0.75 := 0
diamratio_cont0.5 := 0
K_exp0.25 := 0.25
K_cont0.75 := 0.18
K_cont0.25 := 0.43
K_cont0.5 := 0.33
diamratio_cont0.25 := 0
# Pipes and Orifices
PipeSize(Q_plant, PipeSpecification, h_lmax, K_sum, L_pipe) :=
    Pipe_size ← D_pipe(Q_plant, PipeSpecification, h_lmax, L_pipe, ν, ε_pvc, K_sum)
    return Pipe_size
K_sum(N_elbow45, K_el45, N_elbow90, K_el90, K_Tflowrun, N_teerun, K_Tflowbr, N_teebr, K_gatevalve, K_globevalve, K_anglevalve, K_chkvalveconv, K_chkvalveball, GateValve, GlobeValve, AngleValve, CheckValveConv, CheckValveBall, diamratio_exp0.75, K_exp0.75, diamratio_exp0.5, K_exp0.5, diamratio_exp0.25, K_exp0.25, diamratio_cont0.75, K_cont0.75, diamratio_cont0.5, K_cont0.5, diamratio_cont0.25, K_cont0.25) :=
    K_2 ← N_elbow45*K_el45 + N_elbow90*K_el90
    K_3 ← K_Tflowrun*N_teerun + K_Tflowbr*N_teebr
    K_4 ← GateValve*K_gatevalve + GlobeValve*K_globevalve + AngleValve*K_anglevalve + CheckValveConv*K_chkvalveconv + CheckValveBall*K_chkvalveball
    K_5 ← diamratio_exp0.75*K_exp0.75 + diamratio_exp0.5*K_exp0.5 + diamratio_exp0.25*K_exp0.25 + diamratio_cont0.75*K_cont0.75 + diamratio_cont0.5*K_cont0.5 + diamratio_cont0.25*K_cont0.25
    K_sum ← K_2 + K_3 + K_4 + K_5
    return K_sum
# Grit Chamber Design
# Maximum water surface elevation in the entrance tank measured from the center of the orifices at the design plant flow rate is Δh_orifice := 20 cm
# The pipe sections leading to the flocculator from the vertical pipes with the orifices will have n_elbows := 4 (a few of the elbows may actually be Tees) and each of these 90 degree bends will have a minor loss coefficient of approximately K_elbow := 1 The total pipe length between the orifices and the flocculator (rapid mix pipe) will be approximately L_rmpipe := 2 m.
# Assume D.orifice = 1.5 in, Korifice=0.63
gritchamber(Q_plant, r_drum, PipeSpecification, A_ratio, L_rmpipe) :=
    D_avail ← AvailPipeSizes(PipeSpecification)
    h_lmax ← 20 cm
    h_lorificemax ← 20 cm
    K_sum ← K_sum(0, K_el45, 4, K_el90, K_Tflowrun, 0, K_Tflowbr, 0, K_gatevalve, 0, K_anglevalve, K_chkvalveconv, K_chkvalveball, 0, 0, 0, 0, 0, diamratio_exp0.75, K_exp0.75, diamratio_exp0.5, K_exp0.5, diamratio_exp0.25, K_exp0.25, diamratio_cont0.75, K_cont0.75, diamratio_cont0.5, K_cont0.5, diamratio_cont0.25, K_cont0.25)
    D_pipe ← D_pipe(Q_plant, D_avail, h_lmax, L_rmpipe, ν, ε_pvc, K_sum)
    K_orifice ← 0.63
    A_orifice ← A_orifice(Q_plant, K_orifice, h_lorificemax)
    n_risers ← ceil(4*A_orifice/(π*D_pipe^2*A_ratio))
    D_orifice ← 1.5 in
    n_orifice ← n_orifices(Q_plant, K_orifice, h_lorificemax, D_orifice)
    riser_area ← D_pipe^2/4*π
    riser_areaTotal ← riser_area*n_risers
    drum_circumference ← r_drum^2*π
    if {
        drum_circumference > riser_areaTotal
        return riser_areaTotal
    }
        riser_areaTotal ← drum_cicumference
    grti_length ← sqrt(riser_areaTotal)
    grit_width ← r_dum*2 + sqrt(riser_areaTotal)
    grit_dim ← [grit_length; grit_width; grit_depth]
    return [gritriser_h/m, grit_dim/m, n_risers, n_orifice, D_pipe/m, D_orifice/m]
# Plant Leveling Tank
PlantLevelingTank(Q_plant, D_avail) :=
    lvltank_waterlvl ← 3 m
    wall_disp ← 3 m
    depth ← 2 m
    width ← 2 m
    length ← 2 m
    lvltank_dim ← [length; width; depth]
    return (lvltank_waterlvl, wall_disp, lvltank_dim)
PlantElevationDesign(Q_plant, n_sedtanks, sedtank_dim, FlocTank_width) := 3
# Plant Elevation Design
# Hydraulic Design Function
gritchamber(Q_plant, r_drum, PipeSpecification, A_ratio, L_rmpipe)
HydraulicDesign(Q_plant, FlocTank_width, PipeSpecification, n_sedtanks, sedtank_dim, lamella_spacing, tank_thick, channel_thick) :=
    D_avail ← AvailPipeSizes(PipeSpecification)
    waterlevel ← 1
    manifold_depth ← 1
    D_orifice ← 2 cm
    grit_holes ← FlowMeasurementDesign(Q_plant, D_avail)
    lvltank_dim ← [1; 1; 1]
    waste_inr ← 5
    effluent_inr ← 5
    SedPipe_length ← 2
    lvltank_waterlvl ← 5
    wall_disp ← 3
    channel_dim ← 2
    orifice_dist ← 23 cm
    return [waterlevel, manifold_depth, D_orifice/m, grit_holes, lvltank_dim, waste_inr, effluent_inr, SedPipe_length, lvltank_waterlvl, wall_disp, channel_dim, orifice_dist/m]  # error: This variable is undefined.
