# [reference: DesignAssumptions.xmcd]
# [reference: PipeDatabase.xmcd]
# [reference: FluidsFunctions.xmcd]
# [reference: Pipe Design and minor loss coefficients.xmcd]
d_orifice(Q_manifoldratio, Q_tank, d_pipe, L_s, L_l, K_total, n_orifice, ν, ε, K_or) := nthroot((1 - Q_manifoldratio)*d_pipe^4/(((K_total + f(Q_tank, d_pipe, ν, ε)*L_l/d_pipe)*Q_manifoldratio - K_total - f(Q_tank, d_pipe, ν, ε)*L_s/d_pipe)*K_or^2*n_orifice^2), 4)
# Launderer Design
Launder(Q_plant, PipeSpecification, L_sedtank, lamella_spacing, HW_sedtank, spaceabove, width_channel, SedTank_width, platform_thick, walkway) :=
    Q_tank ← Q_plant/n_sedtanks
    n_orifices ← 2*floor(L_sedtank/Orifice_dist)
    Q_orifice ← Q_tank/n_orifices
    manifold_elevation ← HW_sedtank - spaceabove/2
    D_avail ← AvailPipeSizes1(PipeSpecification)
    L_longlaunder ← 2*SedTank_width + 0.5*SedTank_width + width_channel + 3*platform_thick + walkway + 0.8 m + L_sedtank
    L_shortlaunder ← 0.5*SedTank_width + width_channel + 3*platform_thick + walkway + 0.8 m + L_sedtank
    D_launder ← D_manifold(Q_tank, hl_launder, L_longlaunder, Q_ratioLaunderOrf, D_avail, ν, ε_pvc, 0, n_orifices)
    K_sum ← K_sum(0, 4, 0, 0, 0, 0, 0, 0, 0)
    D_orifice ← d_orifice(Q_ratioLaunders, Q_tank, D_launder, L_shortlaunder, L_longlaunder, K_sum, n_orifices, ν, ε_pvc, K_orifice)
    HL_laundorif ← h_orifice(D_orifice, K_orifice, Q_orifice)
    HL_launder ← h_lmanifold(Q_tank, D_launder, L_longlaunder, 0, ν, ε_pvc, n_orifices)
    HL_laundertotal ← HL_launder + HL_laundorif + h_e(Q_tank, D_launder, K_sum) + h_f(Q_tank, D_launder, L_longlaunder, ν, ε_pvc)
    while HL_laundertotal > hl_launder
        D_launder ← Dpipelarger(D_launder, D_avail)
        D_orifice ← d_orifice(Q_ratioLaunders, Q_tank, D_launder, L_shortlaunder, L_longlaunder, K_sum, n_orifices, ν, ε_pvc, K_orifice)
        HL_laundorif ← h_orifice(D_orifice, K_orifice, Q_orifice)
        HL_launder ← h_lmanifold(Q_tank, D_launder, L_longlaunder, 0, ν, ε_pvc, n_orifices)
        HL_laundertotal ← HL_launder + HL_laundorif + h_e(Q_tank, D_launder, K_sum) + h_f(Q_tank, D_launder, L_longlaunder, ν, ε_pvc)
    offfloor_length ← 1.5*D_launder
    Pipe9_length ← (spacebelow_total - D_launder - offfloor_length)/2
    return [L_sedtank/m, D_orifice/cm, Orifice_dist/m, manifold_elevation/m, HL_laundertotal/m, n_orifices, HL_laundorif/m, offfloor_length/m, Pipe9_length/m, D_launder/in]
# The orifices will be located on the sides of the launder and will be spaced at twice the lamella spacing
# The launder will be located between the top of the lamella and the surface of the water in the sedimentation tank, the orifices will be at the center of the launders
# Using the iterative program from above, and the available pipe sizes from the pipe database, the launder diameter is determined
# The head loss through the launder is calculated by using the orifice equation,and the manifold head loss equation found the Fluids Functions file. By multiplying by the number of sedtanks, the total head loss is determined, and the water level in the plant leveling tank can be determined.
Launder(270*gpm, 8, 2 m, 10 cm, 2 m, 20 cm, 0.5 m, 1 m, 30 cm, 1 m) = [2, 2.10376, 0.1, 1.9, 0.0730173, 40, 0.0214237, 0.194615, 0.337821, 5.108]
AvailPipeSizes(8) = [
    1.175, 1;
    1.512, 1.25;
    1.734, 1.5;
    2.173, 2;
    2.635, 2.5;
    3.21, 3;
    3.672, 3.5;
    4.134, 4;
    5.107, 5;
    6.083, 6;
    7.921, 8;
    9.874, 10;
    11.71, 12;
    12.924, 14;
    14.77, 16;
    16.616, 18;
    18.462, 20;
    22.154, 24
] in
