# AguaClara Water Treatment Plants
# Automated Design
# References
# [reference: Channel design.xmcd]
# [reference: Chemical Feed.xmcd]
# [reference: Flocculation Function.xmcd]
# [reference: GritChamber.xmcd]
# [reference: HydraulicDesign.xmcd]
# [reference: Launder.xmcd]
# [reference: Plant Elevation Design.xmcd]
# [reference: plantleveltank.xmcd]
# [reference: Sedimentation Function.xmcd]
# User Inputs:
# Choose either a Pipe Schedule Number or an SDR rating:
# [component: outputs PipeSpecification]
# Engineer Entered Values: | Values used to Draw Plant:
tank_thick := 20 cm
Q_plant := 110*gpm = 11168.7 L*m/(mi*s)
lvltank_thick := 20 cm
# sed tank parameters
stockplat_thick := lvltank_thick
beta := 45 deg
grit_thick := lvltank_thick
SedTank_width := 42 in  # Width of the lamella
platform_thick := .5 m
# length of the lamella
channel_thick := 10 cm
L_lamella := 80 cm
lamella_spacing := 5 cm  # lamella spacing
walkway_width := 1 m
# grit chamber parameters
# Would you like to use Metric of English drill bits?
# [component: outputs DrillSeries]
# Calls Functions Here:
# Chemical Feed Design
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Q_alum := ChemicalFeed(Q_plant) = 208.198 mL/min
# Channel Design
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Channel_dim := Channel(Q_plant, SedTank_width, tank_thick) = [3.6004; 0.288521; 0.7] m
# Sedimentation Tank Design
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SedTank := SedTankDesign(Q_plant, SedTank_width, lamella_spacing, L_lamella, beta, Channel_dim) = [[2.27354; 1.0668; 2.05952], 27, 1.95952, 1.35952, 12.6132, 0.2667]
# outputs:
[sedtank_dim/m, N_lamella, water_depth/m, z_plat/m, v_c*day/m, spaceabove/m]  # disabled
# Flocculator Design
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# The baffle positions are reported in the following way:
# There is one matrix for each channel. The first column is the x position
# of the baffle. The 2nd column is the starting y position of a baffle (ie top of the tank (0),
# or bottom of tank), the 3rd column is the final position of the baffle.
# Therefore a baffle at position x extends between the two y coordinates.
[floc_dim/m, baffle_spacing/m, tot_baffle, total_hl/m, uturnhole_dim/m, baffle_length/m, baffle_positions, Gθ_newmin, length_duetobaffles/m]  # disabled
SedTank[:, 0][0] = [2.27354; 1.0668; 2.05952]
Flocculator := flocculator(Q_plant, SedTank[:, 0][0]) = [[4.54709; 0.5334; 2.16674], [0.0879908; 0.183908; 0.260085], 37, 0.107217, [0.0579908; 2.39226], [1.82753; 1.68366; 1.56939], [[
    0.0879908, 2.16674, 0.339204;
    0.175982, 0, 1.82753;
    0.263973, 2.16674, 0.339204;
    0.351963, 0, 1.82753;
    0.439954, 2.16674, 0.339204;
    0.527945, 0, 1.82753;
    0.615936, 2.16674, 0.339204;
    0.703927, 0, 1.82753;
    0.791918, 2.16674, 0.339204;
    0.879908, 0, 1.82753;
    0.967899, 2.16674, 0.339204;
    1.05589, 0, 1.82753;
    1.14388, 2.16674, 0.339204;
    1.23187, 0, 1.82753;
    1.31986, 2.16674, 0.339204;
    1.40785, 0, 1.82753;
    1.49584, 2.16674, 0.339204;
    1.58384, 0, 1.82753;
    1.67183, 2.16674, 0.339204;
    1.75982, 0, 1.82753;
    1.84781, 2.16674, 0.339204;
    1.9358, 0, 1.82753;
    2.02379, 2.16674, 0.339204;
    2.11178, 0, 1.82753
], [
    2.18555, 2.16674, 0.339204;
    2.09756, 0, 1.82753;
    2.00957, 2.16674, 0.339204;
    1.92158, 0, 1.82753;
    1.83359, 2.16674, 0.339204;
    1.7456, 0, 1.82753;
    1.56169, 2.16674, 0.339204;
    1.37778, 0, 1.68366;
    1.19388, 2.16674, 0.483079;
    1.00997, 0, 1.68366;
    0.826062, 2.16674, 0.483079;
    0.642154, 0, 1.68366;
    0.458246, 2.16674, 0.483079
]], [[11549; 2694.78; 0], 14243.8], 4.96742, 1.5]
# Grit Chamber Design
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Grit := gritchamber(Q_plant, PipeSpecification, DrillSeries, lamella_spacing, L_lamella, beta, Channel_dim, SedTank[:, 0][0]*m, SedTank[:, 2][0]*m, Flocculator[:, 3][0]*m) = [[1.347; 0.9048; 2.67045], 2, [70; 345; 57; 71; 65; 61; 57; 52; 49; 47], 0.12225, [0.003175]]
[grit_dim, n_risers, n_orifices, D_riser/m, D_orifice]  # disabled
# Launderer Design
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Laund := Launder(Q_plant, PipeSpecification, SedTank[:, 0][0][0]*m, lamella_spacing, SedTank[:, 2][0]*m, SedTank[:, 5][0]*m, Channel_dim[1], SedTank[:, 0][0][1]*m, platform_thick, walkway_width) = [2.27354, 0.0415576, 0.1, 0.13335, 0.07366, 44, 0.10504, 0.000192997, 0.07366, 0.0295501, 0.07366]
[SedPipe_length/m, D_orifice/m, orifice_dist/m, manifold_depth/m, D_launder/m, n_orifices, HL_laundertotal/m, h_orifice/m, D_launder1/m, mayor_hl/m, Diam_launder/m]  # disabled
# Sludge Pipe Design
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SludgePipe := Sludge(Q_plant, PipeSpecification, SedTank[:, 0][0][0]*m, lamella_spacing) = [0.07366, 0.0050791, 0.1] m
[waste_inr, D_orifice, orifice_dist]  # disabled
# Plant Leveling Tank
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PLT := PlantLevelingTank(Q_plant, PipeSpecification, Laund[:, 4][0]*m, Laund[:, 6][0]*m) = [[0.259767; 0.67366; 0.7], 0.0492506, 0.39496, 0.49496] m
[lvltank_dim, D_weir, H_weir, HW_plantleveling]  # disabled
# Plant Elevation Design
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Z_elevation := PlantElevations(Q_plant, Grit, Laund, SedTank, Q_alum, PLT[:, 2][0], PLT[:, 1][0], Flocculator[:, 3][0]*m, L_lamella, 10 cm) = [3.41358; 2.81358; 2.71358; 1.51358; 2.61358; 2.56358; 2.36358; 2.66358; 2.56358; 2.36358; 2.17861; 2.17861; 2.16674; 2.06674; 2.05952; 1.95952; 1.63923; 1.31894; 0.62612; 1.35952; 1.77104; 1.85632; 2.05952] m
# Constructing Tables of Parameters:
# Defining components of Output Arrays:
[sedtank_dim, N_lamella, water_depth, z_plat, v_c, spaceabove] := SedTank
[floc_dim, baffle_spacing, tot_baffle, floctotal_hl, uturnhole_dim, baffle_length, baffle_positions, Gθ_newmin, length_duetobaffles, floc_inleth] := Flocculator
[SedPipe_length, D_laundOrf, laundOrf_dist, manifold_depth, D_launder, n_laundOrf, HL_laundertotal, h_laundOrf, D_launder1, mayor_hl, Diam_launder] := Laund
[waste_inr, D_sludgeOrf, sludgeOrf_dist] := SludgePipe/m
[lvltank_dim, D_weir, H_weir, HW_plantleveling] := PLT/m
[grit_dim, n_GritRisers, n_GritOrf, D_GritRiser, D_GritOrf] := Grit
# Defining components of Table Arrays:
headerrow := ["Parameter"; "Value"; "Units"]
Units := [" "; " meter per day"; "meter"; " "; "meter"; "meter"; "centimeter"; "meter"; "meter"; "meter"; " "; "inches"; "centimeter"; "meter"; "meter"; "meter"; "meter"; "meter"; "meter"; "centimeter"]
headercolumn := [
    "Number of lamella in sedimentation tanks";
    "critical velocity in sed tank";
    "height of the inlet to the flocc tank";
    "number of baffles in flocculator";
    "total headloss through flocculator";
    "length of the sedimentation inlet launder";
    "diameter of orifices in the launder";
    "distance between orifices in the launder";
    "depth of the launder below the water level";
    "diameter of the sedimentation inlet launder";
    "number of orifices in the launder";
    "diameter of sedimentation outlet sludge pipe";
    "diameter of orifices in sludge pipe";
    "distance between orifices in sludge pipe";
    "Diameter of weir in Plant Leveling Tank";
    "Height of weir in PLT";
    "Height of the Water in the PLt";
    "number of risers in grit chamber";
    "diameter of risers in grit chamber";
    "diameter of orifices in grit chamber"
]
Z := [
    N_lamella;
    v_c;
    floc_inleth;
    tot_baffle;
    floctotal_hl;
    SedPipe_length;
    D_laundOrf*m/cm;
    laundOrf_dist;
    manifold_depth;
    D_launder1;
    n_laundOrf;
    waste_inr*m/in;
    D_sludgeOrf*m/cm;
    sludgeOrf_dist;
    D_weir;
    H_weir;
    HW_plantleveling;
    n_GritRisers;
    D_GritRiser;
    D_GritOrf*m/cm
]
length(headercolumn) = 20
length(Z) = 20
table(headerrow, headercolumn, Z) :=
    for i ∈ 0 .. length(headercolumn)
        for j ∈ 0 .. last(headerrow)
            table[i, j] ← headerrow[j] if i == 0
            otherwise
                table[i, j] ← headercolumn[i - 1] if j == 0
                table[i, j] ← Z[i - 1] if j == 1
                table[i, j] ← Units[i - 1] if j == 2
    return table
headercolumn_Dim := [" Sedimentation Tank"; "Dimensions of Flocculator"; "Dimensions of Grit Chamber"; "Dimensions of Leveling Tank"; "Dimensions of Channel"]
headerrow_Dim := ["Component"; "Length"; "Width"; "Height"; "Units"]
Dim_y := [sedtank_dim[1]; floc_dim[1]; grit_dim[1]; lvltank_dim[1]; Channel_dim[1]/m]
Dim_z := [sedtank_dim[2]; floc_dim[1]; grit_dim[2]; lvltank_dim[2]; Channel_dim[2]/m]
Dim_x := [sedtank_dim[0]; floc_dim[0]; grit_dim[0]; lvltank_dim[0]; Channel_dim[0]/m]
Units2 := ["meter"; "meter"; "meter"; "meter"; "meter"]
tableDim(headerrow_Dim, headercolumn_Dim, Dim_x, Dim_y, Dim_z, Units2) :=
    for i ∈ 0 .. length(headercolumn_Dim)
        for j ∈ 0 .. last(headerrow_Dim)
            tableDim[i, j] ← headerrow_Dim[j] if i == 0
            otherwise
                tableDim[i, j] ← headercolumn_Dim[i - 1] if j == 0
                tableDim[i, j] ← Dim_x[i - 1] if j == 1
                tableDim[i, j] ← Dim_y[i - 1] if j == 2
                tableDim[i, j] ← Dim_z[i - 1] if j == 3
                tableDim[i, j] ← Units2[i - 1] if j == 4
    return tableDim
# Constructing Plant Elevation Tables:
headerrow_elevation := ["Element"; "Elevation from bottom of the sed tank (m)"; "Elevation from platform (m)"]
# top of alum stock tank
# port on alum stock tank
# bottom of alum stock tank
# alum platform height
# valve level in the FCM
# water level in the FCM
# end of the FCM tube at maximum alum dose
# grit chamber wall
# grit chamber maximum water level
# orifice elevation in the grit chamber
# horizontal pipe centerline where it leaves the grit chamber
# water level in rapid mix
# wall height for beginning of flocculator
# water level at beginning of flocculator
# wall height for the sedimentation tank
# water level in the sedimentation tank and channel
# top of the effluent launder
# top of the plate settlers
# bottom of the plate settlers
# platform height
# weir height
# level control water height
headercolumn_elevation := [
    "top of alum stock tank";
    "port on alum stock tank";
    "bottom of alum stock tank";
    "alum platform height";
    "valve level in the FCM";
    "water level in the FCM";
    "end of the FCM tube at maximum alum dose";
    "grit chamber wall";
    "grit chamber maximum water level";
    "orifice elevation in the grit chamber";
    "horizontal pipe centerline where it leaves the grit chamber";
    "water level in rapid mix";
    "wall height for beginning of flocculator";
    "water level at beginning of flocculator";
    "wall height for the sedimentation tank";
    "water level in the sedimentation tank and channel";
    "centerline of the effluent launder";
    "top of the plate settlers";
    "bottom of the plate settlers";
    "platform height";
    "weir height";
    "level control water height";
    "level control wall height"
]
tableElevation(headerrow_elevation, headercolumn_elevation, Z_elevation) :=
    for i ∈ 0 .. length(headercolumn_elevation)
        for j ∈ 0 .. last(headerrow_elevation)
            table[i, j] ← headerrow_elevation[j] if i == 0
            otherwise
                table[i, j] ← headercolumn_elevation[i - 1] if j == 0
                table[i, j] ← Z_elevation[i - 1] if j == 1
                table[i, j] ← Z_elevation[i - 1] - Z_elevation[22] if j == 2
    return table
# Tables:
# top
# [component: inputs table(headerrow, headercolumn, Z)]
# [component: inputs tableDim(headerrow_Dim, headercolumn_Dim, Dim_x, Dim_y, Dim_z, Units2)]
# [component: inputs tableElevation(headerrow_elevation, headercolumn_elevation, Z_elevation)]
# the negative sign here for alum platform height shows that the height chosen
# for the height of the chemical platform column is larger than
# that calculated based on the headloss through the FCM and
# Grit Chamber, so that from the platform the height of the platform
# is actually below the platform to make up for the shorter height needed
