# [reference: FluidsFunctions.xmcd]
# [reference: PipeDatabase.xmcd]
# [reference: DesignAssumptions.xmcd]
PlantLevelingTank(Q_plant, PipeSpecification, D_laund) :=
    HW_plantleveling ← HW_channel - hl_launder
    H_weir1 ← HW_plantleveling - ΔH_leveling
    Diam_weir ← 3*Q_plant/(2*Cd*sqrt(2*g)*π*ΔH_leveling^(3/2))
    Diam1_weir ← round(Diam_weir/(1 in))*in
    D_weir ← innerdiameter(Diam1_weir, PipeSpecification)
    H_weir ← HW_plantleveling - (3*Q_plant/(2*Cd*sqrt(2*g)*π*Diam_weir))^(2/3)
    plt_length ← 3*D_laund + Diam_weir
    plt_width ← (2*r_drum - Diam_weir) + D_laund + Diam_weir
    plt_height ← HW_channel + freeboard_sed
    lvltank_dim ← [plt_length; plt_width; plt_height]
    return [lvltank_dim, D_weir, H_weir, HW_plantleveling]
plt_height
# Height of the wall for the leveling tank =height of the wall for the channel
plt_width
# Inner width of the leveling tank is equal to the diameter of the chlorine container minus the diameter of the weir plus the sum of the diameter for one of the launders and the diameter of the weir
plt_length
# Inner length is equal to the sum of the diameters of the launders and the weir
