# Flocculation Function
# References:
# [reference: DesignAssumptions.xmcd]
# This function calculates the size of the hole between the two channels in the flocculator. The function is called below by the flocculator function. (Note: this function will NOT work for any number of flocculator channels or baffle spacings)
uturnhole(baffle_spacing, FlocTank_width, FlocTank_length, n_baffle, lastbafflespacing) :=
    uturnhole_area ← lastbafflespacing*m*FlocTank_width
    uturnhole_width ← baffle_spacing[1]*m - uturnhole_unusedspace if FlocTank_length/n_channels > baffle_spacing[0]*m*n_baffle[0]
    uturnhole_width ← baffle_spacing[0]*m - uturnhole_unusedspace otherwise
    uturnhole_height ← uturnhole_area/uturnhole_width
    return [uturnhole_width; uturnhole_height]
# The area of the hole should be equal to the flow area (baffle spacing x tank width) of the last baffle. This guarantees that the shear through this hole is not going to break up flocs. It is assumed that the baffle spacing at the beginning of the second channel is either the first or second spacing size. The width of the u turn hole cannot be greater than this baffle spacing. There should be some space around the hole that is solid (ie the hole should not extend all the way from the end of the channel to the baffle). After finding the width of the hole, the height of it should be set to make the hole the desired area. This function returns the dimensions of the hole. (Note: We are putting the hole in the center of the wall, but how should the location be ouputted?)
uturnhole([.1; .3; .5], .5*m, 15*m, [30; 20; 5], .5) = [0.285; 0.877193] m
# This function checks to see if shortcircuiting, (due to the large baffle spacing) will be a problem at the end of the tank. The function is called below by the flocculator function. (Note: this function will work for any number of flocculator channels and baffle spacings)
shortcircuit(baffle_spacing, FlocTank_enddepth) :=
    gap ← spacingratio*baffle_spacing*m
    baffle_length ← FlocTank_enddepth - gap
    baffle_overlap ← FlocTank_enddepth - 2*gap
    spacingratio_new ← (FlocTank_enddepth - overlap_min)/(2*baffle_spacing*m)
    i ← 0
    while i < length(baffle_spacing)
        baffle_length[i] ← FlocTank_enddepth - spacingratio_new[i]*baffle_spacing[i]*m if baffle_overlap[i] < overlap_min
        i ← i + 1
    return baffle_length
# Short circuiting will occur when the total space above or below adjacent baffles is approximately the same as the water depth of the flocculator. In other words, when 3b = h. If short circuiing has occured, it means adjacent baffles no longer overlap and the water can go straight through the center of the tank, rather than around the baffles.
# Typically, the space above or below a baffle (gap) is equal to spacingratio*bafflespacing. In this function, spacingratio is equal to 1.5. Therefore the length of the baffle is the water height minus gap (assuming no head loss). The overlap between adjacent baffles would then be determined by the water depth minus 3*baffle spacing). If this overlap is less than 2 cm (design assumption), a new gap ratio (less than 1.5) should be used. This ratio should be set to guarentee an overlap of 2 cm.  This function caclulates the new spacing ratio and then uses a loop to check for short circuiting at all baffle spacings. If necessary it changes the baffle length and returns a new vector of the lengths at each spacing.
shortcircuit([.1; .3; .75], 2.1*m) = [1.95; 1.65; 1.06] m
# This function creates a matrix for two channels (if needed) giving the x and y coordinates of each baffle. The function is called below by the flocculator function. (Note: this function will NOT work for any number of flocculator channels). This function is called when the length needed by the baffles is greater than a single channel length.
bafflepositions_2channels(flocDim, n_baffles, b_lengths, b_spacings) :=
    n ← 0
    k ← 0
    h ← 1
    j ← 0
    firstchannel ← 1
    length_perchannel ← flocDim[0]/n_channels
    while n ≤ sum(n_baffles) - 1
        if j > n_baffles[k] - 1 and k ≠ 2
            k ← k + 1
            j ← 0
        if firstchannel == 1
            baffle_xposition1[n] ← .355 if n == 0
            baffle_xposition1[n] ← baffle_xposition1[n - 1] + b_spacings[k] otherwise
            if baffle_xposition1[n] > 4.25
                baffle_xposition1 ← submatrix(baffle_xposition1, 0, n - 1, 0, 0)
                firstchannel ← 0
                n ← n - 1
                m ← 0
        if firstchannel == 0
            baffle_xposition2[m] ← 4.25 if m == 0
            baffle_xposition2[m] ← baffle_xposition2[m - 1] - b_spacings[k] otherwise
        m ← m + 1
        n ← n + 1
        j ← j + 1
    if baffle_xposition2[m - 1] ≥ 2*b_spacings[k]
        while baffle_xposition2[m - 1] ≥ 2*b_spacings[k]
            baffle_xposition2[m] ← baffle_xposition2[m - 1] - b_spacings[k]
            h ← h + 1
            m ← m + 1
    otherwise
        while baffle_xposition2[m - 1] < b_spacings[k]
            baffle_xposition2 ← submatrix(baffle_xposition2, 0, m - 2, 0, 0)
            h ← h - 1
            m ← m - 1
    numbaffles ← length(baffle_xposition2) + length(baffle_xposition1)
    p ← 1
    y ← 0
    t ← 0
    n_bafflesfirst ← n_baffles[0]
    n_bafflesthird ← n_baffles[2] + h
    n_bafflessecond ← numbaffles - (n_bafflesfirst + n_bafflesthird)
    n_bafflesnew ← [n_bafflesfirst; n_bafflessecond; n_bafflesthird]
    while t ≤ numbaffles - 1
        if p > n_bafflesnew[y]
            y ← y + 1
            p ← 1
        bafflelength[t, 0] ← b_lengths[y]
        p ← p + 1
        t ← t + 1
    firstchannel ← 1
    m ← 0
    i ← 0
    while i < length(baffle_xposition1)
        j ← 0
        if mod(i + 1, 2) == 0
            while j < 3
                baffleposition1[i, j] ← baffle_xposition1[i] if j == 0
                baffleposition1[i, j] ← 0 if j == 1
                baffleposition1[i, j] ← bafflelength[i] if j == 2
                j ← j + 1
            i ← i + 1
        otherwise
            while j < 3
                baffleposition1[i, j] ← baffle_xposition1[i] if j == 0
                baffleposition1[i, j] ← flocDim[2] if j == 1
                baffleposition1[i, j] ← flocDim[2] - bafflelength[i] if j == 2
                j ← j + 1
            i ← i + 1
    while m < length(baffle_xposition2)
        j ← 0
        if mod(i + 1, 2) ≠ 0
            while j < 3
                baffleposition2[m, j] ← baffle_xposition2[m] if j == 0
                baffleposition2[m, j] ← flocDim[2] if j == 1
                baffleposition2[m, j] ← flocDim[2] - bafflelength[i] if j == 2
                j ← j + 1
            i ← i + 1
            m ← m + 1
        otherwise
            while j < 3
                baffleposition2[m, j] ← baffle_xposition2[m] if j == 0
                baffleposition2[m, j] ← 0 if j == 1
                baffleposition2[m, j] ← bafflelength[i] if j == 2
                j ← j + 1
            i ← i + 1
            m ← m + 1
    baffle_positions ← [baffleposition1, baffleposition2]
    numbafflesin2 ← length(baffle_xposition2)
    lastbafflespacing ← baffle_xposition2[numbafflesin2 - 2] - baffle_xposition2[numbafflesin2 - 1]
    return [baffle_positions, length(bafflelength), n_bafflesnew, lastbafflespacing]
# initializes variables and assigns initial values
# the length of each channel is equal to the length of one sed tank
# this while loop finds the x position of each baffle (x=0 at start of tank)
# this if statement determines what baffle spacing should be used to find the position of the next baffle. k (0,1,2) will be equal to the current baffle spacing and increments after all the baffles of a specific spacing have been assigned an x value.
# first assign the x positions for the baffles in channel 1
# for the first baffle, the position is just equal to the baffle spacing. The positions of the rest of the baffles are equal to the position of the previous baffle plus the baffle spacing.
# This if statement makes sure that the baffle that was just assigned an x position is not too close to the wall at the end of the channel (ie, closer than a baffle spacing). If it is too close this baffle is taken out and reassigned in the next channel.
# Now the x positions of the second channel are calculated. The x positions are still relative to a datum set at the start of the FIRST channel, however the positions are determined from the start of THIS channel to the end of THIS channel (ie backwards). The first baffle is at a position equal to the tank length minus the baffle spacing and the rest of the baffle have an x coordinated equal to the position of the previous baffle minus baffle spacing.
# increments the counter variables
# This loop adds baffles if the length of the channel is longer than baffle spacing * number of baffles. The baffles added have a spacing equal to the last baffle spacing. A baffle should be added if the space left is greater than 2*baffle spacing. This will ensure that the space between the wall and the last baffle is greater than or equal to the desired baffle spacing. This loop adds as many baffles as are needed. h keeps track of how many baffles are added or subtracted
# This loop takes out baffles if the length of the channel is shorter than baffle spacing * number of baffles. The baffles are taken out of the last section. A baffle needs to be taken out if the space between it and the wall is less than the desired baffle spacing. This loops takes out all extra baffles.
# initializes variables and sets initial values
# These statements create a new vector of the number of baffles per section. It is assumed that no baffles in the first section were removed (based on testing of the code this is a valid assumption). It then determines how many baffles are left in the third spacing based on the number added or removed above. Finally, it calculates the number of baffles in the second section based on the total number of baffles in the tank minus the number of baffles in section 1 and 3.
# This loop creates a vector of baffle lengths
# checks to see what spacing (and thereby what length) each baffle is
# increments counter variables
# initializes variables and sets initial values
# this loop assigns three coordinates for each baffle in the 1st channel. The first column is the x coordinate and the 2nd and 3rd columns are the starting and ending points (y coordinates) of a baffle. Note: The first baffle always starts at the floor and extends upward. The datum for the y coordiante is set at the water level with down as the positive direction.
# an even numbered baffle gets these coordinates. These baffles extend from the top of the tank downward.
# an odd numbered baffle gets these coordinates. These baffles extend from the bottom of the tank upward.
# this loop assigns three coordinates for each baffle in the 2nd channel
# an odd numbered baffle gets these coordinates. These baffles extend from the bottom of the tank upward.
# an even numbered baffle gets these coordinates. These baffles extend from the top of the tank downward.
# increments counter variables
# This function returns 2 matrices (one for each channel) with the coordinates for each baffle. This will be used by the autoCAD team to draw the baffles. It also return the total number of baffles in the tank and the number of baffles per baffle spacing.
bafflepositions_2channels([14.426; 0.534; 2.169], [16; 4; 2], [1.612; 1.234; 0.99], [0.232; 0.484; 0.685]) = [[[
    0.355, 2.169, 0.557;
    0.587, 0, 1.612;
    0.819, 2.169, 0.557;
    1.051, 0, 1.612;
    1.283, 2.169, 0.557;
    1.515, 0, 1.612;
    1.747, 2.169, 0.557;
    1.979, 0, 1.612;
    2.211, 2.169, 0.557;
    2.443, 0, 1.612;
    2.675, 2.169, 0.557;
    2.907, 0, 1.612;
    3.139, 2.169, 0.557;
    3.371, 0, 1.612;
    3.603, 2.169, 0.557;
    3.835, 0, 1.612
], [
    4.25, 2.169, 0.935;
    3.766, 0, 1.234;
    3.282, 2.169, 0.935;
    2.798, 0, 1.234;
    2.113, 2.169, 1.179;
    1.428, 0, 0.99;
    0.743, 2.169, 1.179
]], 23, [16; 4; 3], 0.685]
# This function checks to see if the Gθ value for the flocculator has fallen too low after baffles were removed to fit the flocculator in the tank.
Gθmin_check(baffle_spacing, n_bafflenew, FlocTank_width, Q_plant, Q_ratio) :=
    newGθ_totalpersection ← n_bafflenew*sqrt(k_b*Q_plant*Q_ratio*Π_cell/(2*ν*FlocTank_width))
    newGθ_total ← 0
    for i ∈ 0 .. 2
        newGθ_total ← newGθ_total + newGθ_totalpersection[i] if newGθ_totalpersection[i] > 0
        i ← i + 1
    return [newGθ_total, newGθ_totalpersection]
    return 1 if newGθ_total < Gθ_absmin
    return 0 otherwise  # This recalculates the Gθ for each section based on the number of baffles actually placed at each baffle spacing.
# This calculates the total Gθ for the tank (if all baffles were removed from the final section it would give a negative value and should not be used to find the Gθ for the tank)
# returns a 1 if the new Gθ is less than the minimum required Gθ, requires a 0 otherwise.
for i ∈ 0 .. length(G) - 1
    n_baffle ← ceil(Gθ_minpersection/vectorize(G*θ_design)) if i ≤ length(G)
    n_baffle ← ceil(Gθ_minpersection/vectorize(G_min*θ_min)) otherwise
θ_design ← Π_cell*FlocTank_width*baffle_spacing^2/Q_plant
Gθmin_check([1.6; 1.3; 1.1], 100, [30; 50; 10], [2000; 4500; 12.341]*1/s, [3.315; 14.482; 28.963]*s) = [29787197, [8494494; 6579807; 14712896]] s^(1/2)/m
# This is the main flocculator function. It is called by the Master Program and returns the necessary outputs to the master program. It calls the subprograms when needed.
# The length of one channel of the flocculator is equal to the length of a sed tank . Therefore the total length is equal to the number of channels times the length of a sed tank. The width of a flocculator is equal to the width of a sed tank divided by the number of channels (to make "upward velocity" equal in the two tanks. The water depth at the end of the flocculaor must be the same as the water depth in the sed tank.
flocculator(Q_plant, SedDim, flowratio_hightolowflow) :=
    FlocTank_length ← SedDim[0]*n_channels*m
    FlocTank_width ← SedDim[1]/n_channels*m
    FlocTank_enddepth ← SedDim[2]*m - freeboard_sed
    b_spacing ← (1/G)^(1/2)*(k_b*Q_plant^3/(2*Π_cell*ν*FlocTank_width^3))^(1/4)*1/m
    baffle_spacing ← round(b_spacing, 2)*m
    G_min ← G*flowratio_hightolowflow^(3/2)
    θ ← Π_cell*FlocTank_width*baffle_spacing^2/Q_plant
    θ_min ← Π_cell*FlocTank_width*baffle_spacing^2/(Q_plant*flowratio_hightolowflow)
    Gθ_persection ← Gθ_min/3
    Gθ_lowflow ← 0
    Gθ_highflow ← 0
    for i ∈ 0 .. length(G) - 1
        n_baffle[i] ← ceil(Gθ_persection/(G[i]*θ[i])) if i < length(G) - 1
        n_baffle[i] ← ceil((Gθ_min - Gθ_lowflow)/(G_min[i]*θ_min[i])) otherwise
        Gθ_lowflow ← Gθ_lowflow + n_baffle[i]*sqrt(k_b*Q_plant*flowratio_hightolowflow*Π_cell/(2*ν*FlocTank_width))
        Gθ_highflow ← Gθ_highflow + n_baffle[i]*sqrt(k_b*Q_plant*Π_cell/(2*ν*FlocTank_width))
    length_duetobaffles ← baffle_spacing*n_baffle
    baffle_length ← shortcircuit(baffle_spacing/m, FlocTank_enddepth)
    v ← Q_plant/(FlocTank_width*baffle_spacing)
    h_l ← vectorize(n_baffle*(k_b*v^2/(2*g)))
    total_hl ← sum(h_l)
    d_start ← FlocTank_enddepth + total_hl
    FlocTank_height ← d_start + freeboard_floc
    floc_dim ← [FlocTank_length; FlocTank_width; FlocTank_height]
    [baffle_positions, tot_baffle, n_bafflesnew, lastbafflespacing] ← bafflepositions_2channels(floc_dim/m, n_baffle, baffle_length/m, baffle_spacing/m)
    uturnhole_dim ← uturnhole(baffle_spacing/m, FlocTank_width, FlocTank_length, n_bafflesnew, lastbafflespacing)
    Gθ_newmin ← Gθmin_check(baffle_spacing, n_bafflesnew, FlocTank_width, Q_plant, flowratio_hightolowflow)
    lowGθ ← "Failure: Your Gθ for the flocculator is too low. It should not fall below 4500. Consider increasing the flowrate or flocculator length."
    return lowGθ if Gθ_newmin == 1
    return [floc_dim/m, baffle_spacing/m, tot_baffle, total_hl/m, uturnhole_dim/m, baffle_length/m, baffle_positions, Gθ_newmin, n_bafflesnew, length_duetobaffles/m]
# calculates the baffle spacing based on desired G value
# calculates the min G value based on the velocity at low flow
# Calculates the minimum residence time for the flocculator
# each baffle spacing is resposible for contributing a certain Gtheta to the tanks total Gtheta. This is caculated based on the ratio between the G of a certain spacing divided by the sum of the G values for all three sections. There will be more baffles at the smaller baffle spacing.
# determines the number of baffles at each spacing based on the Gtheta requirement calculated above.
# determines the length the flocculator would need to be if determined by the number fo baffles and their respective baffle spacings
# calls the function which checks for short circuiting and determines the baffle length for each spacing
# finds the velocity per baffle spacing based on the flow rate and the flow area of each baffle spacing
# calculates the head loss per baffle and then finds the total headloss This headloss calculation is not based on the actual number of baffles at each spacing, but change should be so small that difference in negligible.
# the water height at the end of the tank will be less than the water height at the beginning due to head loss. The tank must be deep enough so that water does not overfloww at the beginning. Additionally, there is 10 cm of free space between the water surface and the top of the tank
# matrix of flocculator dimensions (length, height, width)
# This calls the function that finds the coordinates of each baffle.
# calls the function which finds the dimensions of the uturn hole
# This calls the function to check the new Gθ minimum value. The function returns either a 0 (Gθ is ok) or a 1 (Gθ is too low). If a 1 is returned, the function gives an error message to the user
# This function returns: dimensions of the flocculator, baffles spacings, total number of baffles, headloss through the tank, dimensions of the uturn hole, and baffle lengths)
Q_plant := 150*gpm  # (max flowrate, Q.ratio = .5)
uturn_width := .3*m
Q_ratio := .5
# (ratio between high and low flow)
uturn_height := 1*m
FlocTank_width := .52*m  # (width for a single channel)
FlocTank_length := 4.6*m  # (length for a single channel)
FlocTank_height := 2.15*m  # (water depth at the end of the tank, includes 10cm of freeboard)
# Outputs: floc tank dimensions, baffle spacings, total number of baffles, total headloss, baffle lengths, baffle coordinates, total head loss, number of baffles per section, length required by baffles
flocculator(Q_plant, [FlocTank_length/m; 2*FlocTank_width/m; FlocTank_height/m], Q_ratio) = [[9.2; 0.52; 2.19368], [0.12; 0.19; 0.42], 29, 0.0436794, [0.175; 1.248], [1.87; 1.765; 1.42], [[
    0.355, 2.19368, 0.323679;
    0.475, 0, 1.87;
    0.595, 2.19368, 0.323679;
    0.715, 0, 1.87;
    0.835, 2.19368, 0.323679;
    0.955, 0, 1.87;
    1.075, 2.19368, 0.323679;
    1.195, 0, 1.87;
    1.385, 2.19368, 0.428679;
    1.575, 0, 1.765;
    1.765, 2.19368, 0.428679;
    1.955, 0, 1.765;
    2.145, 2.19368, 0.428679;
    2.335, 0, 1.765;
    2.525, 2.19368, 0.428679;
    2.715, 0, 1.765;
    3.135, 2.19368, 0.773679;
    3.555, 0, 1.42;
    3.975, 2.19368, 0.773679
], [
    4.25, 0, 1.42;
    3.83, 2.19368, 0.773679;
    3.41, 0, 1.42;
    2.99, 2.19368, 0.773679;
    2.57, 0, 1.42;
    2.15, 2.19368, 0.773679;
    1.73, 0, 1.42;
    1.31, 2.19368, 0.773679;
    0.89, 0, 1.42;
    0.47, 2.19368, 0.773679
]], [4791.47, [1321.78; 1321.78; 2147.9]], [8; 8; 13], 8.78]
